# LAMMPS input script for SPC/E water simulation under NVT conditions

units           real
atom_style      full

# Read initial configuration from data file
read_data       water_spce.data

# Define potential parameters
pair_style      lj/cut/coul/long 10.0
pair_coeff      1 1 0.1554 3.166 # SPC/E oxygen
pair_coeff      2 2 0.0 0.0       # SPC/E hydrogen
bond_style      harmonic
bond_coeff      1 450 1.0         # SPC/E OH bond
angle_style     harmonic
angle_coeff     1 55 104.52       # SPC/E HOH angle

# Set kspace style for long-range electrostatics
kspace_style    pppm 1.0e-4

# Apply SHAKE constraints to maintain rigid bond lengths and angles
fix             1 all shake 0.0001 20 0 b 1 a 1

# Define thermostat for NVT ensemble
fix             2 all nvt temp 300.0 300.0 100.0

# Generate initial velocities
velocity        all create 300.0 12345

# Setup output
thermo_style    custom step temp pe press density
thermo          1000
thermo_modify   flush yes

# Run simulation for equilibration and production
timestep        1.0
run             1100000
