# 2D Molecular dynamics simulation with periodic bonds in x-direction

units           lj
dimension       2
atom_style      molecular

# Read initial configuration
read_data       data.bond.x

# Replicate the system with periodic bonds in x-direction
replicate       3 3 1 bond/periodic

# Define interaction potentials
pair_style      lj/cut 2.5
pair_coeff      1 1 1.0 1.0 2.5

# Define bond style
bond_style      harmonic
bond_coeff      1 50.0 1.0

# Modify non-bonded interactions for bonded atoms
special_bonds   fene

# Assign initial velocities
velocity        all create 0.02 12345

# Integrate dynamics
fix             1 all nve

# Output settings
thermo          100
dump            1 all custom 100 tmp.data.x id type x y
dump_modify     1 sort id
dump            2 all image 100 image.*.jpg type bond yes diameter 1.0 1.0 zoom 1.2

# Run the simulation
run             5000
