# LAMMPS input script for Lennard-Jones fluid simulation in reduced units

units lj
atom_style atomic

# Define the simulation box
lattice fcc 0.8442
region box block 0 1 0 1 0 1
create_box 1 box
create_atoms 1 box

# Define atomic mass
mass 1 1.0

# Define pairwise interaction
pair_style lj/cut 2.5
pair_coeff 1 1 1.0 1.0 2.5

# Define neighbor list
neighbor 0.3 bin
neigh_modify every 1 delay 0 check yes

# Define initial velocities
velocity all create 1.44 87287

# Integration settings
fix 1 all nve

# Thermodynamic output
thermo 10
thermo_style custom step temp pe ke etotal press

# MDI interface for external integration
mdi mdi_name

# Run the simulation
timestep 0.005
run 1000
