# LAMMPS input script for 2D simulation of rigid body dynamics with SRD

units lj
dimension 2
atom_style hybrid sphere molecular

# Create simulation box
lattice hex 0.7
region box block 0 20 0 20 -0.5 0.5
create_box 2 box

# Create large rigid clusters
region large_sphere sphere 10 10 0 3.0
create_atoms 1 region large_sphere

# Create small SRD particles
lattice sq2 0.8
region small_particles block 0 20 0 20 -0.5 0.5
create_atoms 2 region small_particles

# Define masses
mass 1 5.0
mass 2 1.0

# Define interaction potentials
pair_style lj/cut 2.5
pair_coeff 1 1 1.0 1.0 2.5
pair_coeff 1 2 1.0 1.0 2.5
pair_coeff 2 2 0.5 1.0 2.5

# Set initial velocities
velocity all create 1.0 12345

# Fixes for simulation
fix 1 all nve
fix 2 all enforce2d

# Equilibrate large particles
fix 3 all rigid single
run 5000

# Remove overlapping small particles
delete_atoms overlap 0.1 2 2

# Stochastic Rotation Dynamics with SRD
fix 4 all srd 0.1 0.25 12345 collision multi types 2 radius 0.5

# Output settings
thermo 100
thermo_style custom step temp epair etotal press

dump 1 all custom 100 dump.lammpstrj id type x y z

# Run the simulation
run 10000

unfix 3

This script sets up a 2D simulation using LAMMPS, where large particles are treated as rigid bodies and interact with small SRD particles. Overlapping particles are removed to ensure a stable initial configuration, and SRD is used to simulate fluid-like interactions. The script includes periodic output of simulation properties.
