# LAMMPS Input Script for MoS2 Simulation using ReaxFF

units           real
atom_style      charge
boundary        p p p

# Define lattice and basis atoms for MoS2
lattice custom 3.160 &    # specify lattice constant
    a1 3.160 0.0 0.0 &
    a2 1.580 2.735 0.0 &
    a3 0.0 0.0 20.0 &     # large enough to avoid interactions with periodic images
    basis 0.0 0.0 0.0 &   # Mo atom
    basis 0.33333 0.66667 0.135 & # S atom 1
    basis 0.66667 0.33333 0.865 & # S atom 2

region box prism 0 1 0 1 0 1 0 0 0 units lattice
create_box 1 box

create_atoms 1 box

# Assign masses
mass 1 95.94   # Mo
mass 2 32.06   # S

# Pair style and coefficients for ReaxFF
pair_style      reaxff
pair_coeff      * * reaxff.rebomos Mo S

# Set neighbor list criteria
neighbor        2.0 bin
neigh_modify    every 1 delay 0 check yes

# Initialize velocities
velocity all create 300.0 12345 mom yes rot yes dist gaussian

# Fix ensemble
fix 1 all nve

# Output settings
thermo          10
thermo_style    custom step temp press etotal ke pe vol

# Run the simulation
timestep        0.5
run             20
