# LAMMPS input script for BCC lattice with ZBL potential and bispectrum calculation

units metal
atom_style atomic
boundary p p p

# Create BCC lattice
lattice bcc 2.0
region box block 0 10 0 10 0 10
create_box 2 box
create_atoms 2 box

# Slightly displace atoms to introduce randomness
displace_atoms all random 0.01 0.01 0.01 12345

# Define ZBL potential with inner and outer cutoffs
pair_style zbl 0.5 3.0
pair_coeff * * 2.0 2.0

# Set up compute for bispectrum components using SNA
compute sna all sna/atom 3 2.0 4 0.99363

# Output thermodynamic data
thermo_style custom step temp pe ke etotal press pxx pyy pzz
thermo 100

# Run simulation without gradient of the gradient
dump 1 all custom 100 dump.bispectrum_nograd id type x y z c_sna[*]
run 1000

# Enable gradient of the gradient and rerun
compute sna all sna/atom 3 2.0 4 0.99363 grad
dump 2 all custom 100 dump.bispectrum_grad id type x y z c_sna[*]
run 1000

# End of script
