# LAMMPS input script for a system with two types of Lennard-Jones particles

units real
atom_style charge

# Define simulation box
lattice bcc 5.0
region box block 0 10 0 10 0 10
create_box 2 box

# Create atoms
create_atoms 1 box
create_atoms 2 box

# Set masses and charges
mass 1 12.011
mass 2 12.011
set type 1 charge 0.1
set type 2 charge -0.1

# Define interatomic potential
pair_style lj/cut/coul/long/soft 12.0
pair_coeff * * 0.0 0.0 0.0  # Placeholder for FEP
pair_coeff 1 1 0.1 3.4 0.0
pair_coeff 2 2 0.1 3.4 0.0
pair_coeff 1 2 0.1 3.4 0.0

# Kspace style
kspace_style ewald 1.0e-4

# Define neighbor list
neighbor 2.0 bin
neigh_modify every 1 delay 0 check yes

# Define simulation settings
timestep 2.0
thermo 200
thermo_style custom step temp pe etotal f_1

# Apply Nosé-Hoover thermostat
fix nvt all nvt temp 300.0 300.0 100.0

# Free Energy Perturbation (FEP) calculation
fix 1 all adapt/fep 200 pair lj/cut/coul/long/soft 1 1 scale 0.0 1.0 0.1
fix 2 all adapt/fep 200 pair lj/cut/coul/long/soft 2 2 scale 0.0 1.0 0.1
fix 3 all adapt/fep 200 pair lj/cut/coul/long/soft 1 2 scale 0.0 1.0 0.1

# Run the simulation
run 2000
