# LAMMPS input script for thermal coupling simulation using AtC

units real
atom_style atomic
dimension 3

# Define lattice and create simulation box
lattice fcc 3.615
region simulation_box block 0 20 0 20 0 20
create_box 1 simulation_box

# Define and create MD region
region md_region block 5 15 5 15 5 15
create_atoms 1 region md_region

# Define potential and cutoff for atomic interactions
pair_style lj/cut 13.5
pair_coeff 1 1 0.2381 3.405

# Define thermal properties for AtC coupling
fix atc all atc thermal
fix_modify atc mesh fem_mesh
fix_modify atc initial_temperature 20.0

# Define FEM mesh and coupling between MD and FEM
region fem_mesh block 0 20 0 20 0 20
fix_modify atc fem_mesh region fem_mesh
fix_modify atc couple md_region

# Set initial velocities according to the temperature
velocity all create 20.0 12345

# Apply boundary conditions
fix temp_left all temp/rescale 100 40.0 40.0 0.1 1.0 region md_region
fix temp_right all temp/rescale 100 20.0 20.0 0.1 1.0 region md_region

# Define simulation parameters
timestep 5.0
thermo 100
thermo_style custom step temp pe ke etotal

# Run simulation
run 10000

This LAMMPS input script defines a face-centered cubic lattice within a simulation domain, sets up a smaller MD region, and uses the AtC package to couple thermal properties for heat diffusion studies. The initial and boundary temperatures are set, and the simulation is configured to observe thermal behavior over 10,000 steps.
