# LAMMPS input script for 2D simulation with hexagonal lattice to test volume definitions

# Initialize simulation
units           lj
dimension       2
boundary        p p f
atom_style      atomic

# Create hexagonal lattice
lattice         hex 0.8442

# Define simulation region and create atoms
region          box block 0 10 0 10 -0.1 0.1
create_box      1 box
create_atoms    1 region box

# Define interatomic potential
pair_style      lj/cut 10.0
pair_coeff      1 1 1.0 1.0 10.0

# Set up neighbor list
neighbor        0.3 bin
neigh_modify    every 1 delay 0 check yes

# Define the compute for Voronoi tessellation
compute         voronoi all voronoi/atom

# Set up thermo output
thermo          1
thermo_style    custom step temp c_voronoi[1] vol

# Run for bulk system with periodic boundaries
run             100

# Modify boundaries for finite system test
change_box      all boundary f f f

# Run for finite system with fixed boundaries
run             100

# End of script
