# LAMMPS Input Script for CO2/H2O Mixture in Graphene Slit

units real
atom_style full
boundary p p p

# Read in the initial configuration and potential parameters
read_data graphite_raw.data
include PARM_FLEXCO2.lammps

# Define the Lennard-Jones potential with a cutoff of 10.0
pair_style lj/cut 10.0
pair_coeff * *

# Define bond, angle, improper, and dihedral styles
bond_style harmonic
angle_style harmonic
improper_style harmonic
dihedral_style opls

# Neighbor list settings
neighbor 2.0 bin
neigh_modify delay 5 every 1

# Define the group for the entire simulation box
group all type 1 2 3 4 5 6

# Set up the temperature and pressure control
variable T equal 300.0
variable P equal 1.0

# Define the ensemble, temperature, and pressure
fix mynpt all npt temp ${T} ${T} 100.0 iso ${P} ${P} 1000.0

# Timestep settings
timestep 0.5

# Equilibration phase
thermo 500
thermo_style custom step temp press
run 10000

# Production phase with larger timestep
timestep 2.0
thermo 1000
dump 1 all atom 1000 dump.traj
run 50000

# End of script
