# LAMMPS Input Script for Energy-Volume Curve of InP in Zincblende Structure

units metal
atom_style charge

# Define lattice and simulation box
variable alat equal 5.8687  # initial lattice constant for InP in Angstrom (approximate)
lattice diamond ${alat}
region box block 0 1 0 1 0 1
create_box 2 box

# Create atoms for InP (zincblende)
create_atoms 1 box basis 1 1 basis 2 2
mass 1 114.818  # Mass of Indium
mass 2 30.97376 # Mass of Phosphorus

# Set up Vashishta potential
pair_style vashishta
pair_coeff * * InP.vashishta In P

# Define volume range and increments
variable V0 equal ${alat}^3 / 4  # Initial volume per atom
variable Vmin equal 20.0
variable Vmax equal 29.0
variable Vinc equal (v_Vmax - v_Vmin) / 99

# Open file to store energy-volume data
variable outName string "evsvol.dat"
shell echo "# Volume(Å³/atom) Energy(eV/atom)" > ${outName}

# Loop over volume increments
variable i loop 100
label loop

  # Calculate target volume and scale factor
  variable V equal v_Vmin + (v_i-1)*v_Vinc
  variable scale equal (v_V/v_V0)^(1/3)

  # Scale the lattice
  change_box all x scale ${scale} y scale ${scale} z scale ${scale} remap

  # Compute potential energy per atom
  run 0
  variable e equal pe/atoms

  # Output volume-energy data
  print "${V} ${e}" append ${outName}

next i
jump SELF loop

# End of script
