# LAMMPS input script for 2D simulation of polygonal particles

units lj
dimension 2
atom_style body nparticle

# Create simulation box
region box block 0 50 0 50 -0.1 0.1
create_box 1 box

# Define particle properties and create atoms
# Assuming a data file with polygonal particles is available
read_data polygonal_particles.data

# Define pair style and coefficients
pair_style body/nparticle 5.0
pair_coeff * *

# Initialize velocities with specified temperature
velocity all create 1.44 12345

# Define fixes
fix 1 all nve/body
fix 2 all enforce2d

# Neighbor settings
neighbor 0.3 bin
neigh_modify every 1 delay 0 check yes

# Output settings
thermo 100

# Run the simulation
run 10000

Note: Ensure you have a corresponding `polygonal_particles.data` file that defines the particle shapes and their initial positions for this script to work correctly.
