# LAMMPS input script for a binary Lennard-Jones fluid system

units lj
atom_style atomic

# Define simulation box
lattice sc 1.0
region box block 0 10.08 0 10.08 0 10.08
create_box 2 box

# Create atoms in a simple cubic lattice
# Type 1 atoms in one half of the box
region half1 block 0 5.04 0 10.08 0 10.08
create_atoms 1 region half1

# Type 2 atoms in the other half of the box
region half2 block 5.04 10.08 0 10.08 0 10.08
create_atoms 2 region half2

mass 1 1.0
mass 2 1.0

# Define Lennard-Jones potential with tail correction
pair_style lj/cut 2.5
pair_modify tail yes
pair_coeff 1 1 1.0 1.0 2.5
pair_coeff 2 2 1.0 1.0 2.5
pair_coeff 1 2 1.0 1.0 2.5

# Set initial velocities
velocity all create 1.0 12345

# Define groups
group type1 type 1
group type2 type 2

# Output settings
thermo 100
thermo_style custom step temp pe ke etotal press density
dump 1 all xyz 100 lj_simulation.xyz

# Run NVE ensemble
fix 1 all nve
run 1000

# Run NVT ensemble
unfix 1
fix 2 all nvt temp 1.0 1.0 0.5
run 1000

# End of script
