# LAMMPS Input Script for NVT Simulation of Nitrogen Gas using TraPPE Force Field

units real
atom_style full
boundary p p p

# Read the system configuration from a data file
read_data nitrogen.data

# Define potential parameters for N2 using TraPPE force field
pair_style lj/cut/coul/long 15.0
pair_coeff * * 3.31 36.0  # Example Lennard-Jones parameters for N2
bond_style harmonic
bond_coeff * 1000.0 1.10   # Example bond coefficients for N2
angle_style harmonic
angle_coeff * 100.0 180.0  # Example angle coefficients for linear N2

# Define kspace style for long-range electrostatics
kspace_style pppm 1.0e-4

# Setup simulation settings
neighbor 2.0 bin
neigh_modify delay 5 every 1

# Initialize velocities from a uniform distribution
velocity all create USER_DEFINED_TEMPERATURE 4928459 rot yes dist uniform

# Apply Nose-Hoover thermostat using fix rigid/nvt
fix 1 all rigid/nvt molecule temp USER_DEFINED_TEMPERATURE USER_DEFINED_TEMPERATURE 100.0

# Set up output for thermodynamic properties
thermo 1000
thermo_style custom step temp density pe press

# Run the simulation
timestep 1.0
run 1100000

# End of script

Make sure to replace `USER_DEFINED_TEMPERATURE` with your desired temperature value and `nitrogen.data` with the name of your data file containing the initial configuration.
