# LAMMPS input script for a silicon system using the Stillinger-Weber (SW) potential with quip pair style

units           metal
dimension       3
boundary        p p p

# Atom style and reading from data file
atom_style      atomic
read_data       data_sw

# Pair style and coefficients
pair_style      quip init_args='IP SW' param_filename='params.xml'
pair_coeff      * * Si

# Neighbor list settings
neighbor        2.0 bin
neigh_modify    every 10 delay 0 check yes

# Initial velocities
velocity        all create 10.0 12345 mom yes rot yes dist gaussian

# Define the time step and run parameters
timestep        0.001

# Integration settings
fix             1 all nve

# Thermodynamic output
thermo          10
thermo_style    custom step temp epair etotal press

# Run the simulation
run             100
