# LAMMPS input script for 2D tensile test using Total Lagrangian SPH (TLSPH)

units           si
dimension       2
boundary        f f p
atom_style      sph

# Define geometry and material properties
region          simbox block 0 100 0 20 -0.1 0.1 units box
create_box      1 simbox
lattice         sq2 1.0
create_atoms    1 box

# Define mass and pair style
mass            1 1.0  # mass density 1 kg/mm²
pair_style      smd/tlsph 2.01 1.0 0.3 0.0
pair_coeff      * *

# Set neighbor settings
neighbor        2.0 bin
neigh_modify    every 1 delay 0 check yes

# Define velocity for tensile test
region          top block INF INF 19.0 20.0 INF INF units box
region          bottom block INF INF 0.0 1.0 INF INF units box
group           top region top
group           bottom region bottom
group           mobile subtract all top bottom

set             group top velocity 0.0 0.01 0.0
set             group bottom velocity 0.0 -0.01 0.0

# Fixes for integration and boundary condition
fix             1 all nve/sph/tlsph
fix             2 all enforce2d
fix             3 all viscous 1.0
fix             4 all momentum 1 linear 1 1 1

# Output settings
thermo          100
thermo_style    custom step time temp etotal press vol
dump            1 all custom 100 output.txt id type x y vx vy stress[1] stress[2] stress[3] strain[1] strain[2] strain[3] c_neigh
dump_modify     1 format "%d %d %g %g %g %g %g %g %g %g %g %g %d"

# Time integration settings
variable        dt equal 0.01
timestep        ${dt}

# Run the simulation
run             10000
