# LAMMPS Input Script for Indium Phosphide (InP) using POD Potential

units metal
dimension 3
boundary p p p

# Define the lattice and create the simulation box
lattice fcc 5.83
region box block 0 4 0 4 0 4
create_box 2 box

# Define masses
mass 1 114.76  # Indium
mass 2 30.98   # Phosphorus

# Create atoms
create_atoms 1 box basis 1 1 basis 2 2

# Define potential using POD model
pair_style pod
pair_coeff * * InP_pod.pot In P

# Set initial velocities
velocity all create 300.0 12345

# Define the NVE ensemble
fix 1 all nve

# Run the simulation
timestep 0.0005
thermo 10
run 100

This script sets up a molecular dynamics simulation for indium phosphide using a POD potential model in LAMMPS, with appropriate lattice configuration, mass assignments, and equilibration using the NVE ensemble.
