# LAMMPS input script for simulating a simple rigid body system

units lj
atom_style bond

# Initialize simulation by reading particle data
read_data particle_data_file.dat

# Create groups for each of the nine clumps
group clump1 id 1:10
group clump2 id 11:20
group clump3 id 21:30
group clump4 id 31:40
group clump5 id 41:50
group clump6 id 51:60
group clump7 id 61:70
group clump8 id 71:80
group clump9 id 81:90

# Define settings for interactions
pair_style lj/cut 2.5
pair_coeff * * 1.0 1.0 2.5

# Exclude interactions within clumps
neigh_modify exclude group clump1 clump1
neigh_modify exclude group clump2 clump2
neigh_modify exclude group clump3 clump3
neigh_modify exclude group clump4 clump4
neigh_modify exclude group clump5 clump5
neigh_modify exclude group clump6 clump6
neigh_modify exclude group clump7 clump7
neigh_modify exclude group clump8 clump8
neigh_modify exclude group clump9 clump9

# Assign initial velocities
velocity all create 100.0 12345

# Define rigid body fixes
fix rigid_clumps all rigid/small molecule body file body_data_file.dat

# Set timestep
timestep 0.0001

# Define output settings
thermo 50
thermo_style custom step temp pe ke etotal

# Run the simulation
run 10000
