# LAMMPS input script for water simulation using ACKS2 force field

# Initialize simulation
units real
atom_style charge
boundary p p f

# Read initial configuration
read_data water_initial.data

# Replicate the system
variable xrep equal 2
variable yrep equal 2
variable zrep equal 1
replicate ${xrep} ${yrep} ${zrep}

# Define potential
pair_style reax/c NULL safezone 1.5 mincap 100
pair_coeff * * ffield.reax.acks2 H O

# Define neighbor list
neighbor 2.0 bin
neigh_modify every 1 delay 0 check yes

# Initialize velocities
velocity all create 300.0 4928459 mom yes rot yes dist gaussian

# Apply an electric field in the z direction
fix ef all efield 0.0 0.0 0.1

# Set up reflective walls at z boundaries
fix walls all wall/reflect zlo EDGE zhi EDGE

# Integrate using NVT ensemble
timestep 0.5
fix nvt all nvt temp 300.0 300.0 100.0

# Output settings
thermo 10
thermo_style custom step temp press density vol

# Run the simulation
run 20
