# LAMMPS input script for a 3D MD simulation of bcc iron with spin dynamics

units           metal
dimension       3
boundary        p p p
atom_style      atomic
atom_modify     map array
atom_style      hybrid atomic spin

# Create a lattice and region for bcc iron
lattice         bcc 2.8665
region          box block 0 5 0 5 0 5
create_box      1 box
create_atoms    1 box

# Define masses and set spin properties
mass            1 55.845
set             type 1 spin 2.2

# Pair style and coefficients for EAM potential
pair_style      hybrid eam/alloy
pair_coeff      * * eam/alloy Fe_mm.eam.alloy Fe

# Spin exchange potential
spin_style      exchange
spin_coeff      1 1 1.0  # Example exchange coefficient

# Initialize spins and velocities
velocity        all create 100.0 12345 dist gaussian
spin            random 2.2

# Define fixes for dynamics
fix             1 all nve/spin
fix             2 all langevin/spin 0.0 0.0 0.1 987654 spin  # Langevin thermostat for spins
fix             3 all precession 0.0  # Zeeman interaction with zero external field

# Output settings
thermo          50
thermo_style    custom step temp pe ke etotal press lx ly lz
dump            1 all custom 100 dump.atom id type x y z mux muy muz

# Run the simulation
timestep        0.0001
run             1000
