# LAMMPS input script for a 3D binary Lennard-Jones fluid system

units lj
atom_style full

# Read initial configuration
read_data config_in_v04.txt

# Define masses for two atom types
mass 1 1.0
mass 2 1.0

# Define Lennard-Jones potential parameters
pair_style lj/cut 2.5
pair_coeff 1 1 1.0 1.0 2.5
pair_coeff 1 2 1.0 1.0 2.5
pair_coeff 2 2 1.0 1.0 2.5

# Apply tail corrections to potential energy
pair_modify tail yes

# Set up neighbor list
neighbor 0.3 bin
neigh_modify every 1 delay 0 check yes

# Assign initial velocities
velocity all create 1.0 12345 dist gaussian

# Perform energy minimization
minimize 1.0e-4 1.0e-6 100 1000

# Run NVE ensemble for 1000 steps
fix 1 all nve
timestep 0.001
thermo 100
thermo_style custom step temp pe ke etotal press density
run 1000
unfix 1

# Equilibrate using NVT ensemble with Nosé-Hoover thermostat
fix 2 all nvt temp 1.0 1.0 0.1
dump 1 all xyz 100 output.xyz
run 1000
unfix 2

# End of script
