# LAMMPS input script for DPD fluid using VV-SSA integration scheme

units metal
atom_style atomic

# Read in the initial configuration
read_data data.dpd_fluid

# Define simulation box with periodic boundary conditions
boundary p p p

# Define pair style and coefficients
pair_style dpd/fdt/energy 10.0 245455
pair_coeff * * 25.0 4.5 1.0 1.0

# Set up neighbor list and communication
neighbor 0.2 bin
neigh_modify delay 0 every 1 check yes

# Define groups
group all type 1

# Define fixes
fix 1 all nve
fix 2 all shardlow
fix 3 all eos/cv 1.0

# Compute total energy
compute ke all ke
compute pe all pe
compute dpd_energy all dpd/fdt/energy

# Output settings
thermo_style custom step temp c_ke c_pe c_dpd_energy etotal
thermo 1

# Run the simulation
timestep 0.001
run 100
