# LAMMPS input script for 2D friction simulation using Lennard-Jones potentials

# Initialize simulation
units lj
dimension 2
atom_style atomic
boundary p s p

# Create geometry
lattice hex 0.8
region box block 0 40 0 20 -0.5 0.5
create_box 2 box

# Define regions for slabs and asperities
region lower_slab block 0 40 0 5 -0.5 0.5
region upper_slab block 0 40 15 20 -0.5 0.5
region lower_asperity sphere 20 5 0 2.0
region upper_asperity sphere 20 15 0 2.0

# Create atoms for slabs and asperities
create_atoms 1 region lower_slab
create_atoms 1 region upper_slab
create_atoms 2 region lower_asperity
create_atoms 2 region upper_asperity

# Define groups
group lower type 1
group upper type 1
group lower_boundary union lower_slab
group upper_boundary union upper_slab
group mobile subtract all lower_boundary upper_boundary

# Set masses
mass * 1.0

# Define pair style and coefficients
pair_style lj/cut 2.5
pair_coeff * * 1.0 1.0 2.5

# Initialize velocities
velocity mobile create 0.1 12345

# Set constant velocity for upper slab
velocity upper set 0.1 0.0 0.0

# Fix boundary atoms
fix fix_lower lower setforce 0.0 0.0 0.0
fix fix_upper upper setforce 0.0 0.0 0.0

# Apply NVE integration and temperature control
fix 1 mobile nve
fix 2 mobile temp/rescale 100 0.1 0.1 0.02 1.0

# Output settings
thermo 1000
thermo_style custom step temp pe ke etotal press

# Run simulation
timestep 0.0025
run 20000
