# LAMMPS Input Script for Simulating Beta-Titanium (bcc structure)

units           metal
boundary        p p p
atom_style      atomic

# Define lattice and create simulation box
lattice         bcc 3.27169
region          box block 0 1 0 1 0 1
create_box      1 box
create_atoms    1 box

# Set atomic mass for titanium
mass            1 47.90

# Define potential using MEAM/SW/spline
pair_style      meam/sw/spline
pair_coeff      * * Ti.meam.sw.spline Ti

# Minimize the system to simulate zero temperature and pressure
minimize        1.0e-4 1.0e-6 100 1000

# Compute potential energy to get cohesive energy
compute         poteng all pe/atom
variable        coh_energy equal "c_poteng[1]"

# Output the cohesive energy
thermo_style    custom step pe v_coh_energy
thermo          1

# Run simulation for energy calculation only
run             0

# Print the cohesive energy and compare with reference value
print           "Cohesive energy per atom: ${coh_energy} eV/atom."
print           "Reference cohesive energy: -4.720 eV/atom."
