# LAMMPS input script for simulating a mixture of PEG, water, and ethanol

units real
atom_style full

# Read initial data
read_data mixture.data

# Define force field parameters
bond_style harmonic
angle_style hybrid harmonic charmm
dihedral_style hybrid harmonic charmm
pair_style lj/cut/coul/long 12.0
kspace_style pppm 1e-4

# Define special bonds
special_bonds lj/coul 0.0 0.0 0.5

# Define neighbor settings
neighbor 2.0 bin
neigh_modify every 1 delay 0 check yes

# Group definitions
group peg type 1 2 3
group water type 4 5
group ethanol type 6 7 8

# Initial high-temperature equilibration
velocity all create 360.0 12345 mom yes rot yes dist gaussian
fix 1 all npt temp 360.0 360.0 100.0 iso 1000.0 1000.0 1000.0

# Output settings
thermo 100
thermo_style custom step temp press etotal
dump 1 all atom 500 dump.equil1.lammpstrj
run 10000

# Second equilibration at lower temperature and pressure
unfix 1
fix 2 all npt temp 300.0 300.0 100.0 iso 1.0 1.0 1000.0
dump_modify 1 every 1000
run 20000

# Transition to NVT ensemble for further equilibration
unfix 2
fix 3 all nvt temp 300.0 300.0 100.0
dump_modify 1 every 5000
run 30000

# Save the final configuration
write_data mixture_equilibrated.data

# End of script
