# LAMMPS Input Script for 3D Lennard-Jones Melt Simulation

units lj
atom_style atomic

# Create simulation box
lattice fcc 0.8442
region box block 0 10 0 10 0 10
create_box 1 box
create_atoms 1 box

# Set atom masses
mass 1 1.0

# Define Lennard-Jones potential
pair_style lj/cut 2.5
pair_coeff 1 1 1.0 1.0 2.5

# Initial velocities
velocity all create 3.0 87287

# Neighbor list
neighbor 0.3 bin
neigh_modify every 20 delay 0 check yes

# Custom Python-based fix for dynamics
fix 1 all python/move

# Thermodynamic output
thermo 50
thermo_style custom step temp etotal press

# Run the simulation
run 250
