# LAMMPS input script for 3D Lennard-Jones melt simulation with FCC lattice

units lj
atom_style atomic
boundary p p p

# Create simulation box and atoms
lattice fcc 0.8442
region box block 0 10 0 10 0 10
create_box 2 box
create_atoms 1 box

mass * 1.0

# Define pair style and coefficients
pair_style hybrid/overlay lj/cut 2.5 lj/cut 5.0
pair_coeff * * lj/cut 2.5 1.0 1.0 2.5
pair_coeff 2 2 lj/cut 5.0 1.0 1.0 5.0

# Initial velocities
velocity all create 1.0 12345

# Communication and balance settings
comm_style tiled
fix balance all balance 1000 1.1 shift xyz 10 1.0

# Define integration method
fix 1 all nve

# Thermo settings
thermo 50
thermo_style custom step temp pe ke etotal

# Run simulation
run 250
# Optional: Uncomment to output atomic positions and velocities
# dump 1 all atom 50 dump.lj
# dump_modify 1 sort id

run 250
