# LAMMPS input script for 2D simulation of point dipoles in a replicated NaCl crystal structure

# Use 2D mode
dimension 2

# Lennard-Jones units
units lj

# Atom style to include charge
atom_style charge

# Read initial positions and charges from data file
read_data nacl.data

# Replicate the system
replicate 8 8 1

# Define pair style and use zero pair style for sorting
pair_style zero 10.0

# Use Scafacos library with p2nfft method for long-range Coulombic interactions
pair_style coul/scafacos p2nfft
pair_coeff * *

# Set tolerance for long-range calculations
kspace_style scafacos 1.0e-4

# Assign initial velocities corresponding to temperature T=1.5 reduced units
velocity all create 1.5 87287 loop geom

# Time integration
timestep 0.005
fix 1 all nve

# Output thermodynamic properties every 10 timesteps
thermo 10

# Run simulation for 100 timesteps
run 100
