# LAMMPS Input Script for Uniaxial Strain Deformation of Argon

units real
atom_style atomic

# Define lattice and simulation box
lattice fcc 5.256227487
region box_region block 0 10 0 10 0 10
create_box 1 box_region

# Define regions
region internal_region block 2 8 2 8 2 8

# Create atoms
create_atoms 1 region box_region

# Define potential
pair_style lj/cut 13.5
pair_coeff 1 1 0.238 3.405 13.5  # Lennard-Jones parameters for Argon

# Define AtC model
fix atc all atc field
fix_modify atc mesh create 1 1 1
fix_modify atc mesh refine 1 1 1

# Define AtC field variables
fix_modify atc field add displacement
fix_modify atc field add internal_energy
fix_modify atc field add cauchy_stress
fix_modify atc field add elastic_deformation_gradient

# Set timestep
timestep 0.0

# Apply uniaxial strain by incrementally displacing atoms along x-axis
variable strain_rate equal 0.001
variable iter equal 100
variable step_displacement equal v_strain_rate*step

displace_atoms all move v_step_displacement 0.0 0.0 units box

# Thermodynamic output
thermo 10
thermo_style custom step temp pe ke etotal press vol lx ly lz

# Output Cauchy-Born metrics
compute cb_energy all reduce sum c_atc[internal_energy]
compute cb_stress all reduce sum c_atc[cauchy_stress]

# Run simulation
run ${iter}

# Output final results
print "Final Cauchy-Born energy: ${cb_energy}"
print "Final Cauchy-Born stress: ${cb_stress}"

write_restart restart.argon_uniaxial_deformation
