# LAMMPS Input Script

# Initialize simulation
units real
atom_style full
boundary p p p

# Read data
read_data system.data

# Pair style and coefficients
pair_style hybrid/overlay lj/cut/coul/long 10.0 nb3b/harmonic
bond_style morse

# Define bonds
bond_coeff 1 100.0 1.5 0.2

# Pair coefficients
pair_coeff * * lj/cut/coul/long 0.1 3.5
pair_coeff * * nb3b/harmonic 0.5 1.0 0.5

# KSpace style
kspace_style ewald/disp 0.0001

# Neighbor settings
neighbor 2.0 bin
neigh_modify every 1 delay 5 check yes

# Special bonds
special_bonds lj/coul 1.0 1.0 1.0

# Minimize
minimize 1.0e-4 1.0e-6 100 1000

# Define groups
group all type 1

# Velocity initialization
velocity all create 298.0 12345 dist gaussian

# Respa integrator
timestep 1.0
run_style respa 2 4 bond 1 pair 2

# Fix for NVE ensemble
fix 1 all nve
fix 2 all temp/rescale 10 298.0 298.0 0.5 1.0

# Output settings
thermo 50
thermo_style custom step temp pe etotal press vol

# Run simulation
run 10000
