# LAMMPS Input Script for Triply Periodic CNTs with Class2 Force Field

units real
atom_style full
boundary p p p

# Read the initial data file
read_data three_periodic_CNTs.data.gz

# Force field settings
pair_style lj/class2 10.0
bond_style class2
angle_style class2
dihedral_style class2
improper_style class2

# Pair coefficients - assuming default parameters for CNT carbon atoms
# These coefficients would typically be set based on the specific force field
pair_coeff * * 0.055 3.4

# Replicate the system to create a 2x2x2 supercell
replicate 2 2 2

# Define groups if needed (e.g., all atoms)
group all type 1

# Integration settings
timestep 1.0
thermo 10

# Fix NVE for constant energy integration
fix 1 all nve

# Run the simulation for 100 steps
run 100

# Output settings
dump 1 all atom 10 dump.cnt.lammpstrj

# End of the script
