# LAMMPS Input Script for Polyethylene using AIREBO Potential

units metal
atom_style atomic

# Read initial configuration
read_data data.airebo

# Replicate the system
replicate 17 16 2

# Define neighbor list
neighbor 0.5 bin
neigh_modify delay 5 every 1

# Define potential
pair_style airebo 3.0 0 1
pair_coeff * * CH.airebo-m C H

# Assign initial velocities
velocity all create 300.0 761341

# Define integration style
fix 1 all nve

# Set timestep
timestep 0.0005

# Output thermodynamic properties
thermo 10

# Run simulation
run 100
