# LAMMPS input script for nonequilibrium thermodynamic integration of copper with EAM potential

units           metal
dimension       3
boundary        p p p
atom_style      atomic

# Create simulation box and atoms
lattice         fcc 3.621
region          box block 0 4 0 4 0 4
create_box      1 box
create_atoms    1 box

# Define interatomic potential
pair_style      eam
pair_coeff      * * Cu_u3.eam

# Define initial velocities
velocity        all create 100.0 12345 mom yes dist gaussian

# Define groups
group           all type 1

# Define thermo and dump settings
thermo          100
thermo_style    custom step temp pe ke etotal lambda
dump            1 all custom 100 dump.cu id type x y z vx vy vz

# NVE ensemble with Langevin thermostat
fix             1 all nve
fix             2 all langevin 100.0 100.0 0.1 12345

# Thermodynamic integration using spring force
variable        lambda equal ramp(0,1)
fix             3 all addforce v_lambda NULL NULL NULL

# Run forward thermodynamic integration
run             5000

# Reverse the lambda ramp for backward integration
unfix           3
variable        lambda equal ramp(1,0)
fix             4 all addforce v_lambda NULL NULL NULL

# Run backward thermodynamic integration
run             5000

# Clean up
unfix           1
unfix           2
unfix           4

This script sets up a nonequilibrium thermodynamic integration simulation for a copper system using the EAM potential. The simulation involves a face-centered cubic lattice, NVE ensemble, Langevin thermostat, and a lambda parameter for thermodynamic integration. The script outputs relevant thermodynamic data, including potential energy and lambda values, for further analysis.
