# LAMMPS input script for SPC/E water model simulation

units           real
atom_style      full
boundary        p p p

# Read in the initial configuration from a data file
read_data       data.spce

# Define SPC/E potential parameters
pair_style      lj/cut/coul/long 10.0
pair_coeff      1 1 0.1554 3.166 # O-O interactions
pair_coeff      1 2 0.0 0.0      # O-H interactions
pair_coeff      2 2 0.0 0.0      # H-H interactions

bond_style      harmonic
bond_coeff      1 1000.0 1.0     # O-H bond

angle_style     harmonic
angle_coeff     1 100.0 109.47   # H-O-H angle

kspace_style    pppm 1.0e-4

# Fixes and constraints
fix             shake all shake 0.0001 20 0 b 1 a 1
fix             nvt all nvt temp 300.0 300.0 100.0

# Computes for energy calculations
compute         pair_energy all pair
compute         pe_tally all pe/tally

# Group definitions for energy calculations
group           oxygen type 1
group           hydrogen type 2

compute         o_h_energy all group/group oxygen hydrogen pair yes kspace yes

# Output settings
thermo          10
thermo_style    custom step temp etotal c_pair_energy c_o_h_energy c_pe_tally

# Run the simulation
timestep        2.0
run             50
