# LAMMPS script for 2D overdamped Brownian dynamics with self-propulsion

units lj
dimension 2
boundary p p p

atom_style atomic

# Create 2D lattice and simulation box
lattice sq 0.4
region box block -16 16 -16 16 -0.1 0.1
create_box 1 box
create_atoms 1 box

# Set masses and initial velocities
mass 1 1.0
velocity all create 1.0 12345 dist gaussian

# Define simulation settings
timestep 0.0000000001
thermo 100
thermo_style custom step temp press ke pe msd

# No pair interactions
pair_style none

# Apply fixes
fix 1 all enforce2d
fix 2 all brownian 1.0 12345
fix 3 all propel/self v 4.0

# Equilibration run
run 5000

# Main simulation run
timestep 0.00001
run 12000
