# LAMMPS Input Script for 2D Mixture of Big and Small Particles

units lj
atom_style sphere
dimension 2

# Define the simulation box
region box block 0 10 0 10 -0.1 0.1
create_box 2 box

# Create big particles
lattice sq2 1.0
region big_particles block 0 10 0 10 -0.1 0.1
create_atoms 1 region big_particles

# Set properties for big particles
set type 1 diameter 1.0 mass 1.0

# Define Lennard-Jones potential for big particles
pair_style lj/cut 2.5
pair_coeff 1 1 1.0 1.0 2.5

# Initial velocities for big particles
velocity all create 1.0 12345

# Equilibrate big particles
fix 1 all nve
thermo 100
thermo_style custom step temp pe etotal
run 5000

# Add small particles
lattice sq2 0.1
region small_particles block 0 10 0 10 -0.1 0.1
create_atoms 2 region small_particles

# Set properties for small particles
set type 2 diameter 0.1 mass 0.01

# Overlap removal between big and small particles
delete_atoms overlap 0.1 all all

# Define interactions between big and small particles (SRD)
pair_style hybrid/overlay lj/cut 2.5 srd 0.1 0.25 12345
pair_coeff 1 1 lj/cut 1.0 1.0 2.5
pair_coeff * * srd 0.1 1.0

# Apply SRD fix
fix 2 all srd 1.0 0.25 12345

# Enforce 2D dynamics
fix 3 all enforce2d

# Monitor thermodynamic properties
thermo 100
thermo_style custom step temp pe ke etotal press

# Run the simulation
run 20000
