# LAMMPS input script for methane (CH4) simulation using LATTE

# Initialize simulation
units metal
atom_style full

# Read data file
read_data data.ch4

# Variables for replication
variable xrep equal 1
variable yrep equal 1
variable zrep equal 1

# Replicate system if needed
replicate ${xrep} ${yrep} ${zrep}

# Define pair style
pair_style zero 10.0

# Initial velocities
velocity all create 0.0 12345

# Define timestep
timestep 0.00025

# Quantum mechanical interactions using LATTE
fix qm all mdi/qm mdi_latte

# Integrate using NVE ensemble
fix 1 all nve

# Output settings
thermo 10
thermo_style custom step temp pe etotal press

# Run simulation
run 100

# Clean up
unfix qm
unfix 1
