# LAMMPS input script for simulating lithium dendritic structure using electron force field

units metal
atom_style electron

# Read initial data
read_data lithium_dendrite.data

# Define interaction potential
pair_style eff/cut 50.112
pair_coeff * *

# Define periodic boundary conditions
boundary p p p

# Compute the effective temperature
compute myTemp all temp/eff

# Output settings
thermo 10
thermo_style custom step temp pe ke etotal press
dump 1 all atom 10 dump.lammpstrj
dump 2 all custom 10 dump.xyz id type x y z vx vy vz spin radius

# Initial velocity assignment
velocity all create 300.0 12345

# Integrate equations of motion
fix 1 all nve/eff

# Run the simulation
run 100

# Restart files for continuation or recovery
restart 10 restart.eff.*
