# LAMMPS input script for graphene-ionic liquid supercapacitor with dynamic charge constraints

units real
atom_style charge
boundary p p f

# Read data file for the initial configuration
read_data graphene_ionic_liquid.data

# Define potential between ionic liquid and graphene
pair_style lj/cut/colloid 10.0
pair_coeff * * 0.1 3.4

# Group definitions for electrodes
region bottom_electrode block INF INF INF INF INF 5
region top_electrode block INF INF INF INF 95 INF

group bottom_electrode region bottom_electrode
group top_electrode region top_electrode
group electrodes union bottom_electrode top_electrode

# Define fix for constrained potential on electrodes
fix 1 all nve
fix 2 bottom_electrode electrode/conp q0 -1.0 potential 0.0
fix 3 top_electrode electrode/conp q0 1.0 potential 4.0

# Define thermo output and timestep
thermo 50
thermo_style custom step temp pe etotal f_2[1] f_2[2] f_3[1] f_3[2]

# Run simulation
timestep 1.0
run 500
