# LAMMPS input script for electron system in bulk hydrogen

units electron
atom_style electron

# Variables
variable sname string "data.hydrogen"

# Initialization
read_data ${sname}

# Pair style and coefficients
pair_style eff/cut 30.627847
pair_coeff * *

# Boundary conditions
boundary p p p

# Minimize energy
min_style cg
minimize 1.0e-4 1.0e-6 100 1000

# Compute temperature with electron degrees of freedom
compute myTemp all temp/eff

# Set initial velocities
velocity all create 20000.0 12345 mom yes rot yes dist gaussian

# Fix for NVE integration
fix 1 all nve/eff

# Thermodynamic output
thermo 10
thermo_style custom step time temp c_myTemp pe ke etotal press

# Trajectory output
dump 1 all xyz 1 trajectory.xyz
dump_modify 1 element H e

dump 2 all custom 1 trajectory.lammpstrj id type x y z spin radius c_myTemp pe ke
dump_modify 2 element H e

# Run the simulation for a short time
run 10

# End of script
