# LAMMPS input script for 3D granular mixing simulation

units          si
dimension      3
boundary       p p f
atom_style     sphere

# Create simulation box
region         simbox block 0 20 0 20 0 20 units box
create_box     3 simbox

# Define cylindrical region for particles
region         cylinder_reg cylinder z 10 10 10 0 20 units box

# Define particles
variable       diameter equal random(0.6,1.2)
variable       density equal 1.0

# Create particles using fix pour
fix            1 all pour 1000 1 10000 region cylinder_reg diam variable diameter density variable density

# Define pair_style and coefficients
pair_style     gran/hertz/history 200000.0 100000.0 50.0 50.0 0.5 0
pair_coeff     * *

# Define gravity
fix            2 all gravity 9.81 vector 0.0 0.0 -1.0

# Define mixer as two rotating intersecting blocks
region         block1 block 8 12 0 20 0 20 units box
region         block2 block 0 20 8 12 0 20 units box
region         mixer intersect 2 block1 block2

# Create mixer walls
fix            3 all wall/gran region mixer type 1 hertz/history

# Integrate motion
fix            4 all nve/sphere

# Output settings
thermo         1000
thermo_style   custom step temp ke etotal
thermo_modify  lost ignore flush yes

# Dump particle positions and velocities
dump           1 all custom 1000 dump.mixing id type x y z vx vy vz

# Run simulation
run            400000
