# LAMMPS input script for 2D Lennard-Jones liquid viscosity calculation

units lj
dimension 2
atom_style atomic

# Create simulation box
lattice sq2 0.6
region box block 0 50 0 50 -0.5 0.5
create_box 1 box
create_atoms 1 box

# LJ potential
pair_style lj/cut 2.5
pair_coeff 1 1 1.0 1.0 2.5

# Settings
mass 1 1.0
velocity all create 1.0 12345

# Neighbor and neighbor list updates
neighbor 0.3 bin
neigh_modify delay 0 every 1 check yes

# Initial relaxation
fix 1 all nve
fix 2 all langevin 1.0 1.0 1.0 12345

# Run initial relaxation
timestep 0.005
run 5000

# Unfix initial relaxation fixes
unfix 1
unfix 2

# Main simulation with thermostat
fix 3 all nve
fix 4 all langevin 1.0 1.0 1.0 12345

# Output settings
thermo 1000
thermo_style custom step temp etotal press

# Define variables for stress tensor components
variable pxx equal pxx
variable pyy equal pyy
variable pxy equal pxy

# Compute stress tensor averaging
fix 5 all ave/correlate 5 400 5000 &
    v_pxx v_pyy v_pxy type auto file stress.correlate

# Calculate viscosity using Einstein relation
variable scale equal ${timestep}/(2*${lx}*${ly}*${kB}*${temp})
variable v11 equal trap(f_5[3])*${scale}
variable v22 equal trap(f_5[4])*${scale}
variable v12 equal trap(f_5[5])*${scale}

# Calculate 2D viscosity
variable viscosity equal (v_v11 + v_v22 - 2*v_v12)/3.0

# Main run
run 500000

# Output final viscosity
print "Final Viscosity: ${viscosity}"

Note: In this script, placeholders like `${lx}`, `${ly}`, `${kB}`, and `${temp}` should be defined in the script with appropriate values for the box dimensions, Boltzmann constant, and temperature. In a LAMMPS LJ units system, the box dimensions scale with density, and other constants are typically set to 1.0. Adjust as needed based on your specific setup.
