# LAMMPS input script for a BCC lattice of tantalum using SNAP MLIAP

# Initialize simulation
units metal
dimension 3
boundary p p p
atom_style atomic

# Create BCC lattice and simulation box
lattice bcc 3.316
region box block 0 4 0 4 0 4
create_box 1 box
create_atoms 1 box

# Set masses
mass 1 180.88

# Define interatomic potential
pair_style      snap
pair_coeff      * * Ta.snap Ta

# Compute properties
compute peratom all pe/atom
compute stress all stress/atom NULL
compute ke all ke/atom
compute pe all reduce sum c_peratom
compute press all reduce sum c_stress[1] c_stress[2] c_stress[3]

# Set initial velocities
velocity all create 300.0 12345

# Define simulation settings
timestep 0.0005
thermo 10
thermo_style custom step temp c_pe c_ke c_pe+c_ke c_press

# Run simulation
fix 1 all nve
run 100
