# LAMMPS input script for simulating a weak electrolyte system with charge regulation

units real
atom_style charge

# Create simulation box and atoms (example setup)
region box block 0 10 0 10 0 10
create_box 2 box
create_atoms 1 random 100 12345 box
create_atoms 2 random 100 67890 box

# Define masses and charges
mass 1 18.01528  # Mass of water molecule in g/mol
mass 2 58.44     # Mass of NaCl in g/mol
set type 1 charge 0.0
set type 2 charge 0.0

# Pair potentials
pair_style lj/cut/coul/long 0.72 10.0
pair_coeff 1 1 0.1 0.72
pair_coeff 2 2 0.1 0.72
pair_coeff 1 2 0.1 0.72

# Kspace style
kspace_style pppm 1.0e-4
dielectric 78

# Initial velocities
velocity all create 298.0 12345

# Thermostat and ensemble
fix 1 all langevin 298.0 298.0 100.0 12345
fix 2 all nve

# Charge regulation
fix 3 all charge/regulation pH 7.0 pKa 4.75 9.25 pKw 14.0 mcmc 100

# Output settings
thermo 100
thermo_style custom step temp pe etotal
dump 1 all custom 100 traj.lammpstrj id type x y z q

# Run the simulation
timestep 1.0
run 2000

# End of script
