# LAMMPS Input Script for 3D Lennard-Jones Melt Simulation of Argon

units real
atom_style atomic

# Define variables for box dimensions
variable x equal 20
variable y equal 20
variable z equal 20

# Create simulation box
lattice fcc 4.4300
region box block 0 ${x} 0 ${y} 0 ${z}
create_box 1 box

# Create atoms
create_atoms 1 box

# Define interaction potential
pair_style lj/cut 8.1500
pair_coeff 1 1 0.0104 3.4000

# Set mass for argon atoms
mass 1 39.95

# Set initial velocities to achieve 200 K
velocity all create 200.0 12345

# Define neighbor list
neighbor 0.3 bin
neigh_modify every 1 delay 0 check yes

# Integrate using velocity-Verlet
fix 1 all nve

# Run the simulation for 100 timesteps
timestep 1.0
run 100
