# LAMMPS input script for SWM4-NDP water model with atomic and Drude dynamics

units real
atom_style full
pair_style lj/cut/coul/long 12.0
bond_style harmonic
angle_style harmonic

read_data data.swm4ndp

# Define groups
group cores type 1 2 3  # Assuming types 1, 2, 3 are core atoms (e.g., O, H)
group drudes type 4      # Assuming type 4 is for Drude particles

# Define pair coefficients (example values, adjust as needed)
pair_coeff 1 1 0.1553 3.166  # O-O interaction
pair_coeff 2 2 0.0000 0.000  # H-H interaction (usually zero)
pair_coeff 1 2 0.0000 0.000  # O-H interaction (usually zero)
pair_coeff 3 3 0.0000 0.000  # Drude-Drude interaction (usually zero)

# Initialize Drude particles
fix drude all drude

# Integrate atomic and Drude particles separately
fix nve_cores cores nve
fix nve_drudes drudes nve

# Dual Langevin thermostat for temperature control
fix langevin_cores cores langevin/drude 300.0 300.0 100.0 48279  # Atomic thermostat
fix langevin_drudes drudes langevin/drude 1.0 1.0 10.0 12345 drude yes # Drude thermostat

# Rigid body fix for pressure control
fix rigid_nph cores rigid/nph/small iso 1.0 1.0 1000.0

# Long-range electrostatics
kspace_style pppm 1.0e-4

# Thermo settings
thermo 100
thermo_style custom step temp etotal ke pe press

# Run the simulation
timestep 1.0
run 2000
