# LAMMPS Input Script: Surface Deposition of Dimers in Lennard-Jones Fluid

units lj
atom_style molecular

# Define simulation box
boundary p p f
region simbox block 0 20 0 20 0 30
create_box 2 simbox

# Substrate definition
region substrate block 0 20 0 20 0 2
create_atoms 1 region substrate

# Define dimer deposition region
region deposit slab 0 20 0 20 25 30

# Lennard-Jones potential parameters
pair_style lj/cut 2.5
pair_coeff * * 1.0 1.0 2.5

# Bond parameters
bond_style harmonic
bond_coeff 1 30.0 1.0

# Fix substrate atoms
group substrate type 1
fix fix_substrate substrate setforce 0.0 0.0 0.0

# Define deposition group
group deposit_region region deposit

# Create dimers and assign velocity
variable dimerID equal 2
create_atoms 2 random 200 12345 deposit

# Assign dimer bonds
create_bonds single/double bond 1 2

# Set initial velocities for dimers
velocity deposit_region create 0.1 12345 dist gaussian
velocity deposit_region set 0.0 0.0 -0.5

# Reflective boundary at the top
fix wall_top deposit_region wall/reflect zhi EDGE

# Integrate motion
group mobile subtract all substrate
fix 1 mobile nve
fix 2 mobile langevin 0.1 0.1 1.0 12345

# Output settings
thermo 100
thermo_style custom step temp pe ke etotal press

# Run the simulation
timestep 0.005
run 10000
