# 3D Lennard-Jones melt simulation for a binary system with long-range interactions

units lj
atom_style charge

# Create simulation box
lattice fcc 0.8442
region box block 0 10 0 10 0 10
create_box 2 box

# Create regions for different particle types
region type2 block 4 6 4 6 4 6
create_atoms 1 region box
create_atoms 2 region type2

# Define masses and charges
mass 1 1.0
mass 2 1.0
set type 1 charge 0.0
set type 2 charge 0.0

# Define pair styles and coefficients
pair_style lj/long/coul/long 5.0
pair_coeff * * 1.0 1.0 2.5
pair_coeff 2 2 1.0 1.0 5.0

# Define kspace style for long-range interactions
kspace_style pppm/disp 1.0e-4

# Initialize velocities
velocity all create 1.0 87287

# Apply balance fix for parallel efficiency
fix balance all balance 1000 1.1 shift xyz 10 1.0 weight 1.0

# Integrate motion
fix 1 all nve

# Output settings
thermo 50
thermo_style custom step temp pe ke etotal press

# Run simulation
run 500
