# LAMMPS Input Script for 3D MD Simulation with Manifold Constraint

# Initialize simulation
units lj
atom_style atomic
boundary p p p

# Read atom positions and other setup parameters from external file
read_data data.setup

# Define pairwise interaction with smoothed Lennard-Jones potential
pair_style lj/smooth/linear 2.5
pair_coeff * * 1.0 1.0 2.5

# Define the manifold constraint using an external setup file
include manifold.setup

# Set up the integrator to maintain particles on the manifold
fix 1 all nve/manifold/rattle

# Enable load balancing every 1000 steps
fix 2 all balance 1000 1.0 shift xyz

# Define timestep
timestep 0.0005

# Output settings
thermo 25000
thermo_style custom step pe ke etotal

# Define dump for trajectory data
dump 1 all custom 1000000 traj.lammpstrj id type x y z

# Run the simulation for user-defined steps
variable run_steps equal 10000000 # Example: user can set the appropriate number of steps
run ${run_steps}
