# LAMMPS input script for molecular dynamics simulation with electrostatic interactions

units           real
atom_style      full
boundary        p p p

# Read data file
read_data       data.electrodes

# Include additional settings
include         settings.mod

# Define k-space style for electrostatic interactions
kspace_style    ewald/electrode 1.0e-8

# Define groups for electrodes
group           bottom_electrode type 1
group           top_electrode type 2

# Compute charges on electrodes
compute         qbot bottom_electrode property/atom q
compute         qtop top_electrode property/atom q

# Apply constant potential fix
fix             conp all electrode/conp bottom_electrode top_electrode

# Thermo settings
thermo_style    custom step pe c_qbot c_qtop
thermo          100

# Run the simulation for zero steps to initialize
run             0

# Output files
fix             output all electrode/output inv.csv vec.csv
