# LAMMPS input script for 3D energy-conserving dissipative particle dynamics (eDPD)
# Modeling heat conduction analogous to periodic Poiseuille flow

units lj
atom_style edpd

# Create a cubic domain with periodic boundaries
region box block 0 20 0 20 0 20
create_box 1 box

# Create 16,000 eDPD particles
create_atoms 1 random 16000 12345 box

# Set masses and initial temperature
mass 1 1.0
velocity all create 1.0 12345 dist gaussian

# Define the eDPD pair style and coefficients
pair_style edpd 1.0 1.0 0.5 1.0 1.0 0.1 1.0
pair_coeff * *

# Set the timestep
timestep 0.01

# Apply heat sources to create a temperature gradient
fix top_heat all edpd/source 10 upper 0.1
fix bottom_cool all edpd/source -10 lower 0.1

# Monitor the system's temperature
compute temp_profile all temp/profile

# Output settings
thermo 100
thermo_style custom step temp etotal

# Output temperature profile to a file
fix temp_output all ave/spatial 10 10 100 z lower 0.1 v_temp_profile file temp_profile.txt

# Run the simulation
run 1000

This script sets up and runs a 3D eDPD simulation with heat sources, designed to study thermal transport properties in a system with a temperature gradient. The system is initialized with 16,000 particles, and temperature profiles are averaged and outputted to a file.
