# LAMMPS Input Script for Molecular Dynamics Simulation using SI Units

units si
atom_style full
boundary p p p

# Read initial configuration from data file
read_data Data.22DMH.in.relres

# Define interaction potentials
pair_style hybrid lj/relres 10.0
bond_style harmonic
angle_style harmonic
dihedral_style fourier

# Define pair coefficients for hybrid potentials
pair_coeff * * lj/relres 1.0 1.0 1.0 # Adjust values as per specific atom types

# Define bond coefficients
bond_coeff * 1000.0 1.0  # Example values for bond stiffness and equilibrium distance

# Define angle coefficients
angle_coeff * 500.0 120.0  # Example values for angle stiffness and equilibrium angle

# Define dihedral coefficients
dihedral_coeff * 5 1.0 0.5 0.25 0.125  # Example Fourier coefficients

# Special bonds settings
special_bonds lj 0.0 0.0 0.5 coul 0.0 0.0 0.5

# Set up the integrator
timestep 2.0e-15  # 2 femtoseconds

# Use r-RESPA integrator
run_style respa 3 2 2
# Level 1: Bonds, angles, dihedrals
# Level 2: Short-range non-bonded interactions
# Level 3: Long-range electrostatics (if applicable)

# Set up the thermostat
fix 1 all nvt temp 290.0 290.0 100.0

# Output settings
thermo 50
thermo_style custom step temp press pe ke etotal

# Short run for testing
run 500
