# LAMMPS Input Script for Ellipsoidal Particles with Wall Interaction

units lj
atom_style ellipsoid

# Create a cubic simulation box
region box block 0 20 0 20 0 20
create_box 1 box

# Create ellipsoidal particles
create_atoms 1 random 100 12345 box
set type 1 mass 1.0

# Define ellipsoid shape and orientation
set type 1 shape 1.5 1.0 0.5
set type 1 quat/random 12345

# Pairwise interaction using resquared potential
pair_style resquared 1.0 1.0
pair_coeff * * 1.0 1.0

# Define an external wall region
region the_wall block INF INF INF INF 18.0 20.0

# Apply a wall interaction using exponential energy surface potential
fix wall_force all wall/region/ees the_wall 1.0 1.0 1.0

# Integration settings for ellipsoidal particles
fix integrator all nve/asphere

# Output settings
thermo 500
thermo_style custom step temp press etotal f_wall_force[1] f_wall_force[2] f_wall_force[3]
compute quat all property/atom quatw quati quatj quatk

# Run the simulation
timestep 0.0005
run 50000
