# LAMMPS Input Script for PIMD Simulation of a Protein using CHARMM Force Field

units           real
atom_style      full
boundary        p p p

read_data       protein_system.data

# CHARMM force field parameters
pair_style      lj/charmm/coul/long 8.0 10.0
bond_style      harmonic
angle_style     charmm
dihedral_style  charmm
improper_style  charmm

kspace_style    pppm 1.0e-4

# Define groups
group           protein type 1

# Set up initial conditions
timestep        0.08
thermo_style    custom step temp pe etotal
thermo          10

# PIMD setup
neigh_modify    every 1 delay 0 check yes

# Fix for PIMD NVT simulation
fix             1 all pimd/nvt path 32 temp 300.0 300.0 100.0

# Run the simulation
run             200

# Clean up
unfix           1
write_restart   protein_pimd.restart
