# LAMMPS input script for cyclohexane-methane mixture simulation
# Using atom style template and restarting from a previous simulation

# Include external file for initial setup
include in.template-mix

# Clear the current simulation state
clear

# Initialize a new simulation
units real
atom_style template

# Read the restart file to continue the simulation
read_restart template-mix.restart

# Define cyclohexane molecule from a file
molecule cyclohexane cyclohexane.mol

# Create a new simulation box with a specific region
region box block 0 10 0 10 0 10
create_box 2 box

# Equilibrate using the NVT ensemble at 300 K
fix nvt all nvt temp 300.0 300.0 1.0

# Run the simulation for 2000 timesteps
timestep 1.0
thermo 100
run 2000

# Remove the restart file to clean up
shell rm template-mix.restart

# Uncomment to output trajectory data if needed
# dump myDump all atom 100 dump.lammpstrj

# End of script
