# LAMMPS Input Script for 3D Lennard-Jones Melt Simulation

# Initialization
units           lj
atom_style      atomic
dimension       3
boundary        p p p

# Variables
variable        x equal 5
variable        y equal 5
variable        z equal 5

# Create simulation box
lattice         fcc 0.8442
region          box block 0 ${x} 0 ${y} 0 ${z}
create_box      1 box
create_atoms    1 box

# Mass and potential settings
mass            1 1.0
pair_style      lj/cut 2.5
pair_coeff      1 1 1.0 1.0 2.5

# Neighbor settings
neighbor        0.3 bin
neigh_modify    every 1 delay 0 check yes

# Initial velocities
velocity        all create 1.44 87287

# Define settings for output
thermo          1
thermo_style    custom step temp epair etotal press vol

# Define fixes
fix             1 all nve
# Alternative ensemble (commented out)
#fix             2 all npt temp 1.44 1.44 1.0 iso 0.0 0.0 1.0

# Run the simulation
run             10

# End of script
