# LAMMPS input script for charged particle system with long-range electrostatics

units lj
atom_style charge

# Read the initial configuration from file
read_data data.cloud_wall

# Initialize velocities to zero without adjusting center of mass momentum
velocity all create 0.0 12345 mom no rot no dist gaussian

# Define pair style and ignore short-range forces
pair_style zero 0.0
pair_coeff * *

# Define long-range electrostatics with ScaFaCoS Ewald method
kspace_style scafacos ewald 0.001

# Setup neighbor list
neighbor 0.3 bin
neigh_modify delay 0 every 1 check yes

# Define the integration method
fix 1 all nve

# Set the timestep
timestep 0.005

# Output thermodynamic info
thermo 10
thermo_style custom step temp pe ke etotal ecoul press

# Run the simulation
run 100
