# LAMMPS input script for uniaxial strain simulation on fcc copper using EAM potential

units           metal
dimension       3
boundary        f p p
atom_style      atomic

# Define simulation box
region          simbox block -18 18 -3 3 -3 3
create_box      1 simbox

# Create atoms in slightly smaller region
region          atomsbox block -17.5 17.5 -2.5 2.5 -2.5 2.5
create_atoms    1 region atomsbox

# Set lattice and potential
lattice         fcc 3.615
pair_style      eam
pair_coeff      * * Cu_u3.eam

# Define groups
group           all region atomsbox
group           internal region atomsbox

# Define atom-to-continuum (AtC) coupling
fix             atc all atc field quartic_sphere
fix_modify      atc mesh create
fix_modify      atc scalar mass_density displacement stress internal_energy

# Set timestep
timestep        0.001

# Equilibrate system
velocity        all create 300.0 12345
fix             nvt all nvt temp 300.0 300.0 0.1
run             1000

# Uniaxial strain along the x direction
variable        strain_rate equal 1.0e-5
variable        disp equal v_strain_rate*step*0.001
displace_atoms  all move v_disp 0.0 0.0

# Output for analysis
thermo          100
thermo_style    custom step time temp etotal epair
dump            1 all custom 100 dump.lammpstrj id type x y z vx vy vz
dump_modify     1 sort id

# Run the simulation
run             10000
