# LAMMPS Input Script for NVT Simulation of Nitrogen using TraPPE force field
units           real
atom_style      full

# Read data file
read_data       nitrogen_system.data

# Define pair, bond, and angle styles
pair_style      lj/cut/coul/long 12.0
pair_coeff      * * 3.31 1.0  # Example values for epsilon and sigma, replace with TraPPE parameters

bond_style      harmonic
bond_coeff      1 1000.0 1.1  # Example values, replace with TraPPE parameters

angle_style     harmonic
angle_coeff     1 100.0 180.0 # Example values, replace with TraPPE parameters

kspace_style    pppm 1.0e-4

# Set up neighbor list
neighbor        2.0 bin
neigh_modify    every 1 delay 0 check yes

# Define groups
group           nitrogen type 1

# Set up rigid body constraints
fix             1 nitrogen shake 0.0001 20 0 b 1 a 1

# Define the NVT ensemble
variable        temp equal 300.0  # User-defined temperature
fix             2 all nvt temp ${temp} ${temp} 100.0

# Initial velocities
velocity        all create ${temp} 4928459 dist uniform

# Output settings
thermo          1000
thermo_style    custom step temp density pe press

# Run the simulation
timestep        1.0  # Real units, adjust as necessary
run             60000
