# LAMMPS input script for diamond lattice simulation at high temperature

units metal
atom_style atomic

# Define simulation box and lattice
lattice diamond 5.431
region box block 0 10 0 10 0 10
create_box 1 box
create_atoms 1 box

# Mass of atoms
mass 1 28.06

# Define interatomic potential (using a generic pair style as placeholder)
pair_style tersoff
pair_coeff * * SiC.tersoff Si

# Define simulation settings
velocity all create 2000.0 123457 mom yes rot yes dist gaussian

# Thermostat and barostat settings for equilibration
fix 1 all nvt temp 2000.0 2000.0 0.01

# Timestep and run parameters
timestep 0.001
thermo 10
thermo_style custom step temp pe ke etotal
thermo_modify flush yes

# Run equilibration
run 10000

# Toggle between adiabatic and isothermal conditions
unfix 1
# Uncomment one of the following lines to choose the simulation condition
#fix 2 all nve  # Adiabatic
fix 2 all nvt temp 2000.0 2000.0 0.01  # Isothermal

# Production run
run 30000

# Output settings
dump 1 all atom 100 dump.diamond
dump_modify 1 scale yes

# End of script
