# LAMMPS input script for LJ particles with constant temperature and pressure

units real
atom_style full

# Read initial configuration from data file
read_data lj.data

# Define Lennard-Jones potential with a cutoff of 5.0
pair_style lj/cut 5.0
pair_coeff * * 0.1 1.0 5.0

# Set neighbor list parameters
neighbor 2.0 bin
neigh_modify delay 1 every 1 check yes

# Define the temperature and pressure control
timestep 1.0

# Equilibration using NVT ensemble
fix 1 all nvt temp 300.0 300.0 1000.0

# Generalized Replica Exchange Method (GREM)
variable temp index 300.0
variable damp index 1000.0
fix 2 all grem 400 variable temp variable damp

# Output thermodynamic information
thermo 10
thermo_style custom step temp pe etotal press vol

# Run the simulation
run 1000

# Unfix after the run
unfix 1
unfix 2
