# LAMMPS input script for 3D transport DPD with reaction source term

units lj
atom_style dpd
boundary p p p

# Create simulation box
region box block 0 20 0 20 0 20
create_box 2 box

# Create particles
create_atoms 1 random 8000 12345 box
create_atoms 2 random 8000 67890 box

# Set masses
mass 1 1.0
mass 2 1.0

# Pair style and coefficients
pair_style dpd/t 1.0 1.0 12345
pair_coeff 1 1 25.0 4.5
pair_coeff 1 2 25.0 4.5
pair_coeff 2 2 25.0 4.5

# Velocity initialization
velocity all create 1.0 23456 dist gaussian

# Define regions for reactions
region upper block INF INF INF INF 15 20
region lower block INF INF INF INF 0 5

# Define groups based on regions
group upper region upper
group lower region lower

# Apply reaction source terms
fix source_upper upper aveforce 0.0 0.0 0.1
fix source_lower lower aveforce 0.0 0.0 -0.1

# Define timestepping
timestep 0.01

# Integrate equations of motion
fix 1 all mvv/tdpd

# Initial run to reach steady state
run 500

# Reset time for data collection
reset_timestep 0

# Define chunks for concentration profiling
compute chunk all chunk/atom bin/1d z lower 0.5 units box
fix profile all ave/chunk 10 10 10 chunk c_chunk[*] file profile.dat

# Final run for data collection
run 100
