# LAMMPS input script for W-He system using SNAP potential

units metal
dimension 3
boundary p p p

# Define lattice and simulation box
lattice bcc 3.1803
region box block 0 4 0 4 0 4
create_box 2 box

# Create atoms: tungsten (atom type 1)
create_atoms 1 box

# Masses
mass 1 183.84  # Tungsten
mass 2 4.0026  # Helium

# Replace 5% of W atoms with He atoms
set type 1 type 2 fraction 0.05 12345

# Define SNAP potential
pair_style snap
pair_coeff * * WBe_Wood_PRB2019.snap W He

# Neighbor list
neighbor 2.0 bin
neigh_modify every 1 delay 0 check yes

# Initial velocities
velocity all create 300.0 12345

# Define simulation settings
fix 1 all nve

# Output settings
thermo 10
thermo_style custom step temp etotal

# Run simulation
timestep 0.0005
run 100
