# LAMMPS Input Script for MD Simulation with Quartic Bonds and Lennard-Jones Potential

units lj
atom_style atomic

# Create a cubic lattice and define simulation box
lattice sc 0.80
region box block 0 10 0 10 0 10
create_box 1 box
create_atoms 1 box

# Define interatomic potentials
pair_style lj/cut 2.5
pair_coeff 1 1 1.0 1.0 2.5

bond_style quartic
bond_coeff 1 1.0 1.0 1.0 1.0

# Define neighbor settings
neighbor 0.3 bin
neigh_modify delay 5

# Define initial velocities
velocity all create 0.3 87287

# Define groups
group all type 1

# Define simulation settings
timestep 0.005

# Fixes for NPT ensemble and adaptive temperature control
fix 1 all npt temp 0.3 0.3 1.0 iso 0.0 0.0 5.0
fix 2 all atc mass_density energy stress heat_flux bond

# Specify output settings
thermo 100
thermo_style custom step temp etotal press pxx pyy pzz
dump 1 all atom 1000 dump.lammpstrj

# Run the simulation
run 10000
