# LAMMPS input script for 2D Lennard-Jones particles in a hexagonal lattice with LJ 9-3 walls

# Initialize simulation
units lj
dimension 2
boundary f f p
atom_style atomic

# Create simulation box
lattice hex 0.8442
region simulation_box block 0 20 0 20 -0.5 0.5
create_box 1 simulation_box

# Create circular region of particles
region circle_circle circle 10 10 9 units box
create_atoms 1 region circle_circle

# Define pair potential
pair_style lj/cut 2.5
pair_coeff * * 1.0 1.0 2.5

# Set up wall potential
fix walls all wall/lj93 xlo EDGE 1.0 1.0 2.5 xhi EDGE 1.0 1.0 2.5 ylo EDGE 1.0 1.0 2.5 yhi EDGE 1.0 1.0 2.5

# Set initial velocities
velocity all create 1.0 12345 loop geom

# Integration settings
fix 1 all nve

# Neighbor settings
neighbor 0.3 bin
neigh_modify every 1 delay 0 check yes

# Load balancing
fix balance all balance 5 1.05 shift xyz 10 1.0

# Output settings
thermo 50
thermo_style custom step temp pe ke etotal
dump 1 all custom 50 dump.lammpstrj id type xs ys zs vx vy vz
dump 2 all adios 50 output.bp id type xs ys zs vx vy vz

# Run simulation
run 200
