units           real
atom_style      full
boundary        p p p

# Read initial configuration from data file
read_data       water_system.data

# Include Python script for generating Lennard-Jones parameters
python          generate_LJ_params.py

# Define pair style for Lennard-Jones and Coulombic interactions
pair_style      hybrid/overlay lj/cut/coul/long 10.0 10.0

# Apply Python-generated Lennard-Jones parameters
pair_coeff      * * lj/cut/coul/long 0.0 0.0
pair_coeff      1 1 lj/cut/coul/long 0.1553 3.166  # Oxygen-Oxygen
pair_coeff      1 2 lj/cut/coul/long 0.0000 0.000  # Oxygen-Hydrogen
pair_coeff      2 2 lj/cut/coul/long 0.0000 0.000  # Hydrogen-Hydrogen

# Long-range electrostatic interactions
kspace_style    pppm 1.0e-4

# Bond and angle potentials
bond_style      harmonic
bond_coeff      1 1000.0 1.0  # SPCE model bond length

angle_style     harmonic
angle_coeff     1 100.0 109.47  # SPCE model angle

# Constraints for rigidity
fix             1 all shake 0.0001 20 0 b 1 a 1

# NVT ensemble for equilibration
fix             2 all nvt temp 300.0 300.0 100.0

# Output settings
thermo          10
thermo_style    custom step temp etotal press

# Run the simulation
timestep        1.0
run             100
