# LAMMPS Input Script for 2D NEMD Simulation of LJ Liquid Viscosity

# Initialize simulation
units lj
dimension 2
atom_style atomic

# Create simulation box
lattice sq 0.6
region box block 0 20 0 20 -0.5 0.5
create_box 1 box
create_atoms 1 box

# Define Lennard-Jones potential
pair_style lj/cut 2.5
pair_coeff 1 1 1.0 1.0 2.5

# Set initial velocities
velocity all create 1.0 12345 loop geom

# Define simulation settings
neighbor 0.3 bin
neigh_modify delay 0 every 1 check yes

# Output settings
thermo 100
thermo_style custom step temp press pe ke etotal

# Equilibration phase
timestep 0.005
fix 1 all nve
fix 2 all langevin 1.0 1.0 1.0 904297

# Run equilibration
run 40000

# Shear deformation phase
unfix 1
unfix 2
fix 1 all nvt/sllod temp 1.0 1.0 1.0
fix 2 all deform 1 xy erate 2.7 remap v

# Compute viscosity
compute pxy all pressure thermo_temp
variable viscosity equal -(c_pxy[4]/2.7)

# Output settings for shear phase
thermo_style custom step temp press c_pxy[4] v_viscosity
thermo 100

# Run shear deformation
run 64000

# End of script
