# LAMMPS Input Script for 2D NEMD Simulation with Shear using Lennard-Jones Potential

# Initialization
units           lj
dimension       2
boundary        p p f
atom_style      atomic

# Create simulation box
lattice         sq 0.8442
region          simbox block 0 20 0 20 -0.5 0.5
create_box      2 simbox

# Create atoms
create_atoms    1 box

# Define masses
mass            1 1.0
mass            2 1.0

# Define potential
pair_style      lj/cut 2.5
pair_coeff      * * 1.0 1.0 2.5

# Define a special region for shear study
region          shear_region block 5 15 5 15 -0.5 0.5
group           shear_group region shear_region
set             group shear_group type 2

# Initial velocities
velocity        all create 1.44 87287 loop geom

# Apply SLLOD for shear flow
fix             1 all nvt/sllod temp 1.0 1.0 0.1
fix             2 all deform 1 xy erate 0.01 remap v

# Thermodynamic output
thermo          1000
thermo_style    custom step temp pe ke etotal press

# Run the simulation
run             50000
