# LAMMPS input script for RDX simulation using ReaxFF

units real
atom_style charge
boundary p p p

# Read initial configuration from data file
read_data rdx.data

# Specify the ReaxFF potential and control file
pair_style reax/c NULL
pair_coeff * * ffield.reax C H O N

# Define neighbor list settings
neighbor 2.5 bin
neigh_modify every 10 delay 0 check yes

# Set up computes for energy components
compute reax all pair reax/c
# You can further use c_reax to extract specific energy components if needed, e.g.,
# bond energy, angle energy, etc.

# Integrate using NVE and perform charge equilibration
fix 1 all nve
fix 2 all qeq/shielded 1 0.0 10.0 1e-6 reax/c

# Customize thermodynamic output
thermo_style custom step temp etotal pe ke evdwl ecoul ebond eangle elp emol press
thermo 10

# Set timestep and run the simulation
timestep 1.0
run 100

# Uncomment the following line to dump atom positions if needed
# dump 1 all atom 10 dump.rdx

# Uncomment the following line to visualize using VMD if needed
# dump_modify 1 element C H O N
