# LAMMPS Input Script for Simulating a Sigma5(310) Grain Boundary in a Metallic FCC System

units           metal
dimension       3
boundary        p p p
atom_style      atomic

# Define lattice and regions
lattice         fcc 4.05
region          whole block 0 50 0 50 0 50 units box
create_box      2 whole

# Create two regions for the grain boundary
region          lower block 0 50 0 25 0 50 units box
region          upper block 0 50 25 50 0 50 units box

# Create atoms in the lower region with one orientation
create_atoms    1 region lower
orient          region lower x 1 0 0 y 0 1 0 z 0 0 1

# Create atoms in the upper region with a different orientation
create_atoms    2 region upper
orient          region upper x 1 0 0 y 0 0 1 z 0 -1 0

# Define groups for the different grain regions
group           lower_grain region lower
group           upper_grain region upper

# Define Lennard-Jones potential
pair_style      lj/cut 10.0
pair_coeff      * * 0.167 3.40 10.0

# Remove overlapping atoms
delete_atoms    overlap 0.3 all all

# Setup for PTM analysis
compute         ptm all ptm/atom 0.1

# Specify output settings
dump            1 all cfg 10000 dump.*.cfg mass type xs ys zs c_ptm

# Minimization and equilibration
minimize        1.0e-4 1.0e-6 100 1000
fix             1 all nvt temp 300.0 300.0 100.0
timestep        0.001

# Run the simulation
run             50000
