# LAMMPS Input Script for BCC Tungsten with SNAP Potential

# Initialize simulation
units           metal
dimension       3
boundary        p p p
atom_style      atomic

# Create a BCC lattice
lattice         bcc 3.1803
region          box block 0 4 0 4 0 4
create_box      1 box
create_atoms    1 box

# Assign mass to tungsten atoms
mass            1 183.84

# Load SNAP potential
pair_style      snap
pair_coeff      * * tungsten.snapcoeff tungsten.snapparam W

# Set neighbor list settings
neighbor        2.0 bin
neigh_modify    every 1 delay 0 check yes

# Initialize velocities for temperature equilibration
velocity        all create 300.0 12345 mom yes rot no dist gaussian

# Define the integration style
fix             1 all nve

# Set timestep
timestep        0.0005

# Output settings
thermo          10
thermo_style    custom step time temp pe ke etotal

# Run the simulation
run             100
