# LAMMPS Input Script for FEP Calculation in a Liquid System

units real
atom_style full
boundary p p p

# Read in the molecular structure
read_data data.liquid_system

# Define interactions
pair_style lj/cut/coul/long 10.0 12.0
pair_coeff * * 0.0 0.0  # Placeholder for specific coefficients
bond_style harmonic
angle_style harmonic

# Group definitions for SHAKE
group hydrogens type 1
group oxygens type 2

# SHAKE constraints
fix shake_bonds all shake 0.0001 20 0 b 1 a 1

# Long-range Coulombic interactions
kspace_style pppm 1.0e-4

# Define the simulation parameters
timestep 1.0

# Equilibrate the system at 300 K and 1 atm
velocity all create 300.0 12345 mom yes rot yes dist gaussian
fix npt_integration all npt temp 300.0 300.0 100.0 iso 1.0 1.0 1000.0

# Setup for Free Energy Perturbation (FEP)
fix adapt_fep all adapt/fep 1000 1000 c hydrogens charge 0.0 -0.4 \
                                    c oxygens charge 0.0 -0.8

# Output settings
thermo 100
thermo_style custom step temp press vol pe ke etotal
dump myDump all atom 1000 dump.liquid_system.lammpstrj
dump_modify myDump sort id

# Run the simulation
run 50000

# Clean up
unfix npt_integration
unfix adapt_fep

This script sets up a molecular dynamics simulation using LAMMPS for free energy perturbation calculations in a liquid system. The simulation is prepared following the specified requirements, including the use of `atom_style full`, `lj/cut/coul/long` pair style, `pppm` for electrostatics, and the application of SHAKE constraints. The system is equilibrated using the `npt` ensemble, and FEP calculations are performed by adapting the atomic charges dynamically.
