# LAMMPS input script for MD simulation of BCC tantalum using SNAP potential

# Initialize simulation
units           metal
dimension       3
boundary        p p p
atom_style      atomic

# Create BCC lattice
lattice         bcc 3.316
region          simbox block 0 4 0 4 0 4
create_box      1 simbox
create_atoms    1 box

# Define mass of tantalum atoms
mass            1 180.88

# Define SNAP potential via MLIAP
pair_style      mliap snap
pair_coeff      * * snap_coeff.snap Ta

# Set initial velocities for temperature control
velocity        all create 300.0 12345 mom yes rot yes dist gaussian

# Define neighbor list
neighbor        2.0 bin
neigh_modify    delay 0 every 1 check yes

# Set timestep
timestep        0.0005

# Define ensemble
fix             1 all nve

# Output settings
thermo          10
thermo_style    custom step temp pe ke etotal press

# Run the simulation
run             1000

# End of input script
