# LAMMPS input script for polyethylene system using AIREBO potential

units metal
atom_style atomic

# Read initial configuration
read_data data.airebo

# Replicate the system
replicate 17 16 2

# Define neighbor list
neighbor 2.0 bin
neigh_modify delay 5

# Define the AIREBO potential
pair_style airebo 3.0
pair_coeff * * CH.airebo C H

# Set initial velocities
velocity all create 300.0 761341

# Run settings
timestep 0.0005

# Define the NVE ensemble
fix 1 all nve

# Output settings
thermo 10

# Run the simulation
run 100

# End of script
