# LAMMPS Input Script for Polyethylene using AIREBO Potential

units metal
atom_style atomic

# Read initial atomic configuration
read_data data.airebo

# Replicate the system to create a larger simulation domain
replicate 17 16 2

# Set up neighbor list
neighbor 0.5 bin
neigh_modify every 1 delay 5

# Define the AIREBO potential
pair_style airebo 3.0
pair_coeff * * CH.airebo C H

# Initialize velocities at 300 K
velocity all create 300.0 761341

# Define the integration style
fix 1 all nve

# Thermodynamic output every 10 timesteps
thermo 10

# Run the simulation for 100 timesteps
run 100
