# LAMMPS Input Script for FCC Gold Lattice: Hardy Stress Convergence Study

units           metal
dimension       3
boundary        p p p

atom_style      atomic

# Create FCC Lattice for Gold
lattice         fcc 4.08
region          box block 0 10 0 10 0 10
create_box      1 box
create_atoms    1 box

# Define Interatomic Potential
pair_style      eam
pair_coeff      * * Au_u3.eam

# Initialize Velocities to Zero
velocity        all create 0.0 12345 mom yes rot yes dist gaussian

# Define Thermodynamic Output
thermo_style    custom step temp pe ke etotal press pxx pyy pzz
thermo          1

# Set up Hardy Stress Calculation using ATC package
fix             atc all atc
fix_modify      atc kernel quartic
fix_modify      atc fields mass_density stress number_density

# Set zero timestep for static properties
timestep        0.0

# Iterate over different kernel ranges
variable        a equal 4.08
variable        n loop 60
label           loop

# Adjust kernel range incrementally
variable        range equal v_a*0.1*v_n
fix_modify      atc kernel_radius ${range}

# Run a single step to calculate and output properties
run             1

next            n
jump            SELF loop

# End of Script
