# LAMMPS input script for a 3D simulation of charged particles with periodic boundary conditions

units metal
atom_style full
dimension 3
boundary p p p

# Define lattice and regions
lattice fcc 4.08
region box block 0 10 0 10 0 10
create_box 2 box

# Define regions
region LEFT block 0 5 0 10 0 10
region RIGHT block 5 10 0 10 0 10

# Create atoms in regions
create_atoms 1 region LEFT
create_atoms 2 region RIGHT

# Assign charges
set region LEFT charge -1.0
set region RIGHT charge 1.0

# Define potentials
pair_style lj/cut 10.0
pair_coeff * * 0.0 1.0

# # Uncomment these lines to include long-range Coulombic interactions
# kspace_style pppm 1.0e-4
# kspace_modify dielectric 1.0

# Advanced thermal coupling (ATC) setup
fix atc all atc mesh tetrahedral order 1 &
    th_scale 0.5 th_mode full &
    elec_mode full

# Specify initial conditions for ATC
fix_modify atc elec/charge 1
fix_modify atc elec/charge 2

# Set initial conditions for mass density and electric potential
fix_modify atc initial_density 1.0
fix_modify atc initial_potential 0.0

# Define thermodynamic output
thermo 100
thermo_style custom step temp epair etotal press fmax

# Run the simulation
timestep 0.001
run 1000
