# LAMMPS input script for studying thermodynamic properties and free energy changes

units real
atom_style full

# Read initial configuration from data file
read_data complex_molecule.data

# Define the hybrid pair style
pair_style hybrid/overlay lj/cut/coul/long 10.0 soft 10.0
pair_coeff * * lj/cut/coul/long 0.1 3.0
pair_coeff 1 1 soft 0.2 3.0 5.0

# Specify kspace style for long-range Coulombic interactions
kspace_style pppm 1.0e-4

# Bond and angle constraint using SHAKE
fix freeze all shake 0.0001 20 0 b 1 a 1

# Equilibration at 300 K and 1 atm using NPT ensemble
fix npt all npt temp 300.0 300.0 100.0 iso 1.0 1.0 1000.0

# Output settings
thermo 100
thermo_style custom step temp press density etotal
thermo_modify flush yes

# Dump atomic positions every 1000 steps
dump myDump all atom 1000 dump.atom

# Run equilibration
timestep 1.0
run 10000

# Switch to NVT ensemble to maintain constant temperature
unfix npt
fix nvt all nvt temp 300.0 300.0 100.0

# Gradual modification of interaction parameters for FEP calculations
# (Example: modify interaction strength gradually)
variable lambda equal ramp(0.0,1.0)
fix adapt all adapt 1 pair lj/cut/coul/long epsilon 1 1 v_lambda

# Run simulation with modified parameters
run 50000

# Store results for free energy calculation
fix fep all ave/time 100 1 100 f_lambda file fep_results.txt mode vector

# Clean up
unfix nvt
unfix fep
