# LAMMPS input script for simulating bulk silicon using a diamond lattice
# with Stillinger-Weber potential and spline modifications

units           metal
dimension       3
boundary        p p p
atom_style      atomic

# Create a diamond lattice for silicon
lattice         diamond 5.431
region          simbox block 0 5 0 5 0 5
create_box      1 simbox
create_atoms    1 box

# Set atomic mass for silicon
mass            1 28.085

# Define the pair style and coefficients
pair_style      meam/sw/spline
pair_coeff      * * Si.sw_spline Si

# Initialize velocities to match a temperature of 300 K
velocity        all create 300.0 12345

# Define the timestep
timestep        0.002

# Set up neighbor list
neighbor        2.0 bin
neigh_modify    every 1 delay 0 check yes

# Define the integrator
fix             1 all nve

# Output thermodynamic information every 10 timesteps
thermo          10
thermo_style    custom step temp pe ke etotal press pxx pyy pzz

# Run the simulation
run             2000
