# LAMMPS Input Script for 2,2-Dimethylhexane Molecular Dynamics Simulation

# Initialize simulation
units si
atom_style molecular
boundary p p p

# Read data file
read_data dimethylhexane.data

# Define pair style and interactions
pair_style lj/relres 1.0
pair_modify shift yes
dielectric 1.0

# Define special bonds
special_bonds lj 0.0 0.0 0.5 coul 0.0 0.0 0.5

# Define bond, angle, and dihedral styles
bond_style harmonic
angle_style harmonic
dihedral_style fourier

# Define pair coefficients (example coefficients, should be replaced with actual values)
pair_coeff 1 1 0.109 3.4
pair_coeff 1 2 0.109 3.55
pair_coeff 2 2 0.109 3.7

# Neighbor and neighbor modify settings
neighbor 2.0 bin
neigh_modify every 2 delay 0

# Define temperature control
fix 1 all nvt temp 290.0 290.0 100.0

# Output settings
thermo 100
thermo_style custom step temp press pe ke etotal

# Run the simulation
timestep 1.0e-15
run 10000
