# LAMMPS input script for simulating silicon in its diamond cubic phase
# using the MEAM/SW/spline potential

# Initialize simulation
units           metal
dimension       3
boundary        p p p
atom_style      atomic

# Define lattice and create a single unit cell of silicon
variable        a equal 5.431
lattice         diamond ${a}
region          box block 0 1 0 1 0 1
create_box      1 box
create_atoms    1 box

# Define interatomic potential
pair_style      meam/sw/spline
pair_coeff      * * Si.meam.sw.spline Si

# Set mass for silicon
mass            1 28.0855

# Compute properties
compute         eng all pe/atom
compute         vol all voronoi/atom

# Run the simulation for zero timesteps to get initial properties
run             0

# Output calculated properties
variable        ecoh equal pe/atoms
variable        a0 equal ${a}
variable        v0 equal v_volume/atoms

print           "Cohesive energy (eV/atom): ${ecoh}"
print           "Lattice constant (A): ${a0}"
print           "Atomic volume (A^3/atom): ${v0}"
