# LAMMPS input script for Lennard-Jones melt simulation

units lj
atom_style atomic

# Define the simulation box and lattice
lattice fcc 0.8442
region box block 0 10 0 10 0 10
create_box 2 box
create_atoms 1 box

# Define a block region and assign a subset of atoms to type 2
region subset block 2 4 2 4 2 4
group type2 region subset
set group type2 type 2

# Define Lennard-Jones potential with different cutoffs for type 1 and type 2
pair_style lj/cut 5.0
pair_coeff 1 1 1.0 1.0 2.5
pair_coeff 1 2 1.0 1.0 5.0
pair_coeff 2 2 1.0 1.0 5.0

# Initialize velocities
velocity all create 1.0 12345

# Define neighbor list settings
neighbor 0.3 bin
neigh_modify every 2 delay 0 check yes

# Time integration setup
fix 1 all nve

# Optimize load balancing
fix 2 all balance 1000 1.0 shift x 10 1.0

# Output settings
thermo 50

# Run the simulation
run 1500
