# LAMMPS input script for GCMC simulation of CO2 using TraPPE model

units real
atom_style full
boundary p p p

# Create simulation box
lattice sc 1.0
region box block 0 10 0 10 0 10
create_box 1 box

# Define CO2 molecule using TraPPE model
molecule co2 MoleculeTemplates/co2_trappe.txt

# Create initial CO2 molecules
create_atoms 1 random 100 12345 box mol co2 12345

# Set force field parameters for TraPPE model
pair_style lj/cut/coul/long 12.0
pair_coeff * * 0.0 0.0 0.0  # Dummy pair_coeff for all atom types
bond_style harmonic
bond_coeff 1 119.0 1.16
angle_style harmonic
angle_coeff 1 500.0 180.0
kspace_style ewald 1.0e-4

# Define groups for CO2
group co2 type 1 2 3

# Setup rigid body dynamics
fix 1 co2 rigid/small molecule

# Setup thermodynamic outputs
thermo 1000
thermo_style custom step temp press pe atoms vol

# Setup GCMC fix for CO2
fix 2 co2 gcmc 10 100 100 0 12345 338.0 -8.1 0.5 mol co2 pressure 1.0

# Setup NVT thermostat
fix 3 all nvt temp 338.0 338.0 100.0

# Run the simulation
timestep 1.0
run 20000

# Write output data
write_data co2_gcmc_output.data

Note: Replace the `MoleculeTemplates/co2_trappe.txt` with the actual path to your CO2 molecule file in TraPPE format.
