# LAMMPS Input Script for Lennard-Jones Melt Simulation with FCC Lattice

units lj
atom_style atomic

# Create a cubic simulation box
lattice fcc 0.8442
region box block 0 10 0 10 0 10
create_box 2 box

# Create atoms in the simulation box
create_atoms 1 box
mass 1 1.0
mass 2 1.0

# Define a region for a subset of the atoms
region subset block 3 6 INF INF INF INF
group subset region subset
set group subset type 2

# Define Lennard-Jones potential with different cutoffs
pair_style lj/cut 5.0
pair_coeff 1 1 1.0 1.0 2.5
pair_coeff 1 2 1.0 1.0 5.0
pair_coeff 2 2 1.0 1.0 5.0

# Set up neighbor list with bin style
neighbor 0.3 bin
neigh_modify delay 5

# Assign initial velocities
velocity all create 1.0 12345 dist gaussian

# Setup load balancing strategies
balance 1.0 shift 1.0
balance 1.0 weight

# Fix for NVE integration
fix 1 all nve

# Thermodynamic output
thermo 50
thermo_style custom step temp pe ke etotal

# Run the simulation
run 250
