# LAMMPS Input Script for SPC/E Water Model Simulation

units real
atom_style full
boundary p p p

# Read in data file
read_data water_system.data

# Define force field parameters
pair_style lj/cut/coul/long 12.0
pair_coeff 1 1 0.1553 3.166 # Example Lennard-Jones parameters for Oxygen
pair_coeff 2 2 0.0 0.0       # Example Lennard-Jones parameters for Hydrogen

bond_style harmonic
bond_coeff 1 450 1.0         # Harmonic bond: O-H

angle_style harmonic
angle_coeff 1 55 104.52      # Harmonic angle: H-O-H

kspace_style pppm 1.0e-4

# Special bonds settings
special_bonds lj/coul 0.0 0.0 0.5

# Fixes
fix 1 all shake 0.0001 20 0 b 1 a 1  # Constrain bonds and angles in water molecules
fix 2 all nvt temp 300.0 300.0 100.0 # Nose-Hoover thermostat

# Compute stress and pressure
compute stress_atom all stress/atom NULL
compute pressure all pressure thermo_temp
fix 3 all ave/time 10 1 10 c_stress_atom file stress_atom.txt mode vector
fix 4 all ave/time 10 1 10 c_pressure file pressure.txt mode scalar

# Output settings
thermo 10
thermo_style custom step temp press etotal

# Run the simulation
timestep 2.0
run 50
