# LAMMPS input script for 2D SDPD simulation of isothermal flow with Tait water properties

units           micro
dimension       2
atom_style      sdpd

# Create simulation box
lattice         sq 1.0
region          simbox block 0 100 0 50 -0.1 0.1
create_box      3 simbox

# Define particle properties
variable        rho equal 1.0    # Density (picogram/micrometer^3)
variable        eta equal 1.0    # Dynamic viscosity (picogram/micrometer-microsecond)
variable        cs equal 100.0   # Speed of sound (micrometers/microsecond)
variable        radius equal 0.5 # Sphere radius (micrometers)

# Create fluid particles
region          fluid region 1 99 1 49
create_atoms    1 region fluid

# Create spherical particles
region          sphere region 45 55 20 30
create_atoms    2 single 50 25 0
group           sphere type 2

# Create wall particles
region          upper_wall block INF INF 49.5 50.0 INF INF
region          lower_wall block INF INF 0.0 0.5 INF INF
create_atoms    3 region upper_wall
create_atoms    3 region lower_wall
group           upper_wall region upper_wall
group           lower_wall region lower_wall

# Define interactions
pair_style      hybrid/overlay sdpd/rhosum 1.0 2.5 1.0 pair sdpd/taitwater ${rho} ${eta} ${cs}
pair_coeff      * * sdpd/rhosum
pair_coeff      1 1 sdpd/taitwater
pair_coeff      1 2 sdpd/taitwater
pair_coeff      1 3 sdpd/taitwater

# Define groups
group           fluid type 1
group           walls union upper_wall lower_wall

# Set particle properties
set group fluid diameter ${radius}
set group fluid density ${rho}
set group sphere diameter ${radius}
set group sphere density ${rho}

# Fixes
fix             1 all nve/sdpd
fix             2 walls setforce 0.0 0.0 0.0
fix             3 upper_wall move linear 0.01 0.0 0.0
fix             4 lower_wall move linear -0.01 0.0 0.0
fix             5 sphere rigid single

# Output settings
thermo          100
thermo_style    custom step time temp etotal press vol
dump            1 all custom 500 dump.fluid id type x y vx vy

# Run simulation
timestep        0.001
run             10000
