# LAMMPS Input Script for 2D Micelle Simulation

# Initialization
units lj
dimension 2
boundary p p p
atom_style bond

# Read initial data
read_data micelle_initial.data

# Define groups
group solvent type 1
group head type 2
group tail type 3

# Set up pair potentials
pair_style hybrid soft 1.0 lj/cut 2.5
pair_coeff * * soft 1.0 1.0
pair_coeff 1 1 lj/cut 0.5 1.0 2.5
pair_coeff 2 2 lj/cut 1.0 1.0 2.5
pair_coeff 3 3 lj/cut 0.8 1.0 2.5
pair_coeff 1 2 lj/cut 0.6 1.0 2.5
pair_coeff 1 3 lj/cut 0.4 1.0 2.5
pair_coeff 2 3 lj/cut 0.9 1.0 2.5

# Bond potentials
bond_style harmonic
bond_coeff * 30.0 1.5

# Soft potential push-off phase
variable prefactor equal ramp(0, 1.0)
fix push all adapt 1 pair soft a * * v_prefactor

# Equilibration with soft potential
fix temp_equil all temp/rescale 10 0.45 0.45 0.1 1.0
fix integrate all nve
fix enforce2d all enforce2d
timestep 0.005

thermo 50
thermo_style custom step temp pe ke etotal

run 5000

# Switch to Lennard-Jones potential for main simulation
unfix push
unfix temp_equil

# Re-define potentials for main simulation
pair_style lj/cut 2.5
pair_coeff 1 1 lj/cut 0.5 1.0 2.5
pair_coeff 2 2 lj/cut 1.0 1.0 2.5
pair_coeff 3 3 lj/cut 0.8 1.0 2.5
pair_coeff 1 2 lj/cut 0.6 1.0 2.5
pair_coeff 1 3 lj/cut 0.4 1.0 2.5
pair_coeff 2 3 lj/cut 0.9 1.0 2.5

# Main simulation
fix temp_main all temp/rescale 10 0.45 0.45 0.1 1.0
run 50000

# Uncomment the following lines for visual output
# dump myDump all atom 100 dump.micelle
# dump_modify myDump scale no
# dump image every 100 image.*.jpg type type

# Clean up
unfix temp_main
unfix integrate
unfix enforce2d
