units real
atom_style full
boundary p p p

read_data nylon_initial.data

pair_style lj/class2/coul/long 8.5
pair_coeff * *

bond_style class2
angle_style class2
dihedral_style class2
improper_style class2

kspace_style pppm 1.0e-4

neighbor 2.0 bin
neigh_modify every 1 delay 0 check yes

velocity all create 300.0 12345 mom yes rot yes dist gaussian

# Define molecular templates for nylon polymerization
molecule MonomerA monomerA.mol
molecule MonomerB monomerB.mol
molecule NylonIntermediate nylon_intermediate.mol
molecule Water water.mol

# Define fixes for the polymerization steps
fix step1 all bond/react \
    molecule MonomerA MonomerB NylonIntermediate Water \
    react yes react_coords yes react_bonds yes \
    map MonomerA 1 MonomerB 2 NylonIntermediate 1 Water 1 \
    bond yes angle yes dihedral yes improper yes

fix step2 all bond/react \
    molecule NylonIntermediate MonomerB NylonFinal Water \
    react yes react_coords yes react_bonds yes \
    map NylonIntermediate 1 MonomerB 2 NylonFinal 1 Water 1 \
    bond yes angle yes dihedral yes improper yes

# Integration settings
fix 1 all nve/limit 0.1

# Output settings
thermo 50
thermo_style custom step temp press density f_step1 f_step2

# Run the simulation
run 1000
