# LAMMPS Input Script for TIP4P/2005 Water Model with Quantum Effects

units real
atom_style full
boundary p p p

# Read data file
read_data data.h2o-quantum

# Define pair style and kspace style
pair_style lj/cut/tip4p/long 1 2 1 1 0.125 8.5
pair_coeff 1 1 0.1852 3.1589  # O-O interaction
pair_coeff 2 2 0.0000 0.0000  # H-H interaction
pair_coeff 1 2 0.0000 0.0000  # O-H interaction

kspace_style pppm/tip4p 1.0e-5

# Bond and angle styles
bond_style class2
angle_style harmonic

# Set initial velocities
velocity all create 800.0 12345 mom yes rot yes dist gaussian

# Define fixes
fix 1 all nve
fix 2 all gle 300.0 1.0 0.1 12345  # GLE thermostat targeting 300 K

# Output settings
thermo 100
thermo_style custom step temp pe ke etotal

# Run simulation
timestep 0.5
run 10000
