# LAMMPS input script for a molecular dynamics simulation of Lennard-Jones particles

units real
atom_style full

# Create simulation box and atoms
lattice fcc 0.8442
region box block 0 10 0 10 0 10
create_box 1 box
create_atoms 1 box

# Define LJ potential with a cutoff of 5.0
pair_style lj/cut 5.0
pair_coeff 1 1 0.238 3.405

# Set initial velocities
velocity all create 300.0 12345

# Define neighbor list
neighbor 0.3 bin
neigh_modify delay 5 every 1

# Define fixes
fix 1 all npt temp 300.0 300.0 1000.0 iso 0.0 0.0 10000.0
fix 2 all grem 400.0 -0.01 -30000

# Define thermo output
thermo_style custom step temp pe etotal press vol
thermo_modify press includes fix 2
thermo 10

# Run simulation
timestep 1.0
run 1000
