# LAMMPS input script for 3D molecular dynamics simulation of oxRNA2 model

units lj
dimension 3
atom_style hybrid bond ellipsoid oxdna

boundary p p p

# Read initial configuration from data file
read_data oxRNA2.data

# Set atomic masses (example masses, adjust based on actual model)
mass 1 1.0
mass 2 1.0

# Group atoms by type for potential application
group type1 type 1
group type2 type 2

# Define bond style and coefficients
bond_style fene
bond_coeff 1 30.0 1.5 1.0 0.5

# Define pair style and coefficients
pair_style hybrid/overlay oxdna_excluded_volume oxdna_stacking oxdna_hbond oxdna_cross_stacking oxdna_coaxial_stacking oxdna_debye
pair_coeff * * oxdna_excluded_volume 1.0 1.0
pair_coeff * * oxdna_stacking 1.0 1.0
pair_coeff * * oxdna_hbond 1.0 1.0
pair_coeff * * oxdna_cross_stacking 1.0 1.0
pair_coeff * * oxdna_coaxial_stacking 1.0 1.0
pair_coeff * * oxdna_debye 1.0 1.0 1.0

# Neighbor list settings
neighbor 2.0 bin
neigh_modify every 1 delay 0 check yes

# Balance and communication optimizations
balance 1.0 shift xyz
comm_modify vel yes

# Define integration style and timestep
fix 1 all nve/asphere
timestep 0.00001

# Output settings
thermo 1000
thermo_style custom step time etotal ke pe ebond temp
dump 1 all custom 5000 trajectory.dump id type x y z vx vy vz quatw quati quatj quatk

# Run simulation
run 100000

# Write final configuration
write_data final_configuration.data
