# LAMMPS input script for a weak electrolyte system with charge regulation

units           lj
atom_style      charge

# Create simulation box and atoms (this is an example, modify as needed)
lattice         sc 0.8442
region          box block 0 10 0 10 0 10
create_box      2 box
create_atoms    1 box
mass            1 1.0
mass            2 1.0

# Define interactions
pair_style      lj/cut/coul/long 12.5
pair_coeff      1 1 1.0 1.0
pair_coeff      2 2 1.0 1.0
pair_coeff      1 2 1.0 1.0

# Setup neighbor list and long-range electrostatics
neighbor        0.3 bin
neigh_modify    every 1 delay 0 check yes
kspace_style    ewald 1.0e-4

# Initialize velocities
velocity        all create 1.0 12345

# Define charge regulation
fix             1 all charge/regulation pH 7.0 pKa 6.0 pIm 3.0 pIp 3.0

# Integrate motion and maintain temperature
fix             2 all nve
fix             3 all langevin 1.0 1.0 0.1 12345

# Output settings
thermo          100
thermo_style    custom step temp pe etotal f_1

# Run the simulation
timestep        0.005
run             2000
