# LAMMPS Input Script for Hybrid Pair Potential with FEP

units           real
atom_style      full
boundary        p p p

# Read initial configuration from data file
read_data       system.data

# Define force field with hybrid pair potentials
pair_style      hybrid lj/cut/coul/long 10.0 12.0 soft 1.0
pair_coeff      * * lj/cut/coul/long 0.0 0.0  # Default for all pairs
pair_coeff      1 1 lj/cut/coul/long 0.1 3.5  # Example Lennard-Jones for type 1
pair_coeff      1 2 lj/cut/coul/long 0.15 3.5 # Example Lennard-Jones for type 1 and 2
pair_coeff      1 1 soft 0.0 0.0 3.5          # Example soft-core for FEP

# Coulombic interactions with PPPM for long-range corrections
kspace_style    pppm 1.0e-4

# Define bond and angle constraints using SHAKE
fix             shake_fix all shake 0.0001 20 0 b 1 a 1

# Define group for systems transitioning between states for FEP
group           fep_group type 1 2

# Apply a fix for free energy perturbation (FEP)
fix             fep_fix fep_group adapt/fep lambda 0.0 1.0 1000 \
                pair lj/cut/coul/long 1 1 scale 0 1 \
                pair soft 1 1 scale 1 0 \
                charge 1 scale 0.0 1.0

# Equilibration with NPT ensemble
fix             npt_fix all npt temp 300.0 300.0 100.0 iso 1.0 1.0 1000.0

# Output settings
thermo          100
thermo_style    custom step temp etotal ke pe press
dump            traj all atom 1000 trajectory.lammpstrj

# Run simulation for equilibration
timestep        1.0
run             50000

# Transition between states to compute free energy
fix_modify      fep_fix energy yes
run             100000

# Finalize
unfix           npt_fix
unfix           fep_fix
unfix           shake_fix
write_data      final_system.data

This script sets up a molecular dynamics simulation using LAMMPS with a hybrid approach that combines Lennard-Jones, Coulombic, and soft-core potentials. It includes SHAKE constraints for bond lengths and angles, and utilizes the PPPM method for long-range electrostatic interactions. The simulation is designed to compute free energy differences using a free energy perturbation (FEP) approach as the system transitions between different states.
