# LAMMPS input script for a bulk hydrogen system using the eFF model

# Initialize simulation
units real
atom_style electron
boundary p p p

# Read system configuration
variable sname string "hydrogen_data_file.data"
read_data ${sname}

# Define pair interactions
pair_style eff/cut 16.207559818252903
pair_coeff * *

# Set neighbor list parameters
neighbor 2.0 bin
neigh_modify every 1 delay 0 check yes page 1000000 one 200000

# Define computes
compute stressPerAtom all stress/atom virial
compute tempEff all temp/eff
compute pressureEff all pressure tempEff
compute ke all ke/eff
compute pePauli all pe/eff pauli
compute peCoulomb all pe/eff coulomb
compute peResidual all pe/eff residual

# Thermodynamic output
thermo_style custom step time temp c_tempEff press c_pressureEff pe c_ke c_pePauli c_peCoulomb c_peResidual
thermo 100

# Minimize energy
minimize 1.0e-4 1.0e-6 100 1000

# Define timestep and integrator
timestep 0.001
fix 1 all nve/eff

# Initialize velocities
velocity all create 20000.0 12345

# Output settings
dump 1 all custom 100 dump.lammpstrj id type x y z vx vy vz
dump 2 all xyz 100 dump.xyz

# Run the simulation
run 10000
