# LAMMPS input script for a Lennard-Jones fluid in a simple cubic lattice

units lj
atom_style atomic
boundary p p p

# Create a simple cubic lattice
lattice sc 0.5
region box block 0 8 0 8 0 8
create_box 1 box
create_atoms 1 box

# Define Lennard-Jones potential
pair_style lj/cut 2.5
pair_coeff 1 1 1.0 1.0 2.5

# Apply tail corrections
pair_modify tail yes

# Set initial velocities
velocity all create 1.0 12345 mom yes rot yes dist gaussian

# Define settings for output
thermo 100
thermo_style custom step temp pe ke etotal press density

# Equilibration in NVE ensemble
fix 1 all nve
run 1000

# Equilibration in NVT ensemble with Nosé-Hoover thermostat
unfix 1
fix 2 all nvt temp 1.0 1.0 100.0
run 1000

# Data production in NVT ensemble
dump 1 all xyz 100 lj_simulation.xyz
run 2000

# Clean up
unfix 2
undump 1
