# LAMMPS input script for molecular dynamics simulation of a molecular mixture

units real
atom_style full

# Read initial configuration from data file
read_data data.mixture

# Define interaction potentials
pair_style lj/cut/coul/long 12.0
pair_modify mix arithmetic
bond_style harmonic
angle_style harmonic

# Kspace style for long-range electrostatics
kspace_style pppm 1e-5

# Neighbor list settings
neighbor 2.0 bin
neigh_modify every 1 delay 0 check yes

# Define group for all atoms
group all type > 0

# Set up output for thermodynamic properties
thermo 10
thermo_style custom step temp etotal ke pe evdwl ecoul ebond eangle

# Define the integration fix
fix 1 all nve

# Run the simulation
timestep 0.01
run 20

# Clean up
unfix 1
