# LAMMPS input script for BCC lattice using SNAP potential

units metal
atom_style atomic
boundary p p p

# Create BCC lattice and unit cell
lattice bcc 3.16
region box block 0 4 0 4 0 4
create_box 1 box
create_atoms 1 box

# Assign mass to tungsten
mass 1 183.84

# Displace atoms slightly to introduce thermal motion
displace_atoms all random 0.01 0.01 0.01 12345

# Define potential using SNAP via MLIAP interface
pair_style mliap snap
pair_coeff * * snap_coeff.snap W

# Neighbor list settings
neighbor 2.0 bin
neigh_modify every 1 delay 0 check yes

# Initial velocities at 300 K
velocity all create 300.0 12345 dist gaussian

# Define settings for computing per-atom properties
compute pe_atom all pe/atom
compute stress_atom all stress/atom NULL

# Define computes for total energy and pressure
compute total_pe all reduce sum c_pe_atom
compute total_pressure all reduce sum c_stress_atom[1]

# Output thermodynamic information
thermo 10
thermo_style custom step temp c_total_pe etotal press

# Integrate using NVE ensemble
fix 1 all nve

# Run the simulation
timestep 0.0005
run 100
