# LAMMPS input script for 3D Lennard-Jones fluid simulation

units lj
atom_style atomic

# Define the simulation box
region box block 0 10 0 10 0 10
create_box 1 box

# Create atoms in an fcc lattice
lattice fcc 0.8442
create_atoms 1 box

# Define interatomic potential
pair_style lj/cut 2.5
pair_coeff 1 1 1.0 1.0 2.5

# Set initial velocities
velocity all create 1.44 87287

# Define groups
group all type 1

# Define NVE integration
fix 1 all nve

# Define Langevin thermostat
fix 2 all langevin 0.5 0.5 1.0 12345

# Custom fix for temperature control
fix 3 all temp/rescale 100 0.5 0.5 0.02 1.0

# Equilibration run
timestep 0.005
thermo 50
thermo_style custom step temp pe ke etotal
run 500

# Main simulation run
unfix 3  # Remove custom fix if not needed in main run
run 2500
