# LAMMPS Input Script for 3D MD Simulation of Argon in a Simple Cubic Lattice

units           lj
atom_style      atomic

# Define simulation box
lattice         sc 10.0
region          box block 0 10 0 10 0 10
create_box      1 box
create_atoms    1 box

# Define interaction potential
pair_style      lj/cut 8.5
pair_coeff      1 1 1.0 1.0

# Set initial velocities
velocity        all create 300.0 1234567 dist gaussian

# Define boundary conditions
boundary        p f p

# Define wall interactions with stochastic reflections
fix             walls all wall/reflect/stochastic ylo EDGE yhi EDGE 1.0 0.9 0.8 0.7 0.6 0.5

# Integrate equations of motion
fix             1 all nve

# Output settings
thermo          1000
thermo_style    custom step temp pe ke etotal press

# Run the simulation
run             10000
