# LAMMPS Input Script for Solvated Deca-Alanine Peptide Simulation

units           real
atom_style      full
boundary        p p p

# Read in the data file
read_data       deca_alanine.data

# Pair style and force field settings
pair_style      lj/charmm/coul/long 9.0 10.0
pair_modify     mix arithmetic
bond_style      harmonic
angle_style     charmm
dihedral_style  charmm
improper_style  charmm
kspace_style    pppm 1.0e-4

# Define non-bonded interaction parameters
special_bonds   charmm

# SHAKE algorithm for hydrogen constraints
fix             fixSHAKE all shake 0.0001 20 0 b 1 a 1

# Define groups for IMD
group           peptide id <= 103

# NPT ensemble for equilibration
timestep        2.0
fix             fixNPT all npt temp 300.0 300.0 100.0 iso 1.0 1.0 1000.0 drag 1.0

# Interactive Molecular Dynamics (IMD) setup
fix             fixIMD all imd 4000

# Output settings
thermo          100
thermo_style    custom step temp press pe ke etotal

# Run the simulation
run             5000000
