# LAMMPS Input Script for Silicon in Diamond Cubic Phase using MEAM/SW/spline Potential

# Initialize simulation
units           metal
dimension       3
boundary        p p p
atom_style      atomic

# Create lattice and simulation box
lattice         diamond 5.43
region          box block 0 1 0 1 0 1
create_box      1 box
create_atoms    1 box

# Define potential
pair_style      meam/spline
pair_coeff      * * Si.meam.spline Si

# Set mass
mass            1 28.0855

# Minimize energy with box relaxation
reset_timestep  0
thermo          10
thermo_style    custom step pe lx ly lz press
min_style       cg
fix             relax all box/relax aniso 0
minimize        1.0e-12 1.0e-12 10000 10000

# Calculate properties
variable        natoms equal "count(all)"
variable        Etotal equal "pe"
variable        Ecohesive equal "pe/v_natoms"
variable        V equal "vol"
variable        a0 equal "lx"
variable        vol_per_atom equal "vol/v_natoms"

# Output results
print           " "
print           "Simulation results for Silicon with MEAM/SW/spline Potential"
print           "------------------------------------------------------------"
print           "Cohesive energy per atom (eV): ${Ecohesive}"
print           "Lattice constant (Å): ${a0}"
print           "Atomic volume (Å^3/atom): ${vol_per_atom}"
print           "Number of atoms: ${natoms}"

# Compare with reference values
# Reference cohesive energy for Silicon: ~ -4.63 eV/atom
# Reference lattice constant for Silicon: ~ 5.43 Å

print           " "
print           "Reference values for Silicon"
print           "Cohesive energy (eV/atom): -4.63"
print           "Lattice constant (Å): 5.43"
print           " "

# End of script
