# LAMMPS input script for 2D polydisperse spheres with SRD fluid

units lj
dimension 2
boundary p p p
atom_style sphere

# Create large particles
lattice sq 0.7
region box block 0 30 0 30 -0.1 0.1
create_box 3 box
create_atoms 1 box basis 1 1 basis 2 2 basis 3 3

# Set diameters for large particles
set type 1 diameter 1.5
set type 2 diameter 2.0
set type 3 diameter 2.5

# Define repulsive Lennard-Jones potential
pair_style lj/cut 2.5
pair_coeff * * 1.0 1.0 2.5

# Initialize velocities
velocity all create 1.0 12345

# Time integration and constraints
fix 1 all nve
fix 2 all enforce2d

# Neighbor list settings
neighbor 0.3 bin
neigh_modify every 1 delay 0 check yes

# Simulation settings
timestep 0.001
thermo 100
thermo_style custom step temp pe ke etotal

# Equilibrate large particles
run 5000

# Add small particles on a high-density lattice
region smalls block 0 30 0 30 -0.1 0.1
lattice sq 1.2
create_atoms 4 region smalls

# Remove overlaps with large particles
delete_atoms overlap 0.4 all all

# Set up SRD fluid for small particles
group small type 4
fix 3 small srd 0.5 0.25 3.0 12345

# Continue simulation with SRD fluid
run 20000

# Output final configuration
write_restart final.restart
