# LAMMPS Input Script for Molecular Dynamics Simulation using MM3 Force Field

units           real
atom_style      full
boundary        p p p

# Read the initial configuration from a data file
read_data       complex_molecule.data

# Define the pair style and interaction parameters
pair_style      mm3/switch3/coulgauss/long 12.0
pair_modify     shift yes
kspace_style    pppm 1.0e-4

# Define the bonded interactions
bond_style      harmonic
angle_style     hybrid cosine/periodic cross/harmonic
dihedral_style  fourier
improper_style  distance

# Define the cutoff and switching function for MM3
pair_coeff      * * 12.0 4.0

# Group and Neighbor settings
neighbor        2.0 bin
neigh_modify    delay 5 every 1 check yes

# Define the simulation settings
timestep        0.5
thermo_style    custom step temp etotal ke press
thermo          100

# Define the NPT ensemble settings
fix             1 all npt temp 300.0 300.0 100.0 iso 1.0 1.0 1000.0 aniso 1.0 1.0 1000.0

# Run the simulation for 10,000 timesteps
run             10000
