units real
atom_style full

read_data CH4.dat

pair_style hybrid/overlay reax/c NULL zbl 4.0
pair_coeff * * reax/c ffield.reax.CH C H
pair_coeff * * zbl

neighbor 2.0 bin
neigh_modify every 1 delay 0 check yes

timestep 0.25

thermo 100
thermo_style custom step temp etotal

fix 1 all nve
fix 2 all temp/berendsen 500.0 500.0 100.0

run 3000

unfix 1
unfix 2
