# LAMMPS input script for 2D Lennard-Jones Poiseuille flow

# Initialization
units lj
dimension 2
boundary p s s
atom_style atomic

# Create simulation box
lattice hex 0.9
region simbox block 0 20 0 10 -0.1 0.1
create_box 3 simbox

# Create atoms
region fluid block 0 20 1 9 -0.1 0.1
create_atoms 1 region fluid

region bottom block 0 20 0 1 -0.1 0.1
create_atoms 2 region bottom

region top block 0 20 9 10 -0.1 0.1
create_atoms 3 region top

# Define LJ potential
pair_style lj/cut 1.12246
pair_coeff * * 1.0 1.0 1.12246

# Define groups
group fluid type 1
group bottom type 2
group top type 3

# Set velocity and temperature
velocity fluid create 1.0 12345
fix 1 all enforce2d
fix 2 fluid nve

# Apply forces
variable fx equal 0.1
variable fy equal -0.1
fix 3 fluid addforce ${fx} 0.0 0.0
fix 4 top addforce 0.0 ${fy} 0.0

# Output settings
thermo 500
thermo_style custom step temp pe ke etotal

# Run simulation
timestep 0.003
run 10000
