units lj
atom_style hybrid bond ellipsoid oxDNA
boundary p p p

read_data dna_duplex.data

pair_style oxDNA
bond_style fene

pair_coeff * *
bond_coeff * 30.0 1.5

neighbor 1.0 bin
neigh_modify delay 0 every 1 check yes

fix 1 all langevin 0.1 0.1 1.0 12345
fix 2 all nve/asphere

thermo 1000
thermo_style custom step temp etotal ke pe ebond eangle edihed eimp evdwl ecoul elong

timestep 0.00001

dump 1 all custom 10000 dump.dna id type x y z ix iy iz mux muy muz

run 1000000

unfix 1
unfix 2
