# LAMMPS Input Script for Solvated 5-mer Peptide Simulation using CHARMM Force Field

units real
atom_style full
boundary p p p

# Read in data file for initial configuration
read_data peptide_data.lmp

# Define force field styles
pair_style lj/charmm/coul/long 8.0 10.0
bond_style harmonic
angle_style charmm
dihedral_style charmm
improper_style charmm

# Set special bonds for CHARMM force field
special_bonds charmm

# Define kspace style for long-range electrostatics
kspace_style pppm 0.0001

# Group definitions
group peptide type 1
group solvent type 2
group group1 id 1 2 3
group group2 id 4 5

# Apply constraints using SHAKE
fix shake_constraints all shake 0.0001 20 0 b 1 2 a 1

# Define NVT ensemble for maintaining temperature
fix nvt_thermostat peptide nvt temp 275.0 275.0 100.0

# Apply harmonic spring force between two groups
fix spring_force all spring couple group1 group2 10.0

# Define thermodynamic output
thermo_style custom step temp etotal pe ke f_spring_force
thermo 10

# Run the simulation
timestep 1.0
run 100

# End of script
