# LAMMPS Input Script for Complex Molecular System Simulation

units real
atom_style full
boundary p p p

# Read data file
read_data complex_system.data

# Define pair styles
pair_style hybrid/overlay lj/cut/coul/long 10.0 12.0
pair_coeff * * lj/cut/coul/long 0.0 0.0 0.0 # Placeholder, specify for atom types

# Define bond and angle styles
bond_style harmonic
angle_style harmonic

# Special bonds settings for non-bonded interactions
special_bonds lj/coul 0.0 0.0 0.5

# Kspace style for long-range electrostatics
kspace_style pppm 1.0e-4

# SHAKE constraints
fix shake_constraints all shake 0.0001 20 0 b 1 2 a 1

# Initialize velocities
velocity all create 300.0 12345 dist gaussian

# Equilibration using NPT ensemble
fix npt_equilibration all npt temp 300.0 300.0 100.0 iso 1.0 1.0 1000.0

# Free Energy Perturbation (FEP) setup
fix fep all adapt 1000 pair lj/cut/coul/long epsilon * * v_lambda v_lambda
variable lambda equal ramp(0.0,1.0)

# Thermodynamic output
thermo 100
thermo_style custom step temp press pe ke etotal

# FEP output
fix fep_output all print 100 "Step: ${step}, Lambda: ${lambda}, Energy: ${etotal}" file fep_output.txt

# Dump trajectory for analysis
dump traj all atom 500 trajectory.lammpstrj
dump_modify traj sort id

# Run the simulation
timestep 1.0
run 50000

# Unfix and finalize
unfix shake_constraints
unfix npt_equilibration
unfix fep
unfix fep_output

This script sets up a molecular dynamics simulation in LAMMPS using the specified methods and settings. It includes a Free Energy Perturbation (FEP) calculation to study solvation effects, outputting thermodynamic and FEP data periodically, and dumping the trajectory for further analysis. Adjust the pair coefficients and SHAKE constraints as needed for your specific molecular system.
