units real
atom_style full
boundary p p p

# Read data file
read_data data.molecular_system

# Define pair styles
pair_style hybrid lj/cut/coul/long 12.0 lj/cut/coul/long/soft 12.0

# Define pair coefficients
pair_coeff * * lj/cut/coul/long 0.0 0.0    # Default for all interactions
pair_coeff 1 2 lj/cut/coul/long 0.093 3.50 # C-F interaction
pair_coeff 1 1 lj/cut/coul/long 0.070 3.40 # C-C interaction
pair_coeff 2 2 lj/cut/coul/long 0.080 3.10 # F-F interaction
pair_coeff 3 3 lj/cut/coul/long 0.030 2.50 # H-H interaction
pair_coeff 4 4 lj/cut/coul/long 0.095 3.50 # O-O interaction

# Define soft potential for lambda-dependent interactions
pair_coeff 1 3 lj/cut/coul/long/soft 0.050 3.50 1.0 0.0 0.0 0.0

# Kspace style for long-range interactions
kspace_style pppm 1.0e-4

# Neighbor settings
neighbor 2.0 bin
neigh_modify every 1 delay 0 check yes

# Define groups
group hydrogen type 3
group all except_hydrogen subtract all hydrogen

# Apply SHAKE to constrain bonds involving hydrogen
fix shake_bonds hydrogen shake 0.0001 20 0 b 1 a 1

# Initial velocities
velocity all create 300.0 12345

# Equilibration with NPT
fix npt all npt temp 300.0 300.0 100.0 iso 1.0 1.0 1000.0

# Run equilibration
timestep 1.0
thermo 1000
thermo_style custom step temp press etotal
run 10000

# Switch to NVT ensemble for production
unfix npt
fix nvt all nvt temp 300.0 300.0 100.0

# Free energy perturbation (FEP) calculation
fix fep all adapt/fep 100 every 100 lambda 0.0 1.0 0.01 &
    pair coul/long/soft scale 1 3 v_lambda &
    pair lj/cut/coul/long/soft scale 1 3 v_lambda

# Output settings
dump traj all custom 5000 traj.lammpstrj id type x y z
dump_modify traj sort id
thermo 1000
thermo_style custom step temp press etotal pe ke

# Run production phase
run 50000

# Clean up
unfix nvt
unfix shake_bonds
unfix fep

This script sets up a molecular dynamics simulation in LAMMPS, incorporating the specified interactions, constraints, and output requirements. Make sure to replace `data.molecular_system` with the actual data file containing your molecular system.
