# LAMMPS Input Script for a Solvated 5-mer Peptide Simulation

units real
atom_style full
boundary p p p

# Read initial configuration from a data file
read_data peptide_data.lmp

# Define force field parameters
pair_style lj/charmm/coul/long 8.0 10.0
pair_coeff * *

bond_style harmonic
angle_style charmm
dihedral_style charmm
improper_style harmonic

# Define kspace solver for long-range electrostatics
kspace_style pppm 1.0e-4

# Define groups for specific atoms and collective variables
group peptide type 1 2 3
group solvent type 4 5 6

# Temperature control using Nosé-Hoover thermostat
fix 1 all nvt temp 275.0 275.0 100.0

# Apply SHAKE algorithm to constrain bonds involving hydrogen atoms
fix 2 all shake 0.0001 20 0 b 1 a 1

# Collective variable analysis
fix 3 all colvars colvars.in output colvars_output.txt

# Set timestep size
timestep 2.0

# Output settings for thermodynamic properties
thermo 10
thermo_style custom step temp etotal pe ke

# Run the simulation
run 100

Ensure to prepare necessary files like `peptide_data.lmp` and `colvars.in` before running the script. Adjust `pair_coeff` and other parameters according to your specific system requirements.
