# LAMMPS input script for NEMD simulation using eHEX/a algorithm

units lj
atom_style atomic
boundary p p p

# Read pre-equilibrated configuration
read_data data.lj

# Define Lennard-Jones potential with shifted-force modification
pair_style lj/cut 3.0
pair_modify shift yes
pair_coeff * * 1.0 1.0 3.0

# Define regions for high and low temperature reservoirs
region hot block INF INF INF INF 0 10
region cold block INF INF INF INF 90 100

# Apply heat flux using eHEX/a algorithm
fix heat_exchange all ehex 1.0 0.15 100 hot cold

# Integrate equations of motion using velocity Verlet algorithm
fix 1 all nve

# Set timestep
timestep 0.007

# Output settings
thermo 100
thermo_style custom step temp etotal v_cm[3]

# Output temperature profile every 500 timesteps
compute temp_profile all temp/profile 1 1 1 z 10
fix 2 all ave/spatial 1 500 500 z lower 0.1 v_temp_profile file out.Tlj_ehex ave running

# Output total energy every 100 timesteps
fix 3 all ave/time 1 100 100 c_thermo_etotal file out.Elj_ehex ave running

# Run the simulation
run 5000
