# LAMMPS input script for 3D Lennard-Jones fluid simulation

units lj
atom_style atomic

# Define simulation box
lattice fcc 0.8442
region box block 0 4 0 4 0 4
create_box 1 box
create_atoms 1 box

# Define the Lennard-Jones potential
pair_style lj/cut 2.5
pair_coeff 1 1 1.0 1.0 2.5

# Set initial velocities
velocity all create 1.44 12345

# Define the neighbor list
neighbor 0.3 bin
neigh_modify every 20 delay 0 check no

# Define the NVE ensemble
fix 1 all nve

# Run the simulation
variable fx atom fx
variable fy atom fy
variable fz atom fz

run 10
