# LAMMPS input script for a simulation of a simple rigid body system

units lj
atom_style atomic

# Create a simple cubic lattice of atoms
lattice sc 1.0
region box block 0 10 0 10 0 10
create_box 1 box

# Create nine clumps (rigid bodies) of atoms
create_atoms 1 random 90 12345 box

# Define interatomic potential
pair_style lj/cut 2.5
pair_coeff 1 1 1.0 1.0 2.5

# Define groups for rigid body clumps
group clump1 id 1:10
group clump2 id 11:20
group clump3 id 21:30
group clump4 id 31:40
group clump5 id 41:50
group clump6 id 51:60
group clump7 id 61:70
group clump8 id 71:80
group clump9 id 81:90

# Exclude self-interactions within each clump
neigh_modify exclude group clump1 clump1
neigh_modify exclude group clump2 clump2
neigh_modify exclude group clump3 clump3
neigh_modify exclude group clump4 clump4
neigh_modify exclude group clump5 clump5
neigh_modify exclude group clump6 clump6
neigh_modify exclude group clump7 clump7
neigh_modify exclude group clump8 clump8
neigh_modify exclude group clump9 clump9

# Initialize velocities
velocity all create 100.0 12345

# Set up the rigid body dynamics
fix 1 all poems file unconnected-bodies.dat

# Run parameters
timestep 0.0001
thermo 50

# Run the simulation
run 10000

# Uncomment these lines to output atom positions, images, and movies
# dump 1 all atom 100 dump.atom
# dump 2 all image 100 image.*.jpg type type
# dump 3 all movie 100 movie.mpg type type
