# LAMMPS input script for 3D molecular dynamics simulation of a DNA-like system using oxDNA2 model

# Initialize simulation
units real
atom_style hybrid bond ellipsoid oxDNA

# Read initial configuration
read_data dna_system.data

# Set mass for atom types
mass 1 1.0
mass 2 1.0
mass 3 1.0

# Group atoms by type
group type1 type 1
group type2 type 2
group type3 type 3

# Define potentials for interactions
pair_style hybrid/overlay oxDNA2/excluded oxDNA2/stack oxDNA2/hbond oxDNA2/crossstack oxDNA2/coaxstack oxDNA2/debye
pair_coeff * * oxDNA2/excluded
pair_coeff * * oxDNA2/stack
pair_coeff * * oxDNA2/hbond
pair_coeff * * oxDNA2/crossstack
pair_coeff * * oxDNA2/coaxstack
pair_coeff * * oxDNA2/debye 0.2

bond_style fene/oxDNA
bond_coeff * 30.0 1.0 1.0

# Set neighbor list parameters
neighbor 2.0 bin
neigh_modify every 1 delay 0 check yes

# Define simulation settings
fix 1 all nve/asphere
fix temp all temp/berendsen 300.0 300.0 100.0

# Balance and communication optimization
balance 1.0 shift xyz 10 1.0
comm_modify mode single cutoff 2.0

# Thermodynamic output
thermo 1000
thermo_style custom step temp ke pe etotal
thermo_modify lost ignore

# Output settings
dump 1 all custom 1000 dna_trajectory.lammpstrj id type x y z mux muy muz
dump_modify 1 sort id
restart 10000 dna_restart.*

# Run the simulation
timestep 0.01706
run 100000

# Write final configuration
write_data dna_final.data
