# LAMMPS Input Script for 2D Lennard-Jones System

# Initialize simulation
units lj
dimension 2
atom_style atomic

# Create simulation box
lattice sq 0.8442
region box block 0 20 0 20 -0.1 0.1
create_box 1 box
create_atoms 1 box

# Set mass and initialize velocities
mass 1 1.0
velocity all create 5.0 12345

# Define interaction potential
pair_style lj/cut 2.5
pair_modify shift yes
pair_coeff 1 1 1.0 1.0 2.5

# Define settings for constraints and integration
fix 1 all enforce2d
fix 2 all nve

# Output settings
thermo 100

# Run the simulation
run 1000

# Energy minimization
unfix 2
min_style cg
minimize 1.0e-4 1.0e-6 100 1000
