# LAMMPS input script for simulating magnetic and thermal properties of bcc iron

units metal
atom_style atomic
atom_modify map array

# Create a 3D periodic box
boundary p p p

# Define the lattice and create the simulation box
lattice bcc 2.8665
region box block 0 10 0 10 0 10
create_box 1 box
create_atoms 1 box

# Define masses and magnetic moments
mass 1 55.845
set type 1 spin 2.2 0.0 0.0 1.0

# Define potentials and interactions
pair_style hybrid/overlay eam/alloy spin/exchange 1.0 spin/neel 1.0
pair_coeff * * eam/alloy Fe_mm.eam.alloy Fe
pair_coeff * * spin/exchange 1.0
pair_coeff * * spin/neel 1.0

# Initialize velocities and spins
velocity all create 400.0 12345 mom yes rot yes dist gaussian

# Define neighbor list
neighbor 2.0 bin
neigh_modify every 1 delay 0 check yes

# Set up the integrator
fix 1 all nve/spin
fix 2 all langevin 200.0 200.0 0.1 987654
fix 3 all langevin/spin 200.0 200.0 0.1 123456

# Thermodynamic output
thermo 200
thermo_style custom step temp pe ke etotal press spme elat

# Dump output for visualization
dump 1 all custom 200 dump.magnetic id type x y z mux muy muz

# Run the simulation
timestep 0.001
run 200000
