# LAMMPS Input Script for AtC Simulation with Periodic Boundary Conditions
# Elastic behavior of a material using AtC package

units           metal
dimension       3
boundary        p p p

atom_style      atomic

# Create FCC lattice
lattice         fcc 5.25623
region          simbox block 0 100 0 10 0 10
create_box      1 simbox

# Initialize empty atom system
create_atoms    1 box

# Read material properties from external file
fix             atc all atc
fix_modify      atc property material external Ar_elastic.mat

# Define mesh
fix             mesh all atc mesh create 3d 25 1 1 p p p

# Set initial conditions
fix             setICs all atc set initial
fix_modify      setICs velocity 0.0 0.0 0.0
fix_modify      setICs displacement 0.0 0.0 0.0

# Create node sets for boundary conditions
fix             leftBC all atc node set group leftBC nodeset xlo
fix             rightBC all atc node set group rightBC nodeset xhi

# Apply boundary conditions
fix             applyBC all atc boundary displacement set leftBC 0.0 0.0 0.0
variable        step equal step
variable        disp equal 0.001*step
fix             deformBC all atc boundary displacement set rightBC v_disp 0.0 0.0

# Thermodynamic output
thermo          100
thermo_style    custom step time temp press vol

# Run simulation
timestep        20
run             3000
