# LAMMPS Input Script for Silicon Lattice with PKA and Electronic Stopping

units           metal
dimension       3
boundary        p p p
atom_style      atomic

# Define the lattice and create the simulation box
lattice         diamond 5.431
region          simbox block 0 10 0 10 0 10
create_box      1 simbox
create_atoms    1 box

# Define interactions using Tersoff/ZBL potential
pair_style      tersoff/zbl
pair_coeff      * * Si.tersoff.zbl Si

# Initialize velocities and set temperature
velocity        all create 300 12345 mom yes rot yes dist gaussian

# Set velocity for the Primary Knock-on Atom (PKA)
group           pka id 1
velocity        pka set 1.0 0.0 0.0  # Example velocity

# Define fixes
fix             1 all nve
fix             2 all dt/reset 10 0.001 0.01 0.1 units box
fix             3 all electron/stopping/fit 0.0 0.0 0.1 0.01  # Example parameters

# Thermodynamic settings
thermo          5
thermo_style    custom step temp pe ke f_3

# Run the simulation
timestep        0.001
run             100
