# LAMMPS input script for simulating DNA duplexes using oxDNA2 model

# Initialization
units real
dimension 3
boundary p p p
atom_style hybrid bond ellipsoid

# Read data file
read_data dna_duplexes.data

# Pair style and coefficients for oxDNA2 model
pair_style hybrid/overlay lj/cut 1.1225 coul/debye 7.0 1.0
bond_style fene

# Define interaction coefficients (example values, adjust as needed)
pair_coeff * * lj/cut 0.2 1.0 # Excluded volume
pair_coeff * * coul/debye 1.0 1.0 # Debye-Hückel electrostatics

# Bond coefficients
bond_coeff * 30.0 1.5 1.0 1.0 # FENE parameters: K, R0, epsilon, sigma

# Simulation settings
neighbor 0.3 bin
neigh_modify every 1 delay 0 check yes

# Integrate using NVE ensemble
fix 1 all nve/asphere

# Timestep
timestep 0.01706

# Output settings
thermo 100
thermo_style custom step temp ke pe etotal
thermo_modify lost warn

# Dump settings for trajectory output
dump 1 all custom 1000 trajectory.lammpstrj id type x y z mux muy muz

# Balance load across processors
balance 1.0 shift xyz 10

# Run the simulation
run 10000

# Save the final configuration
write_restart dna_duplexes.restart
