# LAMMPS input script for rigid body simulation with Lennard-Jones units

units lj
atom_style atomic

# Create nine groups of unconnected rigid bodies
lattice fcc 0.8442
region box block 0 10 0 10 0 10
create_box 1 box

# Create clumps of atoms for the rigid bodies
create_atoms 1 single 1 1 1
create_atoms 1 single 3 1 1
create_atoms 1 single 1 3 1
create_atoms 1 single 3 3 1
create_atoms 1 single 1 1 3
create_atoms 1 single 3 1 3
create_atoms 1 single 1 3 3
create_atoms 1 single 3 3 3
create_atoms 1 single 2 2 2

# Define mass
mass 1 1.0

# Define interactions
pair_style lj/cut 2.5
pair_coeff 1 1 1.0 1.0 2.5

# Initial velocities
velocity all create 100.0 12345

# Define rigid bodies
group body1 id 1 2 3 4 5 6 7 8 9
fix 1 body1 rigid/nve single

# Neighbor list settings
neighbor 0.3 bin
neigh_modify every 1 delay 0 check yes exclude type 1 1

# Output settings
thermo 50
thermo_style custom step temp pe ke etotal

# Uncomment the following lines for visualization and data output
# dump 1 all atom 100 dump.rigid
# dump_modify 1 scale yes

# Run simulation
timestep 0.0001
run 10000
