# LAMMPS input script for 2D indentation on hexagonal lattice

units           lj
dimension       2
atom_style      atomic
boundary        p s p

# Create a hexagonal close-packed lattice
lattice         hex 0.8442
region          box block 0 50 0 50 -0.1 0.1
create_box      2 box
create_atoms    1 box

# Define regions and groups
region          lower block INF INF INF 1 INF INF
region          mobile block INF INF 1 INF INF INF

group           lower region lower
group           mobile subtract all lower

# Set atom types for boundary condition
set             group lower type 2

# Lennard-Jones potential
pair_style      lj/cut 2.5
pair_coeff      1 1 1.0 1.0 2.5
pair_coeff      1 2 1.0 1.0 2.5
pair_coeff      2 2 1.0 1.0 2.5

# Initial velocities
velocity        mobile create 0.1 12345

# Fixes
fix             1 lower setforce 0.0 0.0 0.0
fix             2 mobile nve
fix             3 mobile temp/rescale 100 0.1 0.1 0.02 1.0

# Define an indenter as a moving sphere
variable        R equal 5.0
variable        initialY equal 30
variable        indenterY equal "v_initialY - (step/1000.0)"

fix             4 all indent 10.0 sphere 25.0 v_indenterY 0.0 v_R

# Output settings
thermo          1000
thermo_style    custom step time temp pe ke etotal
dump            1 all custom 1000 dump.indent id type x y z

# Run the simulation with indenter
run             30000

# Unfix the indenter and allow relaxation
unfix           4
run             30000
