# LAMMPS input script for ethanol with polarization and complex force field

units real
atom_style full
boundary p p p

# Read data file
read_data ethanol.data

# Define groups for atoms and Drude particles
group atoms type 1 2 3  # example types for C, H, O
group drude type 4      # example type for Drude particles

# Define pair styles
pair_style hybrid/overlay lj/cut/coul/long 10.0 10.0 thole 0.2
pair_coeff * * lj/cut/coul/long 0.2 3.5
pair_coeff * * thole 0.02

# Define bond, angle, and dihedral styles
bond_style harmonic
bond_coeff * 450.0 1.0  # example values

angle_style harmonic
angle_coeff * 55.0 109.5  # example values

dihedral_style opls
dihedral_coeff * 1.0 0.0 0.5 0.0  # example values

# Kspace style for long-range Coulomb interactions
kspace_style ewald 1.0e-4

# Fixes for temperature and pressure control
fix 1 drude langevin 300.0 300.0 100.0 12345
fix 2 all nph iso 1.0 1.0 1000.0

# Apply SHAKE algorithm to constrain bonds with hydrogen
fix 3 all shake 0.0001 20 0 b 1 a 1

# Set timestep
timestep 0.5

# Output settings
thermo 100
thermo_style custom step temp etotal ke

# Run the simulation
run 2000
