# LAMMPS Input Script for Graphene-Ionic Liquid Supercapacitor Simulation

# Initialize simulation
units real
dimension 3
boundary p p f
atom_style full

# Read data file containing graphene and ionic liquid configuration
read_data data.supercapacitor

# Include external settings file
include settings.mod

# Define groups for electrodes
group bottom_electrode type 1
group top_electrode type 2
group ionic_liquid subtract all bottom_electrode top_electrode

# Set up the kspace and long-range electrostatics
kspace_style pppm 1.0e-4
kspace_modify slab 3.0

# Define pair styles and coefficients (example)
pair_style lj/cut/coul/long 10.0
pair_coeff * * 0.0 0.0
pair_coeff 3 3 0.1 3.5
pair_coeff 4 4 0.1 3.5
pair_coeff 3 4 0.1 3.5

# Define fixes for electrode potential
fix bottom_potential bottom_electrode electrode/conp 0.0
fix top_potential top_electrode electrode/conp 2.0 ramp 2.0 4.0

# Set up compute for thermodynamic properties
compute temp_ionic ionic_liquid temp
compute charge_bottom bottom_electrode property/atom q
compute charge_top top_electrode property/atom q
compute energy all reduce sum c_thermo_pe

# Define output settings
thermo 50
thermo_style custom step temp c_temp_ionic pe etotal c_charge_bottom c_charge_top

# Run the simulation
timestep 1.0
run 500
