# LAMMPS input script for BCC metal lattice with MLIAP using SNAP potential

units           metal
dimension       3
boundary        p p p

atom_style      atomic

# Create BCC lattice
lattice         bcc 3.316
region          mybox block 0 10 0 10 0 10
create_box      1 mybox
create_atoms    1 box

mass            1 180.88

# Define and initialize machine learning interatomic potential
pair_style      mlip snap
pair_coeff      * * relu1hidden.mliap.pytorch

# Compute per-atom properties
compute         peatom all pe/atom
compute         stressatom all stress/atom NULL

# Output settings
thermo_style    custom step temp pe etotal press
thermo          10

# Velocity initialization
velocity        all create 300.0 12345

# Integrate using NVE ensemble
fix             1 all nve

# Run the simulation
timestep        0.0005
run             100
