# LAMMPS input script for a 3D Lennard-Jones melt simulation using MDI protocol

units lj
atom_style atomic

# Define simulation box dimensions using index variables
variable x index 10
variable y index 10
variable z index 10

lattice fcc 0.8442
region box block 0 ${x} 0 ${y} 0 ${z}
create_box 1 box
create_atoms 1 box

mass 1 1.0

# Initial velocity settings
velocity all create 1.44 87287

# Pair potential settings
pair_style lj/cut 2.5
pair_coeff 1 1 1.0 1.0 2.5

# Neighbor list settings
neighbor 0.3 bin
neigh_modify every 1 delay 0 check yes

# Fix for microcanonical ensemble
fix 1 all nve

# Uncomment below for NPT ensemble
#fix 1 all npt temp 1.44 1.44 0.1 iso 1.0 1.0 1.0

# MDI protocol with quantum mechanical interface
fix 2 all mdi/qm virial

# Output thermodynamic properties every timestep
thermo 1
thermo_style custom step temp pe etotal press vol

# Run the simulation
run 10
