# LAMMPS input script for a solvated 5-mer peptide simulation using CHARMM force field

# Initialize simulation
units real
atom_style full
boundary p p p

# Read data file
read_data data.peptide

# Force field settings
pair_style lj/charmm/coul/long 8.0 10.0
pair_coeff * *

bond_style harmonic
angle_style charmm
dihedral_style charmm
improper_style charmm

kspace_style pppm 0.0001

# Define groups
group peptide type 1
group solvent type 2

# Define reference atom and constrained groups
group group1 id 1:5
group group2 id 6:10
variable refAtom equal 11

# Apply harmonic spring force
fix spring1 group1 spring/self 10.0 v_refAtom
fix spring2 group2 spring/self 10.0 v_refAtom

# Fix the reference atom in space
fix freeze refAtom setforce 0.0 0.0 0.0

# Apply SHAKE algorithm to maintain rigid bonds involving hydrogen
fix shake all shake 0.0001 20 0 b 1 a 1

# Set up the thermostat
fix nvt all nvt temp 275.0 275.0 100.0

# Output settings
thermo_style custom step temp etotal pe ke f_spring1[1] f_spring1[2] f_spring1[3] f_spring2[1] f_spring2[2] f_spring2[3]
thermo 10

# Simulation settings
timestep 2.0
run 100
