# LAMMPS input script for quantum molecular dynamics simulation using AWPMD

# Initialize simulation
units           hartree
atom_style      wavepacket
boundary        p p p

# Read initial configuration
variable        sname string "data.awpmd"
read_data       ${sname}

# Define pair style and coefficients
pair_style      awpmd/cut 10.0
pair_coeff      * *

# Define timestep
timestep        0.001

# Define fix for time integration using AWPMD
fix             1 all nve/awpmd

# Compute properties
compute         ke all ke/atom
compute         pe all pe/atom
compute         stress all stress/atom
compute         pauli all awpmd/pauli
compute         elec all awpmd/electrostatic
compute         restraint all awpmd/restraint

# Thermodynamics output
thermo          1
thermo_style    custom step time temp etotal pe ke c_pauli c_elec c_restraint press

# Run the simulation for 10 timesteps
run             10
