# LAMMPS input script for a solvated 5-mer peptide using CHARMM force field

# Initialize simulation
units real
atom_style full
boundary p p p

# Read data file
read_data data.peptide

# Define force field
pair_style lj/charmm/coul/long 10.0 12.0
bond_style harmonic
angle_style charmm
dihedral_style charmm
improper_style harmonic
kspace_style pppm 1.0e-4

# Define interactions
pair_modify mix arithmetic

# Group definitions
group peptide type 1 2 3 4 5 # Assuming these types correspond to the peptide

# SHAKE constraints on water (assumes water is type 6)
fix shake_constraints all shake 0.0001 20 0 b 1 a 1

# Initial velocities
velocity all create 275.0 12345

# Apply thermostat
fix nvt_thermostat all nvt temp 275.0 275.0 100.0

# Output settings
thermo 50
thermo_style custom step temp press etotal

# Uncomment to enable dump commands if needed
# dump myDump all atom 10 dump.peptide
# dump myImage all image 10 image.*.jpg type type
# dump_modify myImage pad 5
# dump myMovie all movie 10 movie.mpg type type

# Run simulation
timestep 2.0
run 300
