# LAMMPS input script for a charged particle system with electrostatic interactions

units lj
atom_style charge

# Create a simulation box
region box block 0 10 0 10 0 10
create_box 1 box

# Create atoms with charge
create_atoms 1 random 100 12345 box
set type 1 charge 1.0

# Set initial velocities to zero
velocity all create 0.0 12345 mom yes rot yes dist gaussian

# Define pair and kspace styles
pair_style zero 2.5
pair_coeff * *

kspace_style scafacos p2nfft 1.0e-4

# Set the timestep
timestep 0.005

# Define the integration method
fix 1 all nve

# Output settings
thermo 10
thermo_style custom step temp pe ke etotal ecoul press

# Uncomment the following lines to output trajectories and properties
# dump 1 all atom 10 dump.lammpstrj
# dump_modify 1 sort id

# dump 2 all custom 10 dump.custom id type x y z charge
# dump 3 all cfg 10 dump.*.cfg id type xs ys zs

# Run the simulation
run 100
