# LAMMPS input script for molecular dynamics simulation of bulk titanium using hcp lattice

# Initialize simulation
units metal
dimension 3
boundary p p p
atom_style atomic

# Define lattice parameters
variable a equal 2.95  # Lattice constant in Angstroms
variable covera equal 1.588  # c/a ratio for hcp lattice

# Create custom hcp lattice
lattice custom ${a} &
    a1 1.0 0.0 0.0 &
    a2 0.5 sqrt(3.0)/2.0 0.0 &
    a3 0.0 0.0 ${covera} &
    basis 0.0 0.0 0.0 &
    basis 0.5 1/6 0.5 &
    basis 1/2 2/3 0.0 &
    basis 0.0 1/3 0.5

# Create simulation box
region box prism 0 10 0 10 0 10 0.0 0.0 0.0 units lattice
create_box 1 box
create_atoms 1 box

# Define potential
pair_style meam/sw/spline
pair_coeff * * Ti.meam Ti Ti

# Define neighbor settings
neighbor 2.0 bin
neigh_modify delay 10 every 1 check yes

# Set initial velocities
velocity all create 300.0 12345 mom yes dist gaussian

# Define simulation settings
timestep 0.002
fix 1 all nve

# Output settings
thermo 10
thermo_style custom step temp pe ke etotal press vol

# Run the simulation
run 2000
