# LAMMPS input script for a 2D simulation of a square lattice with custom triclinic box

# Initialize simulation
units lj
dimension 2
boundary p p p
atom_style atomic

# Define lattice and region
variable a equal 1.0
lattice custom ${a} a1 1.0 0.0 0.0 a2 0.5 0.86602540378 0.0
region box block 0 10 0 10 -0.5 0.5 units lattice

# Create simulation box and atoms
create_box 1 box
create_atoms 1 box

# Set masses
mass 1 1.0

# Define pair style and interactions
pair_style lj/cut 1.1
pair_coeff 1 1 1.0 1.0

# Set output settings
thermo 10
thermo_style custom step pe lx ly lz pxx pyy pzz

# Write initial configuration to a data file
write_data initial_configuration.data

# Dump atom positions and types
dump 1 all atom 10 dump_atoms.lammpstrj

# Run simulation (0 steps to focus on setup)
run 0
