# LAMMPS input script for peridynamic simulation of a cylindrical target impacted by a spherical projectile

units           si
atom_style      atomic
dimension       3
boundary        f f f

# Define lattice and target geometry
lattice         sc 1.0
region          target cylinder z 0.0 0.0 0.005 0.0 0.02 units box
create_box      2 target
create_atoms    1 region target

# Define material properties
mass            1 2.75e-26  # Mass of atom (2200 kg/m³ * 1.25e-10 m³/atom)
pair_style      peri/ves
pair_coeff      * * 3.5e8 0.005 1.25e-10

# Initialize velocities
velocity        all create 0.0 12345

# Define projectile
region          projectile sphere 0.0 0.0 0.03 0.002 units box
create_atoms    2 region projectile
group           projectile region projectile

# Set initial velocity of the projectile
velocity        projectile set 0.0 0.0 -1000.0

# Define groups
group           target region target

# Define fix for time integration
fix             1 all nve

# Define output settings
thermo          100
thermo_style    custom step time temp epair etotal

# Define timestep
timestep        1.0e-7

# Compute damage
compute         damage all damage/atom
fix             damage_output all ave/atom 100 1 100 c_damage file damage.dat

# Run the simulation
run             10000
