# LAMMPS input script for a 2D Lennard-Jones melt simulation

units lj
dimension 2
atom_style atomic

# Create a square lattice of size 50x50
lattice sq2 0.8442
region box block 0 50 0 50 -0.5 0.5
create_box 1 box
create_atoms 1 box

# Define interactions
pair_style lj/cut 2.5
pair_coeff 1 1 1.0 1.0 2.5

# Initialize velocities
velocity all create 1.44 87287

# Define fixes
fix 1 all nve
fix 2 all enforce2d
fix 3 all balance 1000 1.0 shift xyz 10 1.0
fix 4 all ave/grid 10 5 100 x 0.5 1.0 y 0.5 1.0 z 0.5 1.0 vx vy vz

# Output settings
thermo 100
thermo_style custom step temp epair etotal press

# # Uncomment for detailed grid output and visualization setup
# dump 1 all image 100 image.*.jpg type type &
#   zoom 1.6 adiam 1.5
# dump_modify 1 pad 4
# dump 2 all grid 100 grid.bin density/mass fx fy fz

# Run the simulation
timestep 0.005
run 500
