# LAMMPS input script for 2D simulation of point dipoles in a replicated NaCl crystal lattice

units lj
dimension 2
atom_style charge

# Read data from file and replicate
read_data nacl.data
replicate 8 8 1

# Define pair style and Coulombic interactions
pair_style zero 10.0
kspace_style scafacos p3m 1.0e-4

# Assign velocities
velocity all create 1.5 12345

# Define integration method
fix 1 all nve

# Set timestep
timestep 0.005

# Output settings
thermo 10
thermo_style custom step temp pe ke etotal

# Run the simulation
run 100
