# LAMMPS Input Script for 3D Lennard-Jones Melt Simulation

units lj
atom_style atomic

# Create simulation box and atoms
lattice fcc 0.8442
region box block 0 10 0 10 0 10
create_box 2 box
create_atoms 1 box

# Define atom types in a specific region
region type2 block 3 6 INF INF INF INF
group type2 region type2
set group type2 type 2

# Define masses for atom types
mass 1 1.0
mass 2 1.0

# Define Lennard-Jones potential with different cutoffs
pair_style lj/cut 5.0
pair_coeff 1 1 1.0 1.0 2.5
pair_coeff 1 2 1.0 1.0 5.0
pair_coeff 2 2 1.0 1.0 5.0

# Neighbor list settings
neighbor 0.3 bin
neigh_modify every 2 delay 0 check yes

# Velocity initialization
velocity all create 1.0 12345

# Fix for time integration
fix 1 all nve

# Load balancing
balance 1.0 shift xyz 10 1.1

# Output settings
thermo 50
thermo_style custom step temp pe ke etotal

# Run the simulation in segments
run 500
run 500
run 500
run 500

# End of script
