# LAMMPS input script for BCC lattice unit cell simulation

# Initialize simulation
units lj
dimension 3
boundary p p p
atom_style atomic

# Create simulation box and atoms
lattice bcc 1.0
region box block 0 1 0 1 0 1
create_box 1 box
create_atoms 1 box

# Define masses
mass 1 1.0

# Define interatomic potential
pair_style lj/cut 1.1
pair_coeff 1 1 1.0 1.0 1.1

# Set up neighbor list
neighbor 0.3 bin
neigh_modify every 1 delay 0 check yes

# Define output settings
thermo 100
thermo_style custom step pe lx ly lz pxx pyy pzz

# Output atom positions
dump 1 all custom 100 dump.bcc id type x y z

# Run the simulation (0 timesteps)
run 0
