# LAMMPS input script for sucrose system with LATTE QM package

# Initialize simulation
units metal
atom_style full

# Define user variables for system replication
variable xrep equal 1
variable yrep equal 1
variable zrep equal 1

# Read data file
read_data data.sucrose

# Replicate system
replicate ${xrep} ${yrep} ${zrep}

# Define pair style
pair_style zero 10.0
pair_coeff * *

# Set neighbor list parameters
neighbor 1.0 bin
neigh_modify every 1 delay 0 check yes

# Assign initial velocities
velocity all create 100.0 12345678 dist gaussian

# Set timestep
timestep 0.00025

# Define fixes
fix 1 all nve
fix 2 all mdi/qm virial stress energy

# Thermo settings
thermo 10
thermo_style custom step temp pe etotal press

# MDI commands for LATTE integration
mdi_init "LATTE --steps 100 --mdi -mdi -mdi_name latte"

# Run simulation
run 100
