# LAMMPS input script for solvated deca-alanine peptide using CHARMM force field

units real
atom_style full
boundary p p p

# Read in the system configuration from a data file
read_data deca_alanine.data

# Define CHARMM force field potentials
pair_style lj/charmm/coul/long 9.0 10.0
bond_style harmonic
angle_style charmm
dihedral_style charmm
improper_style harmonic
kspace_style pppm 1.0e-4

# Apply GPU acceleration
package gpu force/neigh 0 0 -1

# Setup the SHAKE constraints for hydrogen-containing bonds in the peptide
fix shake_peptide all shake 0.0001 20 0 b 1 a 1

# Define groups for SHAKE (assuming peptide atoms are type 1)
group peptide type 1

# Setup NPT ensemble with a drag coefficient to stabilize pressure
fix npt all npt temp 300.0 300.0 100.0 iso 1.0 1.0 1000.0 drag 2.0

# Enable interactivity with IMD for visualization/manipulation
fix imd all imd port 54321

# Output settings for trajectory and thermodynamic data
thermo 1000
thermo_style custom step temp press etotal
dump 1 all dcd 1000 trajectory.dcd

# Run the simulation for 10 million femtoseconds (10 ns)
timestep 1.0
run 10000000

This script initializes and runs a molecular dynamics simulation using the specified settings and force field. Adjust the `read_data` and other file names as needed to match your specific setup.
