units real
atom_style full
boundary p p p

read_data complex_system.data

pair_style hybrid/overlay lj/cut/coul/long 10.0 lj/cut/coul/long/soft 10.0 3.0
pair_modify shift yes
kspace_style pppm 1.0e-4

bond_style harmonic
angle_style harmonic
dihedral_style opls

special_bonds lj/coul 0.0 0.0 0.5

fix 1 all shake 0.0001 20 0 b 1 a 1

# Define groups for FEP
group stateA id 1:100
group stateB id 101:200

# Soft-core interactions for FEP
pair_coeff * * lj/cut/coul/long 0.0 0.0
pair_coeff 1 2 lj/cut/coul/long/soft 0.0 0.0 3.0

# Define FEP fix with lambda variable
variable lambda equal ramp(0,1)
fix fep all adapt 1 pair lj/cut/coul/long/soft lambda v_lambda v_lambda

# Define thermodynamic output
thermo 1000
thermo_style custom step temp press pe ke etotal

# Define dump for trajectory
dump 1 all atom 20000 trajectory.lammpstrj

# Equilibration
reset_timestep 0
timestep 1.0
fix npt all npt temp 300.0 300.0 100.0 iso 1.0 1.0 1000.0

# Run simulation
run 2000000

# Write restart file
write_restart final_state.restart
