# LAMMPS input script for TIP4P/2005 water model simulation
# Equilibration of water at 300 K using GLE thermostat

units           real
atom_style      full
boundary        p p p

# Read data
read_data       data.h2o-smart

# Define potential styles
pair_style      lj/cut/tip4p/long 1 2 1 1 0.125 10.0
bond_style      class2
angle_style     harmonic
kspace_style    pppm/tip4p 1.0e-5

# Define pair coefficients
pair_coeff      * * 0.0 0.0     # Pair coefficients will be defined in the data file

# Neighbor settings
neighbor        2.0 bin
neigh_modify    delay 0 every 1 check yes

# Initialize velocities
velocity        all create 300.0 12345 mom yes rot yes dist gaussian

# Fix definitions
fix             1 all nve
fix             2 all gle 300.0 300.0 0.1 12345

# Output settings
thermo          100
thermo_style    custom step temp pe ke etotal

# Run simulation
timestep        0.5
run             10000
