# LAMMPS input script for Ni-Mo alloy system using MLIAP

units metal
atom_style atomic
boundary p p p

# Read the initial configuration
read_data Ni_Mo.data

# Uncomment to scale down the simulation box by 10%
# change_box all scale 0.9 0.9 0.9

# Define the MLIAP model
pair_style mliap
pair_coeff * * mliap.model mliap.descriptor

# Set up the simulation
neighbor 2.0 bin
neigh_modify every 1 delay 0 check yes

# Assign initial velocities
velocity all create 300.0 12345

# Define thermodynamic output
thermo 1
thermo_style custom step temp pe pxx pyy pzz pxy pxz pyz

# Integrate using NVE for energy conservation
fix 1 all nve

# Run the simulation
run 3
