# LAMMPS input script for simulating Al2O3 and calculating elastic constants

units metal
atom_style charge

# Define the lattice structure
variable a equal 4.758  # Lattice constant for Al2O3 in Angstroms
lattice custom ${a} a1 0.5 0.5 0.0 a2 0.5 0.0 0.5 a3 0.0 0.5 0.5 &
    basis 0.0 0.0 0.0 basis 0.5 0.5 0.5

region box block 0 10 0 10 0 10 units lattice
create_box 2 box

# Create atoms for Al2O3
create_atoms 1 box

# Masses
mass 1 26.9815  # Al atomic mass
mass 2 15.999   # O atomic mass

# Define potential
pair_style smtbq
pair_coeff * * potential.smtbq Al O

# Define neighbor list
neighbor 2.0 bin
neigh_modify every 1 delay 0 check yes

# Set initial velocities
velocity all create 300.0 12345

# Define the timestep
timestep 0.0002

# Thermo settings
thermo 100
thermo_style custom step temp press pe ke lx ly lz

# Run initial equilibration
fix 1 all nve
run 1000

# Energy minimization
unfix 1
fix 2 all box/relax iso 0.0 vmax 0.001
min_style cg
minimize 1e-4 1e-6 100 1000
unfix 2

# Short equilibration after minimization
fix 3 all nve
run 500

# Calculate elastic constants
fix 4 all deform 1 xy erate 0.0 units box
run 1000

# Cleanup
unfix 3
unfix 4

write_data final_structure.data

This script sets up a simulation for Al2O3 using a custom lattice, performs energy minimization, and briefly equilibrates the structure while monitoring important thermodynamic properties. The potential file `potential.smtbq` should be placed in the working directory for the simulation to run properly.
