# LAMMPS input script for a 3D ionic fluid simulation using DPD with long-range electrostatics

units lj
atom_style charge
boundary p p p

# Read initial configuration from a data file
read_data data.ionic_fluid

# DPD with long-range electrostatics
pair_style dpd/coul/slater/long 1.0 2.5 3.0 12345
pair_coeff * * 1.0 2.5

# Long-range Coulombic interactions using PPPM
kspace_style pppm 1.0e-4

# Neighbor list settings
neighbor 0.3 bin
neigh_modify every 1 delay 0 check yes

# Define timestep and integration
timestep 0.01
fix 1 all nve

# Thermodynamic output
thermo 100
thermo_style custom step temp press pe ke etotal

# Run the simulation
run 1000
