# LAMMPS input script for a BPM system with projectile impact on a disk-shaped plate

units lj
atom_style bond

# Create FCC lattice
lattice fcc 0.8442
region box block 0 40 0 40 0 40
create_box 2 box

# Define regions
region plate cylinder z 20 20 10 0 5 side in
region projectile sphere 20 20 35 5 side in

# Create atoms in the plate
create_atoms 1 region plate
group plate region plate

# Create atoms in the projectile
create_atoms 2 region projectile
group projectile region projectile

# Displace atoms slightly for randomness
displace_atoms all random 0.1 0.1 0.1 12345

# Define pair style and coefficients
pair_style bpm/spring
pair_coeff * * 1.0 1.0 1.0

# Define bond style and create bonds
bond_style bpm/spring
bond_coeff 1 1.0 1.0 2.0 0.2 2.5 # Plate bonds
bond_coeff 2 1.0 1.5 3.0 0.3 2.5 # Projectile bonds

# Create bonds within each group
create_bonds group plate group plate 1 1.5
create_bonds group projectile group projectile 2 1.5

# Set initial velocity for the projectile towards the plate
velocity projectile set 0.0 0.0 -1.0

# Define simulation settings
timestep 0.1
fix 1 all nve

# Define thermo settings
thermo 100
thermo_style custom step temp ke pe etotal press pxx pyy pzz n_bonds

# Dump broken bond data
dump 1 all custom 100 broken_bonds.dump id type x y z

# Run the simulation
run 7500
