# LAMMPS Input Script for 3D Lennard-Jones Melt in FCC Lattice

units lj
atom_style atomic

# Define simulation box and create atoms in FCC lattice
variable x equal 5
variable y equal 5
variable z equal 5
lattice fcc 0.8442
region box block 0 ${x} 0 ${y} 0 ${z}
create_box 1 box
create_atoms 1 box

# Set mass and LJ potential parameters
mass 1 1.0
pair_style lj/cut 2.5
pair_coeff 1 1 1.0 1.0 2.5

# Setup initial velocities
velocity all create 1.44 87287

# Define the microcanonical ensemble
fix 1 all nve

# Set up thermodynamic output in YAML format
thermo_style custom step temp epair etotal
thermo_modify format line yaml
thermo 10

# Run the simulation
run 100
run 100
