# LAMMPS input script for ethanol simulation with hybrid force field

units real
atom_style full
boundary p p p

# Read data file
read_data ethanol.data

# Define force field
bond_style harmonic
angle_style harmonic
dihedral_style opls
pair_style hybrid/overlay lj/cut/coul/long 10.0 thole 0.2
pair_modify mix geometric
kspace_style pppm 1.0e-4

# Define groups
group atoms type 1 2 3 4 5 6 7 8 9
group drudes type 10

# Set up temperature and pressure for atoms
fix 1 atoms npt temp 300.0 300.0 100.0 iso 1.0 1.0 1000.0

# Set up temperature control for Drude particles
fix 2 drudes nvt temp 300.0 300.0 100.0

# Apply SHAKE algorithm to constrain bonds
fix 3 all shake 0.0001 20 0 b 1 2

# Drude thermostat
fix 4 drudes drude/thermostat 1.0

# Thermo settings
thermo 20
thermo_style custom step temp ke pe etotal press

# Run the simulation
timestep 0.5
run 2000
