# LAMMPS input script for simulating an ionic surfactant system (S12S)

# Initialize simulation
units           real
atom_style      full
dimension       3
boundary        p p p

# Read data from file
read_data       s12s.data

# Define pair interactions
pair_style      hybrid/overlay lj/cut 12.0 coul/long 12.0 gauss 12.0
pair_coeff      * * lj/cut 0.1 3.5
pair_coeff      * * gauss 1.0 1.0 5.0
pair_coeff      * * coul/long

# Define bond, angle, and dihedral interactions
bond_style      harmonic
bond_coeff      * 300.0 1.5

angle_style     harmonic
angle_coeff     * 50.0 109.5

dihedral_style  opls
dihedral_coeff  * 1 0.0 1.0 0.5 0.0

# Define kspace style for long-range Coulombic interactions
kspace_style    pppm 1.0e-4
dielectric      78.5

# Define neighbor settings
neighbor        2.0 bin
neigh_modify    every 2 delay 0 check yes

# Initialize velocities
velocity        all create 300.0 12345 dist gaussian

# Define fixes
fix             1 all nve/limit 0.1
fix             2 all langevin 300.0 300.0 100.0 12345

# Output settings
thermo          100
thermo_style    custom step temp epair etotal press

# Run the simulation
timestep        1.0
run             2000
