# LAMMPS Input Script for 3D Lennard-Jones Melt Simulation

units lj
atom_style atomic

# Create simulation box
region box block 0 10 0 10 0 10
create_box 1 box

# Create atoms in an fcc lattice
lattice fcc 0.8442
create_atoms 1 box

# Define mass
mass 1 1.0

# Define Lennard-Jones potential
pair_style lj/cut 2.5
pair_coeff 1 1 1.0 1.0 2.5

# Set initial velocities for temperature 3.0
velocity all create 3.0 87287

# Define neighbor settings
neighbor 0.3 bin
neigh_modify every 20 delay 0 check yes

# Output settings
thermo 50
thermo_style custom step temp epair emol etotal press

# Fix for NVE integration
fix 1 all nve

# Run the simulation
run 250

# Uncomment for atom dump (snapshot of the system)
# dump 1 all atom 50 dump.lj

# Uncomment to create images (requires additional packages)
# dump 2 all image 50 image.*.jpg type type &
#  size 1024 1024 title "LJ Melt"

# Uncomment to create movie (requires additional packages)
# dump 3 all movie 50 movie.mpg type type &
#  size 1024 1024 title "LJ Melt"

# End of script
