# LAMMPS Input Script for Spherical Particle System with Lennard-Jones Potential

units lj
atom_style atomic

# Define the simulation box
region box block 0 20 0 20 0 20
create_box 2 box

# Define a spherical region inside the box
region sphere_region sphere 10 10 10 8

# Create an FCC lattice within the spherical region
lattice fcc 0.8442
create_atoms 1 region sphere_region

# Assign types to particles for visualization
group type1 type 1
group type2 type 2
set group type1 type 1
set group type2 type 2

# Define Lennard-Jones potential
pair_style lj/cut 4.0
pair_coeff * * 1.0 1.0 4.0

# Reflective boundary conditions
boundary f f f

# Initialize velocities
velocity all create 1.2 12345

# Energy minimization
minimize 1.0e-4 1.0e-6 100 1000

# Integrate dynamics using NVE ensemble
fix 1 all nve

# Equilibration without external torques
run 1000

# Apply torque to induce rotation around the z-axis
fix 2 all addtorque 0.0 0.0 1.0

# Run simulation to study rotational dynamics
run 5000

# Thermodynamic output
thermo_style custom step temp etotal ke pe press vol
thermo 100

# Additional outputs for rotational dynamics
compute angmom all angmom
compute inertia all inertia/chunk
compute omega all omega/chunk
compute rot_ke all ke/rot

# Output rotational properties
fix 3 all print 100 "Step: ${step} AngMom: ${c_angmom[1]} ${c_angmom[2]} ${c_angmom[3]} RotKE: ${c_rot_ke} Inertia: ${c_inertia[1]} ${c_inertia[2]} ${c_inertia[3]} Omega: ${c_omega[1]} ${c_omega[2]} ${c_omega[3]}" file rotation_output.txt

# End of script
