# LAMMPS Input Script for Argon Atoms using Lennard-Jones Potential

# Define variables
variable x equal 10.0      # Box size in x-direction (in Angstroms)
variable y equal 10.0      # Box size in y-direction (in Angstroms)
variable z equal 10.0      # Box size in z-direction (in Angstroms)
variable rhostar equal 0.8 # Reduced density
variable tinitial equal 1.0 # Reduced initial temperature
variable sigma equal 3.405  # Lennard-Jones sigma for Argon (in Angstroms)
variable epsilon equal 0.0103 # Lennard-Jones epsilon for Argon (in eV)

# Calculate lattice constant based on reduced density
variable a equal (variable sigma)*pow(4.0/${rhostar},1.0/3.0)

# Initialize simulation
units metal
atom_style atomic
boundary p p p

# Create box and lattice
lattice fcc ${a}
region box block 0 ${x} 0 ${y} 0 ${z}
create_box 1 box
create_atoms 1 box

# Define interatomic potential
pair_style lj/cut 2.5*${sigma}
pair_coeff 1 1 ${epsilon} ${sigma}

# Define neighbor list
neighbor 0.3 bin
neigh_modify every 1 delay 0 check yes

# Set initial velocities
velocity all create ${tinitial} 12345

# Define integration scheme
fix 1 all nve

# Output settings
timestep 0.001 # Timestep in picoseconds

# Define thermo output
thermo 10
thermo_style custom step temp pe press etotal

# Run the simulation
run 100
