# LAMMPS Input Script for Electrostatic Interactions in Slab Geometry

units           real
atom_style      charge

# Boundary Conditions
boundary        p p f

# Include additional settings
include         settings.mod

# Define Kspace style for electrostatic interactions
kspace_style    ewald/electrode 1.0e-8
kspace_modify   slab 3.0

# Read data file
read_data       system.data

# Define groups for electrodes
group           bottom_electrode type 1
group           top_electrode type 2

# Set up the fix for constant potential difference
fix             conp bottom_electrode electrode 0.0 top_electrode 0.0 \
                symmetry inversion file inversion.csv vector vector.csv

# Output settings
thermo          100
thermo_style    custom step pe c_qbot c_qtop

# Run setup phase
run             0
