# LAMMPS input script for MD simulation of fcc copper using ACE potential

units metal
dimension 3
boundary p p p

# Create FCC lattice
lattice fcc 3.597
region box block 0 4 0 4 0 4
create_box 1 box
create_atoms 1 box

# Set atomic masses
mass 1 63.546

# Define ACE potential
pair_style pace product
pair_coeff * * Cu-PBE-core-rep.ace Cu

# Initialize velocities
velocity all create 300.0 12345 mom yes dist gaussian

# Define compute for per-atom potential energy and stress
compute peratom all pe/atom
compute stress all stress/atom NULL

# Reduce to total potential energy and pressure
compute total_pe all reduce sum c_peratom
compute pressure all reduce sum c_stress[1] c_stress[2] c_stress[3]

# Define variables for deviations from initial potential energy and pressure
variable initial_pe equal c_total_pe
variable initial_pressure equal c_pressure
variable delta_pe equal c_total_pe - ${initial_pe}
variable delta_pressure equal c_pressure - ${initial_pressure}

# Set timestep and fix for integration
timestep 0.0005
fix 1 all nve

# Output thermodynamic data
thermo_style custom step temp c_total_pe etotal press v_delta_pe v_delta_pressure
thermo 10

# Run the simulation
run 100
