# LAMMPS Input Script for Argon with MLIAP based on Lennard-Jones

units lj
atom_style atomic

# Create simulation box
lattice fcc 0.8442
region box block 0 10 0 10 0 10
create_box 1 box
create_atoms 1 box

# Set masses
mass 1 1.0

# Load Machine Learning Interatomic Potential
pair_style mlip
pair_coeff * * mliap_unified_lj_Ar.pkl

# Initial velocities
velocity all create 3.0 4928459 dist gaussian

# Define neighbor list
neighbor 0.3 bin
neigh_modify delay 0 every 20 check yes

# Output settings
thermo 50
# thermo_style custom step temp pe ke etotal

# Run settings
fix 1 all nve
run 250

# Uncomment below to add output options
# dump 1 all atom 10 dump.mliap_lj_argon
# dump_modify 1 sort id

# End of script
