# LAMMPS Input Script for Argon Uniaxial Strain with AtC Method

units real
atom_style atomic

# Define the lattice and region
lattice fcc 3.405 # lattice constant for argon in Angstroms
region box block 0 10 0 10 0 10
create_box 1 box

# Create atoms in a sub-region
region sub_box block 1 9 1 9 1 9
create_atoms 1 region sub_box

# Define interatomic potential
pair_style lj/smooth/linear 10.0
pair_coeff 1 1 0.2381 3.405 2.5 10.0

# Boundary conditions
boundary m p p

# Neighbor list
neighbor 2.0 bin
neigh_modify every 10 delay 0 check yes

# Define AtC group
group internal region sub_box

# Initialize velocities
velocity all create 300.0 12345

# Setup timestep
timestep 1.0

# Define thermo output
thermo 10
thermo_style custom step temp pe ke etotal press vol

# Apply AtC method for Cauchy-Born and Hardy metrics
fix atc1 all atc fix_modify atc1 file cauchy_born.params
fix atc2 all atc fix_modify atc2 file hardy.params

# Initial zero timestep
reset_timestep 0

# Run a series of uniaxial strain deformations
variable strain equal "lx*0.01"
variable steps equal 100

# Deformation loop
label loop
variable i loop ${steps}

displace_atoms all move v_strain 0.0 0.0
run 10

next i
jump SELF loop

# End of simulation
write_restart final.restart
