# LAMMPS input script for a simple rigid body system using Lennard-Jones units

units lj
atom_style atomic

# Read data file
read_data data.rigid

# Define pair style and cutoff
pair_style lj/cut 2.5
pair_coeff * * 1.0 1.0

# Define groups for each clump
group clump1 id 1:10
group clump2 id 11:20
group clump3 id 21:30
group clump4 id 31:40
group clump5 id 41:50
group clump6 id 51:60
group clump7 id 61:70
group clump8 id 71:80
group clump9 id 81:90

# Assign initial velocities
velocity all create 100.0 12345

# Define rigid bodies using fix poems
fix rigid1 clump1 poems
fix rigid2 clump2 poems
fix rigid3 clump3 poems
fix rigid4 clump4 poems
fix rigid5 clump5 poems
fix rigid6 clump6 poems
fix rigid7 clump7 poems
fix rigid8 clump8 poems
fix rigid9 clump9 poems

# Exclude self-interactions within each clump
neigh_modify exclude group clump1 clump1
neigh_modify exclude group clump2 clump2
neigh_modify exclude group clump3 clump3
neigh_modify exclude group clump4 clump4
neigh_modify exclude group clump5 clump5
neigh_modify exclude group clump6 clump6
neigh_modify exclude group clump7 clump7
neigh_modify exclude group clump8 clump8
neigh_modify exclude group clump9 clump9

# Output settings
thermo 50
thermo_style custom step temp pe ke etotal

# Run the simulation
timestep 0.0001
run 10000

# Uncomment the following lines to enable output dumps, images, or movies
# dump myDump all atom 100 dump.atom
# dump myImage all image 100 image.*.jpg type type &
# dump_modify myImage pad 5
# dump myMovie all movie 100 movie.mpg type type
