# LAMMPS Input Script for Water Molecules under External Electric Field

units metal
atom_style full
boundary p p p

# Read in the initial configuration
read_data water.init

# Define potential styles
pair_style lj/cut/coul/long 10.0
pair_coeff * * 0.0 0.0  # Placeholder coefficients, adjust as needed

bond_style harmonic
bond_coeff * 450.0 1.0  # Placeholder coefficients, adjust as needed

angle_style harmonic
angle_coeff * 55.0 104.52  # Placeholder coefficients, adjust as needed

kspace_style pppm 1.0e-4

# Apply external electric field in the z-direction
fix 1 all efield 0.0 0.0 -5.0

# Equilibrate the system at 300 K using Nosé-Hoover thermostat
fix 2 all nvt temp 300.0 300.0 0.100

# # Uncomment to use SHAKE for bond and angle constraints
# fix 3 all shake 0.0001 20 0 b 1 a 1

# Output settings
thermo 100
thermo_style custom step temp pe ke etotal press

# Dump atomic configurations
dump 1 all atom 500 dump.water

# Initialize the AtC package for multiscale modeling
fix atc all atc thermal/dynamic 3.0  # Example command, adjust as needed

# Run the simulation
timestep 0.5
run 10000

unfix 1
unfix 2
# unfix 3  # Uncomment if SHAKE was used
unfix atc
