# LAMMPS Input Script for Bulk Polyelectrolyte System

units lj
atom_style charge
boundary p p p

# Create simulation box
region simbox block 0 10 0 10 0 10
create_box 3 simbox

# Create atoms
create_atoms 1 random 2804 12345 simbox
create_atoms 2 random 98 23456 simbox
create_atoms 3 random 98 34567 simbox

# Set charges for particles
set type 1 charge 0.0
set type 2 charge -1.0
set type 3 charge 1.0

# Define pair interactions
pair_style hybrid/overlay dpd 1.0 1.0 12345 lj/cut 1.12246
pair_coeff * * dpd 1.0 1.0
pair_coeff 1 1 lj/cut 1.0 1.12246
pair_coeff 1 2 lj/cut 1.0 1.12246
pair_coeff 1 3 lj/cut 1.0 1.12246
pair_coeff 2 2 lj/cut 1.0 1.12246
pair_coeff 2 3 lj/cut 1.0 1.12246
pair_coeff 3 3 lj/cut 1.0 1.12246

# Enable long-range electrostatics
kspace_style ewald 1.0e-4

# Define neighbor list
neighbor 0.3 bin
neigh_modify every 1 delay 0 check yes

# Initialize velocities
velocity all create 1.0 12345

# Define groups
group neutral type 1
group negative type 2
group positive type 3

# Set timestep
timestep 0.02

# Define output settings
thermo 10
thermo_style custom step temp press etotal ke pe

# Compute RDFs
compute rdf_all all rdf 100
fix rdf_output all ave/time 100 1 100 c_rdf_all file rdf_output.txt mode vector

# Equilibration phase
fix nve_integrate all nve
run 100000
write_data equilibration_data.dat

# Production phase
run 10000
write_data production_data.dat

# End of script
