# LAMMPS Input Script for Hybrid Lennard-Jones Simulation

units lj
atom_style atomic

# Define lattice and create simulation box
lattice fcc 0.8442
region simbox block 0 10 0 10 0 10
create_box 2 simbox

# Create atoms and define regions
create_atoms 1 box
region type2_region block 1 9 1 9 1 9
group type2_atoms region type2_region
set group type2_atoms type 2

# Define initial velocities
velocity all create 3.0 12345

# Define hybrid pair styles
pair_style hybrid lj/cut 2.5 python
pair_coeff * * python my_python_potential.py
pair_coeff 2 2 lj/cut 1.0 1.0 2.5

# Integrate with NVE
fix 1 all nve

# Define output settings
thermo 50
thermo_style custom step temp pe ke etotal press
dump 1 all custom 250 dump.lammpstrj id type x y z vx vy vz

# Define restart and run settings
restart 250 restart.*.lammpstrj

# Run simulation stages
run 250
run 250
run 250

# Clean up
undump 1
unfix 1
write_restart final_restart.lammpstrj

Ensure the Python script `my_python_potential.py` is properly defined and accessible to LAMMPS to evaluate the custom potential.
