# LAMMPS Input Script for 2D Lennard-Jones Fluid Simulation with Energy Minimization

units lj
dimension 2
boundary p p p

# Define the simulation box
lattice sq 0.8442
region box block 0 20 0 20 -0.5 0.5
create_box 1 box

# Create atoms
create_atoms 1 box
mass 1 1.0

# Define potentials
pair_style lj/cut 2.5
pair_coeff 1 1 1.0 1.0 2.5

# Initial velocity
velocity all create 5.0 12345

# Fixes and computes
fix 1 all nve
fix 2 all enforce2d
neighbor 0.3 bin
neigh_modify every 1 delay 0 check yes

# Output settings
thermo 50
thermo_style custom step temp epair etotal

# Run the simulation
timestep 0.005
run 1000

# Energy minimization
min_style fire
minimize 1.0e-4 1.0e-6 100 1000
