# LAMMPS input script for a 3D Lennard-Jones melt simulation

units lj
atom_style atomic

# Create simulation box and atoms
lattice fcc 0.8442
region box block 0 10 0 10 0 10
create_box 1 box
create_atoms 1 box

# Define mass and potential
mass 1 1.0
pair_style lj/cut 2.5
pair_coeff 1 1 1.0 1.0 2.5

# Set initial velocities
velocity all create 3.0 87287 loop geom

# Define settings for the neighbor list
neighbor 0.3 bin
neigh_modify every 20 delay 0 check yes

# Define the simulation ensemble
fix 1 all nve

# Output settings
dump 1 all vtk 50 dump.vtk id type vx vy vz fx fy fz
thermo 50

# Run the simulation
run 250
