# LAMMPS input script for slab geometry with ewald/electrode

# Initialize simulation
units real
dimension 3
boundary p p f
atom_style charge

# Create simulation box and atoms (example values)
region box block 0 10 0 10 0 10
create_box 2 box

# Define atom groups
region bot_region block INF INF INF INF 0 5
region top_region block INF INF INF INF 5 10
group bot region bot_region
group top region top_region

# Assign dielectric constants
set group bot dielectric 0.5
set group top dielectric 3.0

# Define pair style and kspace style
pair_style lj/cut/coul/long 10.0 10.0
pair_coeff * * 0.0 0.0 0.0

kspace_style ewald/electrode 1.0e-8

# Fixes
fix conp bot efield 0.0 0.0 0.0
fix_modify conp symmetric yes
fix_modify conp pair potential/coulomb
fix_modify conp record inversion.csv vector.csv

# Run 0 to initialize the system
run 0
