# LAMMPS Input Script to Demonstrate Replicate Command with Bond Loops

# Ensure LAMMPS is built with MOLECULE and CLASS2 packages

# Units and atom style
units real
atom_style full

# Initialize simulation
dimension 3
boundary p p p

# Atom definition for a simple linear chain (without bond loops)
read_data data.chain

# Force field settings
pair_style lj/class2 10.0
bond_style class2
angle_style class2
dihedral_style class2
improper_style class2

# Assign coefficients
pair_coeff * * 0.1 3.0
bond_coeff * 300.0 1.0
angle_coeff * 50.0 120.0
dihedral_coeff * 1.0 1.0 1.0 1.0
improper_coeff * 1.0 1.0

# Replicate system without bond loops
replicate 2 1 1

# Output settings
dump 1 all image 10 image.*.jpg type type &
    axes yes 0.8 0.02 view 60 -30
dump_modify 1 pad 4

# Run for visualization
run 0

# Clear system
clear

# Load 2D grid data with periodic bond loops in x and y
read_data data.grid2D

# Replicate system with bond loops
replicate 2 2 1

# Output settings for 2D grid
dump 2 all image 10 grid2D.*.jpg type type &
    axes yes 0.8 0.02 view 60 -30
dump_modify 2 pad 4

# Run for visualization
run 0

# Clear system
clear

# Load complex CNT system data with bond loops in all three dimensions
read_data data.cnt3D

# Replicate CNT system
replicate 2 2 2

# Output settings for CNT system
dump 3 all image 10 cnt3D.*.jpg type type &
    axes yes 0.8 0.02 view 60 -30
dump_modify 3 pad 4

# Run for visualization
run 0

# End of script

This script demonstrates how to replicate systems with and without periodic bond loops using the `replicate` command. It includes examples of simple linear chains, 2D grids, and a complex three-dimensional CNT system, each with appropriate visualization outputs. Ensure you have the necessary data files (`data.chain`, `data.grid2D`, `data.cnt3D`) and LAMMPS is configured with FFMPEG support for movie generation.
