# LAMMPS input script for a 3D Lennard-Jones melt simulation

units lj
atom_style atomic

# Define simulation box
variable x equal 5
variable y equal 5
variable z equal 5
lattice fcc 0.8442
region simbox block 0 ${x} 0 ${y} 0 ${z}
create_box 1 simbox
create_atoms 1 box

# Define mass
mass 1 1.0

# LJ potential with default parameters (epsilon = 1.0, sigma = 1.0, cutoff = 2.5)
pair_style lj/cut 2.5
pair_coeff 1 1 1.0 1.0 2.5

# Initial velocities
velocity all create 1.44 87287

# Neighbor list settings
neighbor 0.3 bin
neigh_modify every 1 delay 0 check yes

# Define integration
fix 1 all nve

# MDI engine command for AIMD driver interface
mdi_engine

# Run the simulation (no specific runtime is given, so we run for a default period)
run 10000
