# LAMMPS Input Script for Two-Temperature Model with AtC Package

units metal
dimension 3
boundary p p p
atom_style atomic

# Create a face-centered cubic (fcc) lattice
lattice fcc 4.05
region whole block 0 20 0 20 0 20 units lattice
create_box 1 whole
create_atoms 1 region whole

# Define potential
pair_style lj/cut 8.5
pair_coeff 1 1 0.0104 2.74

# Define AtC coupling
fix_modify AtC AtC_property/elementset T_electrons constant 300
fix_modify AtC AtC_property/elementset T_atoms constant 300
fix_modify AtC AtC_transfer 0.1

# Define regions for MD and FE analysis
region md_region block 5 15 5 15 5 15 units lattice
region fe_region block 0 20 0 20 0 20 units lattice

# Assign group to MD and FE regions
group md_atoms region md_region
group fe_elements region fe_region

# Create mesh for FE analysis
fix atc all atc mesh tetra/3d fe_region 5 5 5
fix_modify atc elementset_create fe_elements

# Initial velocity and temperature scaling
velocity all create 300.0 12345 mom yes rot yes dist gaussian
fix nvt_equilibration all nvt temp 300.0 300.0 0.1
run 1000

# Two-temperature model setup
unfix nvt_equilibration
fix atc_coupling all atc two_temperature T_atoms T_electrons
fix_modify atc_coupling transfer 0.1

# Apply a heat source to a defined wire region
region wire block 9 11 9 11 0 20 units lattice
fix heat_source all atc heat_source wire 1.0e10

# Thermodynamic output
thermo 100
thermo_style custom step temp etotal f_atc_coupling[1] f_atc_coupling[2]

# Run the simulation to study thermal response
timestep 0.001
run 5000

# Relaxation phase
unfix heat_source
run 5000
