# LAMMPS input script for simulating silicon in hcp configuration

units           metal
dimension       3
boundary        p p p
atom_style      atomic

# Define the custom lattice for hcp silicon
variable        a equal 3.117  # Lattice constant 'a' in Angstroms
variable        c_a equal 1.633  # Ideal c/a ratio for hcp
variable        c equal ${c_a}*${a}

lattice         custom ${a} &
                a1 1.0 0.0 0.0 &
                a2 0.5 sqrt(3.0)/2.0 0.0 &
                a3 0.0 0.0 ${c} &
                basis 0.0 0.0 0.0 &
                basis 2/3 1/3 0.5

region          box block 0 10 0 10 0 10
create_box      1 box
create_atoms    1 box

# Define potentials
pair_style      meam/sw/spline
pair_coeff      * * Si.meam Si

# Set neighbor list
neighbor        2.0 bin
neigh_modify    every 1 delay 0 check yes

# Relax the box to an anisotropic stress-free state
thermo          100
thermo_style    custom step pe lx ly lz press pxx pyy pzz
min_style       cg
minimize        1.0e-8 1.0e-8 1000 10000

fix             1 all box/relax aniso 0.0 vmax 0.001

# Perform energy minimization
min_style       cg
minimize        1.0e-8 1.0e-8 1000 10000

# Output results
variable        natoms equal "count(all)"
variable        ecohesive equal "pe/atoms"
variable        lx equal "lx"
variable        ly equal "ly"
variable        lz equal "lz"
variable        volume equal "vol"

print           "Cohesive energy: ${ecohesive} eV/atom"
print           "Lattice parameter a: ${lx} Angstroms"
print           "c/a ratio: v_lz/v_lx"
print           "Atomic volume: ${volume}/${natoms} Angstroms^3"
