# LAMMPS input script for SPC/E water using the real unit system

units real
atom_style full
boundary p p p

# Read data file
read_data data.spce

# Define groups
group water type 1  # Assuming type 1 corresponds to water molecules

# Pair style and coefficients
pair_style lj/cut/coul/long 12.0
pair_coeff * * 0.0 0.0  # Assuming LJ parameters are set in the data file

# Bond and angle styles and coefficients
bond_style harmonic
angle_style harmonic

# Set bond coefficients for SPC/E water (example values)
bond_coeff 1 450 1.0  # Bond type 1, force constant 450 kcal/mol/Å^2, equilibrium length 1.0 Å

# Set angle coefficients for SPC/E water (example values)
angle_coeff 1 55 104.52  # Angle type 1, force constant 55 kcal/mol/rad^2, equilibrium angle 104.52 degrees

# Kspace style for long-range interactions
kspace_style pppm 1.0e-4

# SHAKE constraints for rigid water molecules
fix constrainSHAKE all shake 0.0001 20 0 b 1 a 1

# NVT ensemble for equilibration
fix nvt all nvt temp 300.0 300.0 100.0

# Timestep
timestep 2.0

# Define force computation groups
group force_group id 1  # Example for a specific molecule or group of molecules by atom IDs

# Compute forces using group/group
compute group_force force_group group/group water

# Compute forces using force/tally
compute force_tally all force/tally pair force_group

# Dump and thermo settings
thermo_style custom step temp pe etotal c_group_force c_force_tally
thermo 10

# Run the simulation
run 50

This script sets up the simulation parameters and models the SPC/E water system using the specified potentials and constraints. It includes force computations via `group/group` and `force/tally` methods and outputs these values for consistency verification. Adjust the group definitions and coefficients based on your specific data file and system configuration.
