# LAMMPS input script for 2D LJ liquid simulation with shear flow, using a shearing wall and Langevin thermostat

units lj
dimension 2
atom_style atomic

# Define simulation box and lattice
lattice sq2 0.6
region box block 0 20 0 10 -0.25 0.25
create_box 3 box

# Define regions for flow and walls
region flow block 0 20 1 9 -0.25 0.25
region lower_wall block 0 20 0 1 -0.25 0.25
region upper_wall block 0 20 9 10 -0.25 0.25

# Create atoms in entire box
create_atoms 1 box

# Assign atom types for walls
group lower type 2
group upper type 3
group flow region flow

set group lower type 2
set group upper type 3

# Define LJ potential with a cutoff
pair_style lj/cut 2.5
pair_coeff 1 1 1.0 1.0 2.5
pair_coeff 1 2 1.0 1.0 2.5
pair_coeff 1 3 1.0 1.0 2.5
pair_coeff 2 2 1.0 1.0 2.5
pair_coeff 2 3 1.0 1.0 2.5
pair_coeff 3 3 1.0 1.0 2.5

# Define groups for dynamics
group mobile union flow lower upper

# Apply fixes
fix 1 flow nve
fix 2 flow langevin 1.0 1.0 1.0 48279
fix 3 all enforce2d
fix 4 upper setforce 0.0 0.0 0.0
velocity upper set 2.7 0.0 0.0

# Define time step and run parameters
timestep 0.005

# Equilibration run
thermo 100
thermo_style custom step temp press
run 5000

# Data gathering run
fix 5 flow ave/spatial 10 100 1000 y center 0.1 vx file vel.profile

# Calculate viscosity
variable shear_rate equal 2.7
variable viscosity equal -(pxy/v_shear_rate)

thermo_style custom step temp press v_viscosity
thermo 100
run 10000
