# 3D Lennard-Jones Melt Simulation with Two Particle Types

units lj
atom_style atomic

# Define the simulation box
lattice fcc 0.8442
region box block 0 10 0 10 0 10
create_box 2 box

# Create atoms
create_atoms 1 box

# Mass of particles
mass 1 1.0
mass 2 1.0

# Define regions for different types
region type2_region block 4 6 4 6 4 6
group type2_group region type2_region
group type1_group subtract all type2_group

# Assign types to regions
set group type2_group type 2
set group type1_group type 1

# Define interactions
pair_style lj/cut 5.0
pair_coeff * * 1.0 1.0 2.5
pair_coeff 2 2 1.0 1.0 5.0

# Initialize velocities
velocity all create 1.0 12345

# Time integration
fix 1 all nve

# Dynamic load balancing
fix 2 all balance 100 1.1 shift xyz 20 20 weight 1.0

# Thermodynamic output
thermo 50
thermo_style custom step temp pe ke etotal press vol

# Run the simulation
timestep 0.005
run 2000
