# LAMMPS input script for simulating FCC cobalt with atomic and spin dynamics

# Initialize simulation
units metal
atom_style spin
boundary p p p

# Define lattice and region
lattice fcc 3.54
region box block 0 10 0 10 0 10
create_box 1 box
create_atoms 1 box

# Set magnetic moments
set atom * spin 1.0 0.0 0.0

# Define potential and interactions
pair_style hybrid/overlay eam/alloy spin/exchange 1.0
pair_coeff * * eam/alloy Co.eam.alloy Co
pair_coeff * * spin/exchange 1 1.0 1.0

# Define fixes
fix 1 all nve/spin
fix 2 all precession/spin zeeman 0.0 0.0 1.0
fix 3 all langevin/spin 0.0 0.0 0.1 48279

# Define timestep
timestep 0.0001

# Output settings
thermo 50
thermo_style custom step temp pe ke f_1[1] f_1[2] f_1[3]

# Run the simulation
run 1000

Make sure you have the appropriate potential file (`Co.eam.alloy`) in your working directory for the `eam/alloy` interaction. Adjust the lattice dimensions and number of atoms as needed to fit your specific requirements.
