# LAMMPS input script for 2D NEMD simulation of Lennard-Jones fluid under shear

units lj
dimension 2
atom_style atomic

# Define simulation box
lattice sq 0.8442
region box block 0 20 0 20 -0.5 0.5
create_box 2 box

# Create atoms
create_atoms 1 box
mass 1 1.0

# Define a region for type 2 atoms
region type2_region block 5 15 5 15 -0.5 0.5
group type2 region type2_region
set group type2 type 2

# LJ potential with a cutoff of 2.5
pair_style lj/cut 2.5
pair_coeff 1 1 1.0 1.0 2.5
pair_coeff 1 2 1.0 1.0 2.5
pair_coeff 2 2 1.0 1.0 2.5

# Initial velocities to achieve a temperature of 1.44
velocity all create 1.44 87287 loop geom

# Apply SLLOD algorithm with fix nvt/sllod
fix 1 all nvt/sllod temp 1.0 1.0 1.0

# Apply shear using fix deform
fix 2 all deform 1 xy erate 0.01 remap v

# Run the simulation
timestep 0.005
thermo 1000

run 50000
