# LAMMPS input script for DPD simulation of a binary fluid mixture

units lj
atom_style atomic
boundary p p p

# Define simulation box
lattice fcc 0.8442
region box block 0 10 0 10 0 10
create_box 2 box

# Create atoms of two types
create_atoms 1 box
create_atoms 2 box

# Set masses for the two types of particles
mass 1 1.0
mass 2 1.5

# Define pairwise interactions using DPD
pair_style dpd 1.0 1.0 12345
pair_coeff * * 25.0 4.5
pair_coeff 1 2 30.0 4.5

# Set velocity
velocity all create 1.0 12345

# Define integrator
timestep 0.01

# Define fixes for DPD thermostat and NVE integration
fix 1 all nve
fix 2 all dpd 1.0 1.0 12345

# Output settings
thermo 100
thermo_style custom step temp press

# Run the simulation
run 5000
