# LAMMPS Input Script for Phonon Dynamics in a 2D Slice of a 3D Simple Cubic Lattice

units           lj
atom_style      bond

# Read initial configuration from data file
read_data       data.pos

# Define simulation settings
dimension       2
boundary        p f p

# Define pair style and disable pair interactions
pair_style      none

# Define bond style
bond_style      harmonic

# Custom temperature compute for x-direction
compute         MyTemp all temp/partial 1 0 0

# Initialize velocities with a Gaussian distribution
velocity        all create 0.005 87287 dist gaussian

# Apply Langevin thermostat to maintain temperature
fix             langevin all langevin 0.005 0.005 0.5 48279
fix_modify      langevin temp MyTemp

# Nullify forces in y-direction
fix             setforce all setforce NULL 0.0 NULL

# Integrate equations of motion with the NVE ensemble
fix             nve all nve

# Track phonon properties (assuming a suitable phonon fix is defined in your LAMMPS version)
fix             phonon all phonon

# Define thermodynamic output
thermo_style    custom step temp pe etotal
thermo          1000

# Run the simulation
run             2000000
