# LAMMPS Input Script for 3D MD Simulation of Silicon using SW Potential

# Initialize simulation
units           metal
dimension       3
boundary        p p p
atom_style      atomic

# Define lattice and simulation box
variable        x equal 20
variable        y equal 20
variable        z equal 20

lattice         fcc 1.0
region          box block 0 ${x} 0 ${y} 0 ${z}
create_box      1 box
create_atoms    1 box

# Set mass for silicon atoms
mass            1 39.95

# KIM Model for Silicon with Stillinger-Weber potential
kim_init        SW_StillingerWeber_1985_Si__MO_405512056662_005
kim_interactions

# Define neighbor list
neighbor        0.3 bin
neigh_modify    every 1 delay 0 check yes

# Set initial velocities
velocity        all create 200.0 12345

# Define simulation settings
timestep        0.001
thermo          10

# Run dynamics
fix             1 all nve
run             100
