# LAMMPS input script for RNA duplex interactions using oxRNA2 model

# Initialize simulation
units real
dimension 3
boundary p p p
atom_style hybrid bond ellipsoid oxdna

# Read initial configuration from a data file
read_data rna_duplex.data

# Define potential interactions
pair_style hybrid/overlay oxdna2
bond_style fene

# Define oxDNA2 interactions
pair_coeff * * oxdna2 1 1

# Define FENE bond parameters for RNA backbone
bond_coeff * 30.0 1.5 0.0 0.0

# Set up the NVE ensemble for aspherical particles
fix 1 all nve/asphere

# Set temperature
velocity all create 300.0 12345 dist gaussian

# Dynamic load balancing to optimize computational efficiency
fix 2 all balance 1000 1.1 shift xyz 10 1.0

# Output settings
timestep 0.01706
thermo 1000
thermo_style custom step temp pe ke etotal

# Output trajectory data
dump 1 all custom 1000 trajectory.lammpstrj id type x y z ix iy iz

# Run the simulation
run 1000000

# End of script
