# LAMMPS input script for a molecular dynamics simulation of polyethylene using REBO potential

units metal
atom_style atomic

# Read initial configuration
read_data data.airebo

# Replicate the system
replicate 17 16 2

# Define neighbor list
neighbor 0.5 bin
neigh_modify delay 5 every 1

# Specify potential
pair_style rebo
pair_coeff * * CH.rebo C H

# Set initial velocities
velocity all create 300.0 761341

# Define simulation settings
timestep 0.0005

# Integrate equations of motion
fix 1 all nve

# Output thermodynamic data
thermo 10

# Run the simulation
run 100
