# LAMMPS input script for a simple virus model with dynamic spherical wall

# Initialize simulation
units lj
dimension 3
boundary p p p
atom_style molecular

# Read initial configuration
read_data virus_model.data

# Define groups based on atom types
group NC type 1 2
group rest subtract all NC

# Set pair styles and coefficients
pair_style lj/cut 2.5
pair_coeff * * 1.0 1.0 2.5

# Define bond style and coefficients
bond_style harmonic
bond_coeff * 100.0 1.5

# Define angle style and coefficients
angle_style harmonic
angle_coeff * 50.0 120.0

# Define a spherical region with a variable radius
variable radius equal 50.0 + step*0.0001
region sphere_wall sphere 0.0 0.0 0.0 v_radius side out

# Apply wall/region fix to the system
fix wall all wall/region sphere_wall lj93 1.0 1.0 2.5

# Define thermostats
fix nvt_rest rest nvt temp 1.0 1.0 100.0
fix nvt_nc NC nvt/manifold/rattle sphere 0.0 0.0 0.0 50.0 temp 1.0 1.0 100.0

# Output settings
thermo 1000
thermo_style custom step temp pe ke etotal v_radius
dump 1 all custom 50000 trajectory.lammpstrj id type x y z

# Run the simulation
timestep 0.005
run 3500000
