# LAMMPS input script for a binary Lennard-Jones fluid in a cubic box

units lj
atom_style atomic

# Create a cubic box with side length 10.08
variable side equal 10.08
region box block 0 ${side} 0 ${side} 0 ${side}
create_box 2 box

# Define number of atoms and density
variable natoms equal 512
variable natomstype equal ${natoms}/2
variable density equal 0.5

# Create atoms
create_atoms 1 random ${natomstype} 12345 box
create_atoms 2 random ${natomstype} 67890 box

# Assign masses
mass 1 1.0
mass 2 1.0

# Define Lennard-Jones potential
pair_style lj/cut 2.5
pair_coeff 1 1 1.0 1.0 2.5
pair_coeff 2 2 1.0 1.0 2.5
pair_coeff 1 2 1.0 1.0 2.5

# Apply tail corrections
pair_modify tail yes

# Set initial velocities
velocity all create 1.0 12345 mom yes dist gaussian

# Energy minimization
minimize 1.0e-4 1.0e-6 100 1000

# Define time step
timestep 0.005

# Microcanonical ensemble (NVE)
fix 1 all nve
thermo 100
thermo_style custom step temp pe ke etotal press density
dump 1 all xyz 100 dump_nve.xyz
run 1000
unfix 1

# Canonical ensemble (NVT)
fix 2 all nvt temp 1.0 1.0 0.1
thermo 100
dump 2 all xyz 100 dump_nvt.xyz
run 1000
unfix 2

# End of script
