# LAMMPS input script for 2D heat conduction using SPH

units       lj
dimension   2
atom_style  atomic

# Create a 2D simulation box
region      simbox block 0 10 0 5 -0.1 0.1
create_box  1 simbox

# Define lattice and create particles
lattice     sq2 0.1
region      left block 0 5 0 5
region      right block 5 10 0 5
create_atoms 1 region left
create_atoms 1 region right

# Set initial internal energy
set         region left   property/atom een 1.0
set         region right  property/atom een 2.0

# Define the pair style and coefficients
pair_style  sph/heatconduction 2.0e-2
pair_coeff  * * 1.0e-4

# Set particle density
set         type 1 density 0.1

# Define boundary conditions
boundary    f p p

# Define timestep
timestep    0.025

# Fix to keep particles stationary
fix         1 all sph/stationary

# Output thermodynamic data
thermo      10
thermo_style custom step pe ke etotal

# Run simulation
run         160

# Compare with analytical solution
print "Simulation completed. Compare temperature profile with analytical solution."
