# LAMMPS input script for Argon deposition on SiC substrate

units           metal
dimension       3
boundary        p p f
atom_style      atomic

# Read initial SiC substrate data
read_data       sic_substrate.data

# Define regions
region          delete_region block INF INF INF INF 20.0 INF

# Delete atoms above a certain height to smooth the surface
group           delete_atoms region delete_region
delete_atoms    group delete_atoms

# Define potentials
pair_style      hybrid tersoff zbl
pair_coeff      * * tersoff SiC.tersoff Si C NULL
pair_coeff      1 2 zbl 1.0 2.0
pair_coeff      1 3 zbl 1.0 3.0
pair_coeff      2 3 zbl 2.0 3.0

# Define groups
group           sic type 1 2
group           argon type 3

# Apply a reflective wall at the lower z-boundary
fix             wall all wall/reflect zlo EDGE

# Equilibrate SiC substrate
velocity        sic create 300.0 12345 mom yes rot yes dist gaussian
fix             nvt_sic sic nvt temp 300.0 300.0 100.0
run             10000
unfix           nvt_sic

# Loop for deposition
variable        n loop 200
label           loop

    # Define deposition region
    region      dep_region block 0 50 0 50 21.0 25.0 units box
    fix         dep argon deposit 10 3 100 12345 region dep_region vz -0.5 -0.3

    # Equilibrate the system after deposition
    fix         nvt_all all nvt temp 300.0 300.0 100.0
    run         5000
    unfix       nvt_all

    # Output thermodynamic data and atom positions
    thermo      1000
    thermo_style custom step temp pe ke etotal
    dump        1 all atom 500 dump.argon_deposit.lammpstrj
    dump_modify 1 sort id

next            n
jump            SELF loop

# End of script
