# LAMMPS input script for BCC Iron with Spin Dynamics

# Initialization
units           metal
dimension       3
boundary        p p p
atom_style      spin

# Lattice and region
lattice         bcc 3.96
region          simbox block 0 34 0 34 0 5
create_box      1 simbox
create_atoms    1 box

# Set mass and spins
mass            1 1.0
set             atom * spin random

# Pair style and interactions
pair_style      hybrid/overlay spin/exchange spin/magelec spin/dmi
pair_coeff      * * spin/exchange 1.0 1.0 1.0
pair_coeff      * * spin/magelec 0.1
pair_coeff      * * spin/dmi 0.05 1.0 1.0 1.0

# Spin dynamics
fix             1 all precession/spin 1.0 damping 0.1
fix_modify      1 energy yes

# Anisotropy
fix             2 all spin/anisotropy easy-axis 0.01 1.0 0.0 0.0

# Time integration
timestep        0.0001

# Output settings
thermo          50
thermo_style    custom step time temp pe ke etotal
thermo_modify   norm no

# Dumps
dump            1 all custom 100 dump.spins id type x y z sx sy sz fx fy fz

# Spin minimization
min_style       spin/cg
minimize        1e-6 1e-8 1000 10000

# Run
run             10000
