# LAMMPS input script for tethered nanorods simulation

units           lj
atom_style      hybrid molecular sphere

# Create simulation box and initialize atoms
region          box block 0 10 0 10 0 10
create_box      2 box

# Define atoms for rods and tethers
# Example: create_atoms and set commands to define atom types

# Bond style and coefficients for tethers
bond_style      fene
bond_coeff      1 30.0 1.5 1.0 1.0

# Pairwise interaction
pair_style      lj/cut 2.5
pair_coeff      * * 1.0 1.0 2.5

# Define groups
group           rods type 1
group           tethers type 2

# Set initial velocities
velocity        all create 1.4 12345

# Fixes for integration
fix             1 all nve
fix             2 all langevin 1.4 1.4 1.0 45678

# Rigid body integration schemes for rods
fix             3 rods rigid/nve molecule
fix             4 rods rigid/nvt molecule temp 1.4 1.4 1.0
fix             5 rods rigid/npt molecule temp 1.4 1.4 1.0 iso 0.0 0.0 1.0
fix             6 rods rigid/nph molecule iso 0.0 0.0 1.0

# Customize thermodynamic output
thermo_style    custom step temp pe press
thermo          100

# Time step
timestep        0.005

# Run simulations for different integrators
run             5000

# Switch integration schemes and run simulations
unfix           3
fix             3 rods rigid/nvt molecule temp 1.4 1.4 1.0
run             5000

unfix           3
fix             3 rods rigid/npt molecule temp 1.4 1.4 1.0 iso 0.0 0.0 1.0
run             5000

unfix           3
fix             3 rods rigid/nph molecule iso 0.0 0.0 1.0
run             5000

# End of script
