# LAMMPS input script for 2D micelle simulation

units lj
dimension 2
atom_style hybrid angle

# Create simulation box
region simbox block 0 50 0 50 -0.1 0.1
create_box 2 simbox

# Create atoms for solvent and micelle components
create_atoms 1 random 1000 12345 simbox  # Solvent
create_atoms 2 random 100 54321 simbox   # Micelle heads
create_atoms 3 random 100 67890 simbox   # Micelle tails

# Define masses
mass 1 1.0
mass 2 1.0
mass 3 1.0

# Define bond style for micelle components
bond_style harmonic
bond_coeff 1 30.0 1.5

# Neighbor list settings
neighbor 0.3 bin
neigh_modify every 1 delay 0 check yes

# Soft potential push-off phase
pair_style hybrid/overlay lj/cut 2.5 soft 2.5
pair_coeff * * lj/cut 0.0 0.0
pair_coeff 1 2 soft 0.0 1.0
pair_coeff 2 3 soft 0.0 1.0
pair_coeff 1 3 soft 0.0 1.0

# Temperature initialization and control
velocity all create 0.45 12345679
fix temp_control all temp/rescale 1 0.45 0.45 0.02 1.0

# Equilibrate with soft potential push-off
variable prefactor equal ramp(1.0,20.0)
fix soft_push all adapt 100 pair soft a * * v_prefactor
run 5000

# Switch to main interaction potentials
unfix soft_push
pair_coeff * * lj/cut 0.0 0.0  # Clear soft potential
pair_coeff 1 2 lj/cut 1.0 1.0  # Solvent-head interaction
pair_coeff 2 2 lj/cut 1.0 1.0  # Head-head interaction
pair_coeff 3 3 lj/cut 1.0 1.0  # Tail-tail interaction
pair_coeff 1 3 lj/cut 0.5 0.8  # Solvent-tail interaction

# Fixes for dynamics
fix 1 all nve
fix 2 heads rigid/nve group 2
fix 3 tails rigid/small molecule

# Run the main simulation
thermo 50
thermo_style custom step temp pe ke etotal
run 20000

# Clean up
unfix 1
unfix 2
unfix 3
