# LAMMPS input script for 2D simulation of line and triangle-shaped aspherical particles

units lj
atom_style ellipsoid
dimension 2
boundary p p p

# Create simulation box
region box block 0 20 0 20 -0.5 0.5
create_box 2 box

# Create atoms
create_atoms 1 random 100 12345 box
create_atoms 2 random 100 54321 box

# Define particle shapes
set type 1 shape 1.0 0.1 0.1  # Line-shaped particles
set type 2 shape 0.6 0.6 0.6  # Triangle-shaped particles

# Define masses
mass 1 1.0
mass 2 1.0

# Define initial velocities
velocity all create 1.44 12345

# Define Lennard-Jones interactions for lines and triangles
pair_style line/lj 2.5
pair_coeff 1 1 1.0 1.0 2.5
pair_coeff 2 2 1.0 1.0 2.5
pair_coeff 1 2 1.0 1.0 2.5

# Apply Langevin thermostat
fix 1 all langevin 1.44 1.44 1.0 12345
fix 2 all nve/rigid molecule

# Apply 2D constraint
fix 3 all enforce2d

# Initialize deformation
change_box all x scale 0.3 y scale 0.3

# Compute energies
compute ke all ke/atom
compute pe all pe/atom
compute rot all erotate/sphere

# Output settings
thermo 1000
thermo_style custom step temp c_ke c_pe c_rot etotal

# Run simulation before shear
timestep 0.004
run 10000

# Deform box to triclinic for shear
change_box all triclinic

# Apply shear deformation
fix 4 all deform 1 xy erate 0.01 remap x

# Run simulation with shear
run 10000
