# LAMMPS input script for BCC lattice with W and He using hybrid SNAP potential
units           metal
dimension       3
boundary        p p p
atom_style      atomic

# Define lattice and create box
lattice         bcc 3.1803
region          box block 0 4 0 4 0 4
create_box      2 box

# Create atoms and substitute 5% with He
create_atoms    1 box
set type 2 fraction 0.05 12345

# Define masses
mass            1 183.84      # Tungsten
mass            2 4.0026      # Helium

# Specify hybrid pair style with SNAP
pair_style      hybrid snap

# Define pair coefficients for SNAP
pair_coeff      * * snap tungsten_he_he.snapcoeff tungsten_he_he.snapparam W He

# Initialize velocities
velocity        all create 300.0 12345

# Define simulation settings
timestep        0.0005
thermo          10

# Run simulation
fix             1 all nve
run             1000
