# LAMMPS input script for simulating DNA-like structures using the oxDNA model

units lj
atom_style hybrid bond ellipsoid oxDNA
boundary p p p

# Read initial configuration
read_data dna_structure.data

# Define masses for atom types
mass 1 1.0  # Example mass for atom type 1
mass 2 1.0  # Example mass for atom type 2
# Add more mass definitions as needed

# Grouping atoms by type
group type1 type 1
group type2 type 2
# Add more groups as needed

# Pair style using hybrid overlay for multiple interactions
pair_style hybrid/overlay oxDNA/excluded oxDNA/stacking oxDNA/hbond oxDNA/xstax oxDNA/coaxstax

# Define pair coefficients for oxDNA interactions
pair_coeff * * oxDNA/excluded 1.0 1.0  # Example coefficients
pair_coeff * * oxDNA/stacking 1.0 1.0
pair_coeff * * oxDNA/hbond 1.0 1.0
pair_coeff * * oxDNA/xstax 1.0 1.0
pair_coeff * * oxDNA/coaxstax 1.0 1.0

# Bond style and coefficients for oxDNA FENE potential
bond_style oxDNA/fene
bond_coeff * 30.0 1.5 1.0 1.0  # Example coefficients

# Set up integrator and run parameters
timestep 1e-5
fix 1 all nve/asphere

# Compute energies
compute ke all ke
compute pe all pe
compute rot all erotate/asphere

# Output settings
thermo 10000
thermo_style custom step temp c_ke c_pe c_rot

# Output trajectory and final configuration
dump 1 all custom 10000 trajectory.lammpstrj id type x y z
dump_modify 1 sort id

# Run simulation
run 1000000

# Write final configuration
write_data final_configuration.data
