# LAMMPS input script for a Pt surface simulation using EAM potential and hyperdynamics

# Initialize simulation
units metal
dimension 3
boundary p p f
atom_style atomic

# Create fcc lattice and simulation box
lattice fcc 3.92
region simbox block 0 10 0 10 0 10
create_box 2 simbox

# Define regions for substrate and adatoms
region substrate block INF INF INF INF 0 4 units box
region adatoms block INF INF INF INF 4 10 units box

# Create atoms
create_atoms 1 region substrate
create_atoms 2 region adatoms

# Assign masses
mass 1 195.08  # Pt atomic mass
mass 2 195.08  # Pt atomic mass

# Apply EAM potential
pair_style eam
pair_coeff * * Pt_u3.eam

# Define groups
group substrate region substrate
group adatoms region adatoms
group mobile subtract all substrate

# Set initial velocities
velocity mobile create 500.0 12345 mom yes rot yes dist gaussian

# Apply fixes
fix 1 all nve
fix 2 mobile langevin 500.0 500.0 0.1 12345
fix 3 substrate setforce 0.0 0.0 0.0

# Hyperdynamics setup
fix 4 mobile hyper/global 0.1
fix_modify 4 energy yes

# Event detection
fix 5 mobile displace/atom 0.1

# Run parameters
thermo 100
thermo_style custom step temp pe ke etotal
dump 1 all custom 100 dump.pt id type x y z

# Run simulation
run 10000
