# LAMMPS input script for methane in TIP4P/2005 water using hybrid pair style

units real
atom_style full
boundary p p p

# Read data file
read_data methane_water.data

# Define pair styles
pair_style hybrid lj/cut/coul/long 12.0 10.0 lj/cut 12.0 tip4p/long 1 2 1 1 0.125 12.0
pair_coeff * * lj/cut/coul/long 0.0 0.0
pair_coeff 1 1 lj/cut 0.294 3.75 # Methane-methane
pair_coeff 1 2 lj/cut/coul/long 0.0 0.0 # Methane-water
pair_coeff 2 2 tip4p/long # Water-water

# Bond and angle styles for methane
bond_style harmonic
bond_coeff 1 340.0 1.09 # Methane C-H bond

angle_style harmonic
angle_coeff 1 50.0 109.5 # Methane H-C-H angle

# Set kspace style for long-range Coulombic interactions
kspace_style pppm 1.0e-4

# Fix for SHAKE algorithm on water molecules
fix shake_water all shake 0.0001 20 0 b 2 a 2

# Define groups
group methane type 1
group water type 2

# Initial velocities
velocity all create 300.0 12345

# Define NPT ensemble for temperature and pressure control
fix npt all npt temp 300.0 300.0 100.0 iso 1.0 1.0 1000.0

# FEP settings
variable lambda equal ramp(0,1)
fix fep all adapt 1000 pair lj/cut/coul/long 1 2 scale v_lambda
fix fep_lj all adapt 1000 pair lj/cut 1 2 epsilon v_lambda sigma v_lambda*3.75

# Run settings
timestep 1.0

# Output settings
thermo 1000
thermo_style custom step temp press pe etotal
dump myDump all atom 10000 dump.methane_water.lammpstrj

# Run simulation
run 2100000

# Clean up
unfix fep
unfix fep_lj
unfix npt
unfix shake_water
