# LAMMPS input script for a solvated 5-mer peptide simulation using CHARMM force field

# Initialization
units real
atom_style full
boundary p p p

# Read data file
read_data peptide_system.data

# Define force field
pair_style lj/charmm/coul/long 10.0 12.0
bond_style harmonic
angle_style charmm
dihedral_style charmm
improper_style harmonic
kspace_style pppm 1.0e-4

# Define groups
group peptide type 1  # Assuming type 1 is the peptide
group solvent type 2  # Assuming type 2 is the solvent
group reference id 1  # Reference group for zero force, assuming atom ID 1
group colvar group peptide  # Group for collective variable calculations

# Apply constraints
fix shake_bonds all shake 0.0001 20 0 b 1 a 1  # Constrain bonds and angles for water

# Apply thermostat
fix nvt all nvt temp 275.0 275.0 100.0

# Zero force fix for reference group
fix zero_force reference setforce 0.0 0.0 0.0

# Output settings
thermo_style custom step temp etotal ke pe evdwl ecoul elong press
thermo 10

# PLUMED input
fix plumed all plumed plumed.dat

# Run simulation
timestep 2.0
run 101

Note: Ensure that `peptide_system.data` and `plumed.dat` files are correctly formatted and available in the working directory. Adjust group definitions and fix parameters based on the actual system configuration and desired constraints.
