# LAMMPS input script for a binary alloy system with BCC lattice

units           metal
dimension       3
boundary        p p p
atom_style      atomic

# Create simulation box with BCC lattice
lattice         bcc 2.87
region          box block 0 20 0 20 0 20
create_box      2 box

# Define masses for Fe and Cu
mass            1 55.845
mass            2 63.546

# Create atoms
create_atoms    1 box
create_atoms    2 box

# Assign EAM potential
pair_style      eam/fs
pair_coeff      * * FeCu.pasianot.eamfs Fe Cu

# Set initial velocities
velocity        all create 1400.0 12345 mom yes dist gaussian

# Define and apply NPT ensemble
fix             1 all npt temp 700.0 700.0 100.0 iso 0.0 0.0 1000.0

# Apply SGCMC for atom swaps and concentration fluctuations
fix             2 all sgcmc 100 1 2 0.02 -0.70 1000.0 12345

# Thermodynamic output
thermo          100
thermo_style    custom step temp press pe

# Run the simulation
run             2000
