# LAMMPS input script for a CHON system using ReaxFF

units real
atom_style charge

# Read atomic data from file
read_data data.RDX

# Define the reaxff pair style with the force field file
pair_style reax/c lmp_control
pair_coeff * * ffield.reax.rdx C H O N

# Neighbor list settings
neighbor 2.0 bin
neigh_modify every 10 delay 0 check no

# Fix for NVE integration
fix 1 all nve

# Charge equilibration
fix 2 all qeq/reax 1 0.0 10.0 1.0e-6 reax/c

# Apply Berendsen thermostat
fix 3 all temp/berendsen 500.0 500.0 100.0

# Timestep for integration
timestep 0.25

# Output thermodynamic data every 100 steps
thermo 100

# Run the simulation for 3000 steps
run 3000
