# LAMMPS Input Script for Water Simulation with Electric Field and AtC

units real
atom_style full
boundary p p f

# Create simulation box
region box block 0 30 0 30 0 60
create_box 2 box

# Create water molecules
# Here you would use a separate data file or commands to create water, e.g., read_data

# Pair style and coefficients
pair_style lj/cut/coul/long 10.0
pair_coeff 1 1 0.1553 3.166 # O-O
pair_coeff 2 2 0.0 0.0 # H-H
pair_coeff 1 2 0.0 0.0 # O-H

# Bond and angle styles
bond_style harmonic
bond_coeff 1 450 0.9572

angle_style harmonic
angle_coeff 1 55 104.52

# Set up kspace for long-range interactions
kspace_style pppm 1.0e-4

# Apply SHAKE algorithm to constrain bonds and angles
fix 1 all shake 0.0001 20 0 b 1 a 1

# Initialize velocities
velocity all create 300.0 12345

# Equilibration phase using NVT
fix 2 all nvt temp 300.0 300.0 100.0
run 10000
unfix 2

# Apply external electric field in z-direction
fix 3 all efield 0.0 0.0 0.1

# Enable AtC coupling
fix 4 all atc
fix_modify 4 mesh yes

# Define AtC properties
compute atc all atc property/density local
compute dipole all property/atom dipole

# Output settings
thermo_style custom step temp etotal ke pe evdwl ecoul ebond eangle epair
thermo 1000

# Dynamics phase using NVE
fix 5 all nve
run 50000

# Unfix all fixes
unfix 1
unfix 3
unfix 4
unfix 5

Note: This script provides a general structure for the simulation described. You should ensure that data files or specific molecule creation commands are correctly configured to define water molecules, and adjust parameters such as pair coefficients, region sizes, and simulation times as needed for your specific system.
