# LAMMPS input script for a 2D hexagonal lattice simulation with LJ potentials and LJ 9-3 walls

units lj
dimension 2
boundary f f p

atom_style atomic

# Define the simulation box
region box block 0 20 0 20 -0.5 0.5
create_box 1 box

# Create atoms in a hexagonal lattice
lattice hex 0.8442
region circle circle 10 10 5
create_atoms 1 region circle

# Define interatomic potential
pair_style lj/cut 2.5
pair_coeff 1 1 1.0 1.0 2.5

# Define wall potentials
fix wallx all wall/lj93 xlo EDGE 1.0 1.0 2.5 xhi EDGE 1.0 1.0 2.5
fix wally all wall/lj93 ylo EDGE 1.0 1.0 2.5 yhi EDGE 1.0 1.0 2.5

# Set initial velocities
velocity all create 1.0 12345 dist gaussian

# Define integrator
fix 1 all nve

# Setup communication and load balancing
comm_modify mode single cutoff 2.5

# Define output
thermo 100
thermo_style custom step temp epair press cpu

# Run the simulation
timestep 0.001
run 10000
