# LAMMPS input script for a hybrid QM/MM simulation of two water molecules

units           real
atom_style      full
boundary        p p p

# Define atom types
atom_modify     map array
pair_style      lj/cut/coul/long 12.0
bond_style      harmonic
angle_style     harmonic
kspace_style    pppm 1.0e-4

# Read initial structure
read_data       water_molecules.data

# Group definitions for QM/MM
group           qm id 1 2 3   # First water molecule
group           mm id 4 5 6   # Second water molecule

# Zero charges for QM atoms and remove bonds/angles in QM region
set             group qm charge 0.0
delete_bonds    group qm multi

# Force field parameters for MM part (Lennard-Jones and harmonic)
pair_coeff      1 1 0.1553 3.15365  # O-O
pair_coeff      2 2 0.0 0.0         # H-H
pair_coeff      1 2 0.0 0.0         # O-H

bond_coeff      1 450 0.9572        # O-H bond
angle_coeff     1 55 104.52         # H-O-H angle

neighbor        2.0 bin
neigh_modify    delay 0 every 1 check yes

# Initialize velocities
velocity        all create 300.0 12345678

# QM/MM setup using MDI with PySCF for QM calculations
fix             qmmm all mdi/qmmm 1 1.0 12.0

# Define integration parameters
fix             1 all nve

# Thermo and dump settings
thermo_style    custom step temp ke pe etotal
thermo          1
dump            1 all atom 1 dump.qmmm

# Run the simulation
timestep        1.0
run             10
