# LAMMPS input script for quartz simulation using Vashishta potential

units           metal
atom_style      charge
boundary        p p p

# Read atomic configuration from data file
read_data       data.quartz

# Replicate the system
replicate       4 4 4

# Define the Vashishta potential
pair_style      vashishta
pair_coeff      * * SiO.1990.vashishta Si O

# Neighbor settings
neighbor        2.0 bin
neigh_modify    delay 10 every 1 check yes

# Assign initial velocities
velocity        all create 2000.0 12345 mom yes rot yes dist gaussian

# Displace atoms to avoid overlap
displace_atoms  all random 0.1 0.1 0.1 12345

# Define the time integration
timestep        0.001
fix             1 all nve

# Thermodynamics settings
thermo          10
thermo_style    custom step temp pe ke etotal press

# Run the simulation
run             100
