# LAMMPS input script for temperature replica exchange of a solvated 5-mer peptide

units real
atom_style full
boundary p p p

# Read the data file
read_data data.peptide

# Set force field parameters
pair_style lj/charmm/coul/long 10.0 12.0
pair_coeff * *

bond_style harmonic
angle_style charmm
dihedral_style charmm
improper_style harmonic

kspace_style pppm 1.0e-4

# Neighbor list settings
neighbor 2.0 bin
neigh_modify delay 5

# Define SHAKE constraints
fix shake_fix all shake 0.0001 20 0 b 1 a 1

# Create temperature replicas
replicate 1 1 8

# Define the temperature range for replicas
variable temp index 275 280 285 290 295 300 305 310

# Apply NPT ensemble with temperature and pressure control
fix npt_fix all npt temp ${temp} ${temp} 100 iso 1.0 1.0 1000

# Define the temperature replica exchange
fix replica all temper/npt 100 1000 100 12345 npt_fix

# Output settings
thermo 100
thermo_style custom step temp press pe ke etotal
thermo_modify flush yes

# Run the simulation
timestep 2.0
run 50000

# Clean up
unfix npt_fix
unfix replica
unfix shake_fix

This script sets up a temperature replica exchange molecular dynamics simulation for a peptide using the specified CHARMM force field and system settings. Adjust the number of replicas, timestep, or run length as needed for your specific study.
