# LAMMPS Input Script for SiC Simulation using MEAM Potential

units metal
dimension 3
boundary p p p

atom_style atomic

# Read atomic configuration from data file
read_data data.meam

# Define MEAM potential
pair_style meam
pair_coeff * * library.meam Si C SiC.meam Si C

# Neighbor list settings
neighbor 2.0 bin
neigh_modify delay 10

# Fix for time integration using microcanonical ensemble
fix 1 all nve

# Output settings for thermodynamic properties
thermo 10
thermo_style custom step temp epair etotal press

# Uncomment the following dump commands for detailed output (if needed)
# dump 1 all atom 10 dump.atom
# dump 2 all image 10 image.*.jpg type type
# dump 3 all movie 10 movie.mpg type type

# Time integration settings
timestep 0.001

# Run the simulation
run 100
