# LAMMPS input script for RDX system using ReaxFF

units real
atom_style charge
boundary p p p

# Read initial configuration
read_data rdx.data

# ReaxFF potential
pair_style reax/c lmp_control
pair_coeff * * ffield.reax C H O N

# Neighbor settings
neighbor 2.0 bin
neigh_modify every 10 delay 0 check no

# Define computes for energy contributions
compute reax all pair reax/c
variable eb equal c_reax[1]  # Bond energy
variable ea equal c_reax[2]  # Angle energy
variable elp equal c_reax[3] # Lone pair energy
variable emol equal c_reax[4] # Molecular energy

# Integrate using NVE ensemble
fix 1 all nve

# Charge equilibration
fix 2 all qeq/reax 1 0.0 10.0 1e-6 reax/c

# Thermodynamic outputs
thermo 10
thermo_style custom step temp epair etotal press v_eb v_ea v_elp v_emol

# Run the simulation
timestep 1.0
run 100

# Uncomment the following lines for output dumps if needed
# dump 1 all atom 10 dump.rdx.atom
# dump 2 all image 50 image.*.jpg type type &
#         axes yes 0.8 0.02 view 60 -30
# dump 3 all movie 100 movie.mpg type type &
#         axes yes 0.8 0.02 view 60 -30
