units lj
atom_style atomic
dimension 2
boundary p p p

read_data plane.data

pair_style lj/smooth/linear 2.5
pair_coeff * * 1.0 1.0

neighbor 0.3 bin
neigh_modify every 1 delay 0 check yes

timestep 0.0005

fix 1 all nve
fix 2 all enforce2d

thermo_style custom step time temp pe ke etotal
thermo 10000

variable time equal time
variable pe equal pe
variable ke equal ke
variable etotal equal etotal

fix 3 all ave/time 25000 1 25000 v_time v_pe v_ke v_etotal file thermo.plane.dat

dump 1 all custom 1000000 dump.plane.lammpstrj.gz id type x y vx vy

run 10000000
