# LAMMPS input script for a quasi-one-dimensional SPH simulation of a binary fluid system

units           lj
atom_style      atomic

# Define the simulation box and create atoms
region          simbox block 0 20 0 1 0 1
create_box      2 simbox
lattice         sc 0.8

# Create particles of type 1
region          left block 0 10 0 1 0 1
create_atoms    1 region left

# Create particles of type 2
region          right block 10 20 0 1 0 1
create_atoms    2 region right

# Set masses and initial internal energies
mass            1 1.0
mass            2 2.0

set             type 1 density 1.0
set             type 2 density 0.8

set             type 1 energy 2.0
set             type 2 energy 3.0

# Specify pair styles
pair_style      hybrid/overlay sph/rhosum sph/idealgas
pair_coeff      * * sph/rhosum 1.0 1.0
pair_coeff      * * sph/idealgas 1.0 1.0

# Set neighbor list
neighbor        0.3 bin
neigh_modify    delay 0

# Set fixes
fix             1 all nve
fix             2 all setforce NULL 0.0 0.0

# Set timestep
timestep        0.05

# Define thermo settings
thermo          100
thermo_style    custom step time ke pe etotal

# Output settings
dump            1 all custom 100 dump.sph id type x y z density
dump_modify     1 sort id

# Run the simulation
run             400
