# LAMMPS input script for a 3D Lennard-Jones melt simulation

units lj
atom_style atomic

# Create simulation box
lattice fcc 0.8442
region box block 0 10 0 10 0 10
create_box 1 box
create_atoms 1 box

# Set atom properties
mass 1 1.0

# Define interatomic potential
pair_style lj/cut 2.5
pair_coeff 1 1 1.0 1.0 2.5

# Initial velocities
velocity all create 3.0 12345

# Define integrator
fix 1 all nve

# Neighbor settings
neighbor 0.3 bin
neigh_modify every 20 delay 0 check yes

# Output settings
dump 1 all vtk 50 dump*.vtk id type vx vy vz fx fy fz

# Run the simulation
timestep 0.005
run 250
