# LAMMPS input script for polymer translocation through a nanopore with LB fluid

units lj
atom_style hybrid molecular atomic
boundary p p p
dimension 3

# Define variables
variable polymer_length equal 32
variable pore_radius equal 2.0
variable wall_thickness equal 10.0
variable fluid_density equal 0.8
variable fluid_viscosity equal 0.1

# Create polymer system
lattice fcc 0.8442
region box block 0 50 0 50 0 50
create_box 2 box

# Create polymer beads
region polymer block 20 30 20 30 0 5
create_atoms 1 random ${polymer_length} 12345 polymer

# Define polymer bonds
bond_style fene
bond_coeff 1 30.0 1.5 1.0 1.0

# Set Lennard-Jones interactions
pair_style lj/cut 1.12246
pair_coeff 1 1 1.0 1.0 1.12246
pair_coeff 1 2 1.0 1.0 1.12246

# Create wall atoms
region wall block 0 50 0 50 45 50
region nanopore cylinder z 25 25 ${pore_radius} 45 50 side out
region wall_with_pore subtract wall nanopore
create_atoms 2 region wall_with_pore

# Immobilize wall atoms
group wall type 2
fix fix_wall wall setforce 0.0 0.0 0.0

# Define polymer group
group polymer type 1

# Apply rigid body dynamics to polymer
fix fix_rigid_polymer polymer rigid/small molecule

# Setup Lattice-Boltzmann fluid
fix lbm_flow all lb/fluid 0.5 0.5 0.5 ${fluid_density} ${fluid_viscosity} 123456
fix lbm_force all lb/force

# Run simulation
timestep 0.005
thermo 100
thermo_style custom step temp pe ke etotal

# Output for visualization
dump dump_polymer polymer custom 100 polymer.lammpstrj id type x y z
dump dump_wall wall custom 100 wall.lammpstrj id type x y z
dump_modify dump_polymer scale no
dump_modify dump_wall scale no

# Run the simulation
run 50000
