# LAMMPS input script for surface tension measurement of water using TIP4P/2005

units real
atom_style full
boundary p p p

# Define simulation box
lattice sc 3.165 # Approximate lattice constant for water
region box block 0 10 0 10 0 10
create_box 2 box

# Create water molecules
molecule water TIP4P2005.molecule

# Fill the simulation box with water molecules
create_atoms 0 random 1000 12345 box mol water 1

# Define interactions
pair_style lj/cut/tip4p/long 1 2 0.125 8.5
pair_coeff 1 1 0.0 0.0 0.125
pair_coeff 2 2 0.0 0.0 0.125
pair_coeff 1 2 0.0 0.0 0.125

bond_style harmonic
bond_coeff 1 450 0.9572

angle_style harmonic
angle_coeff 1 55 104.52

kspace_style pppm/tip4p 1.0e-4

# SHAKE constraints for water molecules
fix shake_water all shake 0.0001 20 0 b 1 a 1

# Initial velocities and temperature
velocity all create 293.15 12345 dist gaussian
fix temp_control all temp/berendsen 293.15 293.15 100.0

# Equilibration
fix 1 all nve
thermo 1000
thermo_style custom step temp press pe ke etotal
run 10000

# Unfix the thermostat for production run
unfix temp_control

# Production run for surface tension measurement
fix temp_control all temp/berendsen 293.15 293.15 100.0
thermo_style custom step temp press pxx pyy pzz lx ly lz
thermo 1000
dump 1 all custom 1000 dump.water id type x y z
run 100000

# Post-processing for surface tension calculation
# Surface tension calculation not included directly in LAMMPS output,
# User should calculate using (1/2) * (Lz/2) * (Pzz - 0.5 * (Pxx + Pyy))

This script sets up a simulation using the TIP4P/2005 water model with a cubic lattice, applies the SHAKE algorithm, and measures surface tension using the specified LAMMPS features. The surface tension should be calculated from the output pressure components in post-processing.
