# LAMMPS input script for BCC lattice of tantalum with MLIAP and ZBL potential

units           metal
atom_style      atomic
boundary        p p p

# Define the lattice and region
lattice         bcc 3.316
region          box block 0 4 0 4 0 4
create_box      1 box
create_atoms    1 box

# Set potential styles
pair_style      hybrid/overlay mlip torch zbl 3.316
pair_coeff      * * mlip torch_model.pt Ta
pair_coeff      * * zbl 73 73

# Initialize velocities
velocity        all create 300 12345 mom yes rot yes dist gaussian

# Define settings for time integration
timestep        0.0005
thermo_style    custom step temp pe etotal press
thermo          100

# Use the Kokkos package for parallel efficiency
package         kokkos on

# Define simulation ensemble
fix             1 all nve

# Run the simulation
run             10000

# Unfix the integration style
unfix           1
