# LAMMPS Input Script for 2D Lennard-Jones System

# Initialize simulation
clear
units lj
dimension 2
atom_style atomic

# Create simulation box
lattice sq 0.8442
region box block 0 20 0 20 -0.5 0.5
create_box 1 box
create_atoms 1 box

# Define mass and potential
mass 1 1.0
pair_style lj/cut 2.5
pair_modify shift yes
pair_coeff 1 1 1.0 1.0 2.5

# Set neighbor list
neighbor 0.3 bin
neigh_modify every 1 delay 0 check yes

# Set initial velocities
velocity all create 5.0 12345

# Define fixes
fix 1 all nve
fix 2 all enforce2d

# Output settings
thermo 50
thermo_style custom step temp pe ke etotal

# Run simulation
timestep 0.005
run 1000

# Energy minimization
unfix 1
minimize 1.0e-4 1.0e-6 100 1000
min_style fire

# End of script
