# SPC/E Water Energy Calculation using LAMMPS

units real
atom_style full

# Read user-specified input configuration
read_data user_input.data

# Define force field parameters for SPC/E water
pair_style lj/cut/coul/long 9.0
bond_style harmonic
angle_style harmonic
kspace_style ewald 1.0e-4

# SPC/E water parameters
pair_coeff 1 1 0.1553 3.166  # O-O Lennard-Jones parameters
pair_coeff 2 2 0.0 0.0       # H-H no Lennard-Jones interaction
pair_coeff 1 2 0.0 0.0       # O-H no Lennard-Jones interaction

bond_coeff 1 450.0 1.0       # O-H bond: force constant (kcal/mol/A^2), equilibrium distance (Å)
angle_coeff 1 55.0 104.52    # H-O-H angle: force constant (kcal/mol/rad^2), equilibrium angle (degrees)

# Apply long-range tail corrections
pair_modify tail yes

# Set up periodic boundary conditions
boundary p p p

# No need to replicate the simulation cell
replicate 1 1 1

# Output settings
thermo_style custom step pe ke etotal
thermo 1

# Run for zero timesteps to compute initial potential energy
run 0
