# LAMMPS Input Script for Argon MD Simulation with Lennard-Jones Potential

units real
atom_style atomic

# Create FCC lattice
lattice fcc 5.405
region box block 0 10 0 10 0 10
create_box 1 box
create_atoms 1 box

# Define potential
pair_style lj/cut 10.0
pair_coeff 1 1 0.2381 3.405

# Set Reflective boundary conditions in z, free in x and y
boundary p p f

# Define masses
mass 1 39.948

# Initialize velocities
velocity all create 300.0 12345

# Define AtC fix for two-temperature model
fix atc all atc two_temperature model continuum
fix_modify atc temperature atoms 300.0
fix_modify atc temperature electrons 500.0
fix_modify atc electron_init gaussian mean 500.0 stddev 50.0

# Thermal flux control
fix flux all thermal/conductivity 10

# Define timestep and run
timestep 1.0
thermo 10
thermo_style custom step temp pe f_atc_temp_atoms f_atc_temp_electrons

# Run simulation
run 100
