# LAMMPS Input Script for 3D Lennard-Jones Melt Simulation

units lj
atom_style atomic

# Define simulation box and create atoms
lattice fcc 0.8442
region box block 0 10 0 10 0 10
create_box 2 box
create_atoms 1 box

# Mass for the two atom types
mass 1 1.0
mass 2 1.0

# Define pair styles
pair_style hybrid/overlay lj/cut 2.5 tracker
pair_coeff * * lj/cut 1.0 1.0 2.5

# Neighbor list settings
neighbor 0.3 bin
neigh_modify every 20

# Initial velocities
velocity all create 2.0 12345

# Fixes for the simulation
fix 1 all nve
fix 2 all pair/tracker 1000 trackfile contact_data.txt histfile contact_histogram.txt

# Output settings
thermo 50

# Run the simulation
run 1000
