# LAMMPS input script for a charged particle system with long-range electrostatics

units lj
atom_style charge

# Read the initial configuration from the data file
read_data data.cloud_wall

# Initialize velocities to zero
velocity all create 0.0 12345 rot yes dist gaussian

# Define pair style and coefficients
pair_style zero 10.0
pair_coeff * *

# Set up long-range Coulombic interactions using ScaFaCoS with FMM
kspace_style scafacos/fmm 1.0e-4

# Define neighbor list settings
neighbor 0.3 bin
neigh_modify every 1 delay 0 check yes

# Define the ensemble and integration scheme
fix 1 all nve

# Set the timestep
timestep 0.005

# Output thermodynamic properties
thermo_style custom step temp pe ke etotal ecoul press
thermo 10

# Run the simulation
run 100
