# LAMMPS Input Script for BCC Tantalum with PyTorch MLIAP

# Initialize simulation
units metal
dimension 3
boundary p p p
atom_style atomic

# Create BCC lattice and replicate
lattice bcc 3.30  # Lattice parameter for tantalum
region box block 0 4 0 4 0 4
create_box 1 box
create_atoms 1 box

# Define Interatomic Potential using MLIAP with PyTorch
pair_style mliap model pytorch /path/to/your/tantalum_model.pt
pair_coeff * *

# Set simulation parameters
mass 1 180.95  # Atomic mass of tantalum

# Define initial velocities and equilibrate
velocity all create 300.0 12345 mom yes rot yes dist gaussian

# Define the NVE ensemble for integration
fix 1 all nve

# Set timestep
timestep 0.0005

# Thermodynamic output
thermo 10
thermo_style custom step temp pe etotal press

# Dump atomistic configurations for visualization
dump 1 all cfg 10 dump.*.cfg mass type xs ys zs

# Run the simulation
run 100

Make sure to replace `/path/to/your/tantalum_model.pt` with the actual path to your PyTorch model file for tantalum.
