# LAMMPS input script for a 2D binary mixture of colloids and Lennard-Jones particles

units lj
dimension 2
boundary p p p
atom_style atomic

lattice sq 0.85
region box block 0 30 0 30 -0.5 0.5
create_box 2 box

# Define particle types: type 1 for small particles, type 2 for large colloids
create_atoms 1 box
set type 1 type/fraction 2 0.04 12345

mass 1 1.0
mass 2 9.0

# Define pair potentials
pair_style colloid 2.5
pair_coeff 1 1 1.0 1.0 1.0 1.0
pair_coeff 1 2 1.0 1.0 1.5 1.0
pair_coeff 2 2 1.0 1.0 2.0 1.0

# Initial velocities
velocity all create 2.0 12345

# Define NPT ensemble
fix 1 all npt temp 2.0 2.0 1.0 iso 1.0 1.0 1.0 drag 1.0

# Enforce 2D dynamics
fix 2 all enforce2d

# Run settings
timestep 0.005
thermo 1000
thermo_style custom step temp epair etotal press vol

# Run the simulation
run 50000
