# LAMMPS Input Script for 2D Lennard-Jones Couette Flow

# Initialize simulation
units lj
dimension 2
atom_style atomic
boundary p s p

# Create simulation box
lattice hex 0.8442
region simbox block 0 20 0 10 -0.1 0.1
create_box 3 simbox

# Create atoms
create_atoms 1 box

# Define masses
mass * 1.0

# Define LJ potential
pair_style lj/cut 1.12246
pair_coeff * * 1.0 1.0 1.12246

# Define groups
region lower block INF INF INF 1.0 INF INF
region upper block INF INF 9.0 INF INF INF
group lower region lower
group upper region upper
group boundary union lower upper
group flow subtract all boundary

# Initial velocities
velocity flow create 1.0 12345
velocity boundary set 0.0 0.0 0.0

# Fixes
fix 1 all enforce2d
fix 2 flow temp/rescale 100 1.0 1.0 0.02 1.0
fix 3 lower setforce 0.0 0.0 0.0
fix 4 upper setforce 0.0 0.0 0.0
velocity upper set 3.0 0.0 0.0

# Run settings
timestep 0.003
thermo 500
thermo_style custom step temp pe ke etotal

# Run simulation
run 10000
