# LAMMPS input script for 2D simulation of ellipsoidal particles with SRD

units lj
dimension 2
atom_style ellipsoid
boundary p p p

# Create a lattice of ellipsoidal particles
lattice hex 0.8
region box block 0 20 0 20 -0.5 0.5
create_box 2 box
create_atoms 1 box

# Define ellipsoidal particles
set type 1 shape 1.0 0.5 0.5
set type 1 quat/random 12345

# Initialize velocities for ellipsoidal particles
velocity all create 1.0 12345 dist gaussian

# Define Gay-Berne potential for ellipsoidal particles
pair_style gayberne 1.0 1.0 1.0 5.0
pair_coeff 1 1 1.0 1.0 1.0 5.0

# Integrate ellipsoidal particles using NVE
fix 1 all nve/asphere

# Create a high-density lattice of small spherical particles
region srd_box block 0 20 0 20 -0.5 0.5
lattice sq 0.9
create_atoms 2 region srd_box

# Define properties for small spherical particles
group srd type 2
set group srd diameter 0.5
set group srd mass 0.1

# Remove overlaps with ellipsoidal particles
delete_atoms overlap 0.5 all all

# SRD settings for small spherical particles
fix 2 srd group srd srd 0.1 0.1 12345
fix_modify 2 alter srd_collide yes

# Thermodynamic settings
timestep 0.001
thermo 100
thermo_style custom step temp press etotal vol

# Output settings
dump 1 all custom 100 ellipsoid.lammpstrj id type x y z quatw quati quatj quatk
dump 2 srd custom 100 srd_particles.lammpstrj id type x y z

# Run the simulation
run 10000
