# LAMMPS Input Script for Simulating Amorphous Carbon Formation

units metal
atom_style full
boundary p p p

# Create a simulation box
region box block -20 20 -20 20 -20 20
create_box 1 box

# Define carbon atoms
create_atoms 1 random 5000 12345 box
mass 1 12.0107

# Set potentials
pair_style airebo 3.0
pair_coeff * * CH.airebo C

# Energy minimization
min_style cg
minimize 1.0e-4 1.0e-6 1000 10000

# Define initial temperature and simulation parameters
velocity all create 10000.0 12345 mom yes rot yes dist gaussian

# Define timestep
timestep 0.0005  # 0.5 fs

# Fix for NVT ensemble
fix 1 all nvt temp 10000.0 300.0 0.1

# Define cooling stages
variable t equal step*dt

thermo 1000  # Log every 0.5 ps
thermo_style custom step temp pe ke etotal press vol

dump 1 all atom 10000 dump.amorphous.lammpstrj  # Dump every 5 ps

# Cooling stages
run 200000  # Run for 100 ps to gradually cool from 10000 K to 300 K

# Write the final configuration to a data file
write_data amorphous_carbon.data

# End of the input script
