# LAMMPS input script for bcc iron with spin dynamics

units           metal
atom_style      atomic
boundary        p p p

# Define lattice and region
lattice         bcc 2.8665
region          box block 0 10 0 10 0 10
create_box      1 box
create_atoms    1 box

# Define potential
pair_style      hybrid/overlay eam/alloy spin/exchange 1.0
pair_coeff      * * eam/alloy Fe_mm.eam.alloy Fe
pair_coeff      * * spin/exchange 1.0 1.0 1.0

# Spin setup
spin            2.2 random 12345

# Time integration
timestep        0.0001
fix             1 all nve/spin
fix             2 all langevin/spin 300 300 0.1 12345
fix             3 all precession/spin 0.0

# Output settings
thermo          200
thermo_style    custom step temp pe ke etotal spmag
dump            1 all custom 10 dump.spins id type x y z mux muy muz

# Run the simulation
run             100000

Note: Ensure that you have the appropriate potential files (`Fe_mm.eam.alloy` and others) and LAMMPS packages installed to support the features used in this script.
