# LAMMPS Input Script for Lennard-Jones Fluid Simulation

units lj
dimension 3
boundary p p p

atom_style atomic

# Create a face-centered cubic (FCC) lattice
lattice fcc 0.8442
region box block 0 10 0 10 0 10
create_box 1 box
create_atoms 1 box

# Define interaction potential
pair_style lj/cut 2.5
pair_coeff 1 1 1.0 1.0 2.5

# Initialize velocities for temperature T = 1.6
velocity all create 1.6 87287

# Set up the NPT ensemble
timestep 0.004
fix 1 all npt temp 0.8 0.8 0.5 iso 2.185 2.185 1.0

# Compute structural order parameter
compute myRhok all property/atom x y z
fix rhok all ave/correlate 50 1 50 c_myRhok[*] file rhok.dat ave running

# Output settings
thermo 50
thermo_style custom step temp press density c_myRhok[1] c_myRhok[2] c_myRhok[3]

# Run the simulation
run 5000
