# LAMMPS input script for a 2D simulation of a water balloon

# Initialize simulation
dimension 2
units lj
atom_style hybrid bond rheo
boundary s s p

# Create simulation box
region box block 0 50 0 50 -0.1 0.1
create_box 2 box

# Define regions for the fluid and shell of the balloon
region fluid sphere 25 25 0 10
region shell sphere 25 25 0 11.5 10.5 side out

# Create atoms in the fluid region
lattice hex 0.5
create_atoms 1 region fluid

# Create atoms in the shell region
create_atoms 2 region shell

# Define groups
group fluid region fluid
group shell region shell

# Define potentials
pair_style hybrid/overlay lj/cut 1.12246
pair_coeff * * lj/cut 1.0 1.0
pair_style hybrid/overlay rheo/viscous 1.0
pair_coeff * * rheo/viscous 1.0

bond_style harmonic
bond_coeff * 100.0 1.0

# Create bonds in the shell
neighbor 0.3 bin
neigh_modify delay 5
fix bond_creation all bond/create 1 2 2 1.5 1

# Initial velocity
velocity all create 1.0 12345
velocity all set 0.1 0.1 0.0

# Apply rheological fixes
fix 1 all rheo/pressure 1.0 1.0
fix 2 all rheo/viscosity 0.5

# Define walls
fix wall all wall/harmonic zlo 0.0 100.0 1.0 1.0

# Define output
thermo 100
thermo_style custom step temp ke press atoms

# Run the simulation
timestep 0.005
run 30000
