# LAMMPS Input Script for Molecular Dynamics Simulation

units real
atom_style full
boundary p p f

read_data data.system

# Define groups
group wall type 1
group gold type 2
group water type 3

# Define pair styles and coefficients
pair_style lj/cut/coul/long 10.0 10.0
pair_coeff 1 1 0.1 3.5
pair_coeff 2 2 0.1 2.5
pair_coeff 3 3 0.1 3.2
pair_coeff 1 2 0.1 3.0
pair_coeff 1 3 0.1 3.4
pair_coeff 2 3 0.1 3.1

# Define bond and angle styles
bond_style harmonic
bond_coeff 1 450 1.0

angle_style harmonic
angle_coeff 1 55 104.52

# Electrostatics with PPPM and electrode modifications
kspace_style pppm 1.0e-4

# Constraints for SPC/E water
fix shake_water water shake 0.0001 20 0 b 1 a 1

# Fix gold atoms in space
fix fix_gold gold setforce 0.0 0.0 0.0

# Apply force to wall to simulate atmospheric pressure
variable fz equal 0.1
fix force_wall wall addforce 0.0 0.0 v_fz

# Integrate wall motion with rigid body NVE ensemble
fix integrate_wall wall rigid/nve single

# Equilibrate water molecules at 300 K
velocity water create 300.0 491237
fix nvt_water water nvt temp 300.0 300.0 100.0

# Maintain constant potential across electrodes
fix potential_electrode all nve
minimize 1.0e-4 1.0e-6 100 1000

# Output settings
thermo 5000
thermo_style custom step temp press

# Output wall's z-coordinate over time
fix output_wall wall ave/time 5000 1 5000 zdisplace file wall_z_position.txt

# Run simulation
timestep 1.0
run 100000
