# LAMMPS input script for a 250-molecule butane system with Drude polarizability

units real
atom_style full
boundary p p p

read_data butane_system.data

# Define potential styles
pair_style hybrid/overlay lj/cut/coul/long 12.0 thole 0.2 12.0
bond_style harmonic
angle_style harmonic
dihedral_style opls

# Define pair coefficients for different atom types
pair_coeff * * lj/cut/coul/long 0.1 3.5
pair_coeff * * thole 0.2 10.0

# Define harmonic bond and angle coefficients
bond_coeff * 300 1.54
angle_coeff * 50 109.5

# Define OPLS dihedral coefficients
dihedral_coeff * 0.0 1.0 0.0 0.0

kspace_style pppm 1.0e-4

# Group definitions
group butane type 1 2 3 4
group core type 1 2 3
group drude type 4

# Initial velocity assignments
velocity core create 260.0 12345 loop geom
velocity drude create 1.0 67890 loop geom

# Fixes
fix core_nvt core nvt temp 260.0 260.0 100.0
fix drude_nvt drude nvt temp 1.0 1.0 100.0

# SHAKE to constrain bond lengths
fix shake all shake 0.0001 20 0 b 1 a 1

# Thole damping for polarizable interactions
fix drude_transform drude drude/transform/direct
fix drude_inversetransform drude drude/transform/inverse

# Zero linear momentum periodically
fix momentum all momentum 100 linear 1 1 1

# Output settings
thermo 100
thermo_style custom step temp etotal ke pe evdwl ecoul elong press

# Run the simulation
timestep 0.5
run 2000
