# LAMMPS input script for 3D Lennard-Jones melt with heterogeneity

units           lj
atom_style      atomic

# Define the simulation box and lattice
lattice         fcc 0.8442
region          box block 0 10 0 10 0 10
create_box      2 box
create_atoms    1 box

# Assign mass to atoms
mass            1 1.0
mass            2 1.0

# Define a region to assign a different atom type
region          hetero block 4 6 4 6 4 6
group           hetero_region region hetero
set             group hetero_region type 2

# Initialize velocities
velocity        all create 1.0 87287

# Define pair interactions
pair_style      lj/cut 5.0
pair_coeff      1 1 1.0 1.0 2.5
pair_coeff      1 2 1.0 1.0 5.0
pair_coeff      2 2 1.0 1.0 5.0

# Neighbor settings
neighbor        0.3 bin
neigh_modify    every 2 delay 4

# Define the simulation settings
fix             1 all nve
fix             2 all balance 1.0 shift xyz 10 1.0

# Run the simulation
thermo          50
thermo_style    custom step temp epair etotal press
run             2000
