# LAMMPS Input Script for Ellipsoidal Particle Membrane

units lj
atom_style ellipsoid

# Define variables
variable r0 equal 1.0

# Create a lattice for membrane
lattice custom ${r0} &
    a1 1.0 0.0 0.0 &
    a2 0.5 0.866 0.0 &
    a3 0.0 0.0 1.0 &
    basis 0.0 0.0 0.0

# Define simulation box
region box block 0 10 0 10 0 1 units lattice
create_box 1 box

# Create atoms in a membrane region
region membrane block 0 10 0 10 0 0 units lattice
create_atoms 1 region membrane

# Define ellipsoidal particles
set type 1 mass 1.0
set type 1 shape 1.5 0.5 0.5
set type 1 quat/random 12345

# Pair style and coefficients
pair_style ylz 1.0
pair_coeff * * 1.0 1.0

# Define neighbor list
neighbor 0.3 bin
neigh_modify every 1 delay 0 check yes

# Define initial velocities
velocity all create 0.23 12345

# Integrate motion with NVE for aspherical particles
fix 1 all nve/asphere

# Apply Langevin thermostat
fix 2 all langevin 0.23 0.23 1.0 12345

# Output settings
thermo 200
thermo_style custom step temp press

# Run the simulation
timestep 0.01
run 3000
