# LAMMPS Input Script for High-Pressure, High-Temperature Simulation of Diamond Cubic Carbon

units metal
dimension 3
boundary p p p
atom_style atomic

# Create a diamond cubic lattice
lattice diamond 2.845
region box block 0 3 0 3 0 3
create_box 1 box
create_atoms 1 box

# Define interatomic potentials
pair_style hybrid/overlay zbl 1.0 2.0 snap
pair_coeff * * zbl 6.0 6.0
pair_coeff * * snap C_SNAP_2021.10.15.quadratic C

# Define neighbor settings
neighbor 2.0 bin
neigh_modify delay 0 every 1 check yes

# Initialize velocities for high temperature
velocity all create 8000.0 12345 mom yes rot yes dist gaussian

# Define simulation settings
fix 1 all nve
fix 2 all langevin 5000.0 5000.0 0.1 12345

# Output settings
thermo 100
thermo_style custom step temp ke pe etotal press pxx pyy pzz

# Run the simulation
timestep 0.001
run 10000
