# LAMMPS input script for a 2D simulation of point dipoles in an NaCl crystal structure

units lj
dimension 2
atom_style full

# Read initial structure from data file
read_data nacl.data

# Replicate the simulation box to expand the system
replicate 8 8 1

# Define pair style and set a dummy interaction
pair_style zero 5.0
pair_coeff * *

# Setup the k-space solver with Scafacos using FMM
kspace_style scafacos/fmm 1.0e-4

# Initialize velocities for all atoms
velocity all create 1.5 12345

# Define the fix for time integration using NVE ensemble
fix 1 all nve

# Output settings
thermo 10
thermo_style custom step temp pe ke etotal

# Run the simulation
timestep 0.005
run 100
