# LAMMPS Input Script for a Rigid Body Simulation Using Lennard-Jones Units

units lj
atom_style atomic

# Create a simulation box
region box block 0 10 0 10 0 10
create_box 9 box

# Create atoms and assign each group to a separate clump
create_atoms 1 random 100 12345 box
group clump1 id 1:11
group clump2 id 12:22
group clump3 id 23:33
group clump4 id 34:44
group clump5 id 45:55
group clump6 id 56:66
group clump7 id 67:77
group clump8 id 78:88
group clump9 id 89:100

# Define Lennard-Jones potential
pair_style lj/cut 2.5
pair_coeff * * 1.0 1.0

# Set up neighbor list exclusions within each clump
neigh_modify exclude group clump1 clump1
neigh_modify exclude group clump2 clump2
neigh_modify exclude group clump3 clump3
neigh_modify exclude group clump4 clump4
neigh_modify exclude group clump5 clump5
neigh_modify exclude group clump6 clump6
neigh_modify exclude group clump7 clump7
neigh_modify exclude group clump8 clump8
neigh_modify exclude group clump9 clump9

# Initialize velocity distribution at temperature 100.0
velocity all create 100.0 12345 dist gaussian

# Apply fix rigid to groups of atoms
fix 1 clump1 rigid single
fix 2 clump2 rigid single
fix 3 clump3 rigid single
fix 4 clump4 rigid single
fix 5 clump5 rigid single
fix 6 clump6 rigid single
fix 7 clump7 rigid single
fix 8 clump8 rigid single
fix 9 clump9 rigid single

# Alternative setup for chains of connected bodies (commented out)
# fix 1 all rigid molecule

# Setup output
thermo 50
thermo_style custom step temp pe ke etotal

# Run the simulation
timestep 0.0001
run 10000
