# LAMMPS Input Script for Lennard-Jones Melt Simulation

units lj
atom_style atomic

# Create simulation box and atoms
lattice fcc 0.8442
region box block 0 10 0 10 0 10
create_box 1 box
create_atoms 1 box

# Define interatomic potential
pair_style lj/cut 2.5
pair_coeff 1 1 1.0 1.0 2.5

# Set mass and initial velocities
mass 1 1.0
velocity all create 3.0 4928459 dist gaussian

# Define neighbor list
neighbor 0.3 bin
neigh_modify every 20 delay 0 check no

# Fix NVE for time integration
fix 1 all nve

# Python callback functions
variable step python "print(f'Step: {self.lmp.get_thermo(\"step\")}', flush=True)"
variable force python "print(f'Force calculation complete at step: {self.lmp.get_thermo(\"step\")}', flush=True)"
fix callback_step all python/invoke 1 end_of_step v_step
fix callback_force all python/invoke 1 post_force v_force

# Output settings
thermo 50
thermo_style custom step temp pe ke etotal

# Run the simulation
run 250
