# LAMMPS Input Script for Water Simulation using ReaxFF

# Initialize simulation
units real
atom_style charge
boundary p p p

# Read data file
read_data data.water

# Replicate system
variable xrep equal 1
variable yrep equal 1
variable zrep equal 1
replicate ${xrep} ${yrep} ${zrep}

# Define interatomic interactions
pair_style reax/c lmp_control
pair_coeff * * ffield.reax C H O

# Enable charge equilibration
fix qeq all qeq/reax 1 0.0 10.0 1e-6 reax/c

# Initialize velocities
velocity all create 300.0 12345 rot yes dist gaussian

# Apply Nose-Hoover thermostat
fix 1 all nvt temp 300.0 300.0 50.0

# Set timestep
timestep 0.5

# Output settings
thermo 10
thermo_style custom step temp press density vol

# Run simulation
run 20
