# LAMMPS input script for a rigid body simulation using Lennard-Jones units

units           lj
atom_style      bond

# Create or read a data file defining atoms and bonds
# read_data      system.data

# Define the simulation box and add atoms
# This part is assumed to be done via an external data file or command

# Define the pair style and coefficients
pair_style      lj/cut 2.5
pair_coeff      * * 1.0 1.0 2.5

# Define groups for each clump of atoms to be treated as rigid bodies
group           clump1 id 1 2 3
group           clump2 id 4 5 6
group           clump3 id 7 8 9
group           clump4 id 10 11 12
group           clump5 id 13 14 15
group           clump6 id 16 17 18
group           clump7 id 19 20 21
group           clump8 id 22 23 24
group           clump9 id 25 26 27

# Exclude self-interactions within each rigid body
neigh_modify    exclude group clump1 clump1
neigh_modify    exclude group clump2 clump2
neigh_modify    exclude group clump3 clump3
neigh_modify    exclude group clump4 clump4
neigh_modify    exclude group clump5 clump5
neigh_modify    exclude group clump6 clump6
neigh_modify    exclude group clump7 clump7
neigh_modify    exclude group clump8 clump8
neigh_modify    exclude group clump9 clump9

# Use fix rigid/small to treat each clump as a separate rigid body
fix             rigid all rigid/small molecule

# Initialize velocities
velocity        all create 100.0 12345

# Set timestep
timestep        0.0001

# Set thermo output
thermo          50

# Run the simulation
run             10000

# Output commands for visualization and data (commented out)
# dump           1 all atom 100 dump.rigid.lammpstrj
# dump_modify    1 sort id

# Write restart file (commented out)
# write_restart  restart.rigid
