# LAMMPS input script for simple water model using LATTE QM engine

units metal
atom_style full

# Read initial atomic configuration
read_data data.water

# Define variables for replication if needed
variable xrep equal 1
variable yrep equal 1
variable zrep equal 1

# Replicate the system in 3D
replicate ${xrep} ${yrep} ${zrep}

# Define the pair style and neighbor settings
pair_style zero 1.0
neighbor 1.0 bin
neigh_modify every 1 delay 0 check yes

# Assign initial velocities (0 K, random seed for reproducibility)
velocity all create 0.0 12345

# Define the timestep
timestep 0.00025

# Integrate equations of motion
fix 1 all nve

# Quantum mechanical force calculation using LATTE via MDI interface
fix 2 all mdi/qm mdi_name latte

# Thermodynamic output every 10 timesteps
thermo 10
thermo_style custom step temp pe etotal press

# Run the simulation for 100 steps
run 100
