# LAMMPS input script for 2D molecular dynamics simulation with periodic bonds in xy diagonal direction

units           lj
dimension       2
atom_style      molecular

# Read initial configuration from data file
read_data       data.bond.xy

# Replicate the system
replicate       3 3 1 bond/periodic

# Define potential styles
pair_style      lj/cut 2.5
bond_style      harmonic

# Define pair coefficients
pair_coeff      * * 1.0 1.0 2.5

# Define bond coefficients
bond_coeff      * 50.0 1.414

# Special bonds settings
special_bonds   fene

# Initialize velocities
velocity        all create 0.1 12345

# Define integration fix
fix             1 all nve

# Output settings
timestep        0.005
thermo          100

# Dump settings for visualization
dump            1 all custom 100 dump.bond.xy id type x y z
dump_modify     1 sort id

# Image settings
dump            2 all image 100 image.*.jpg type type bond yes
dump_modify     2 pad 5 adiam 1.0 bonddiam 1.0 zoom 1.5

# Run the simulation
run             5000
