# LAMMPS Input Script for Melting Simulation of Gold Cube

units           metal
dimension       3
boundary        p p p
atom_style      atomic

# Define lattice and create geometry
lattice         fcc 4.065
region          simbox block 0 10 0 10 0 10
create_box      1 simbox

# Define a smaller cube region inside the larger simulation box
region          cube block 2.0 8.0 2.0 8.0 2.0 8.0
create_atoms    1 region cube

# Define potentials
pair_style      eam
pair_coeff      * * Au_u3.eam

# Initial velocities
velocity        all create 1.0 12345

# Define settings
neighbor        2.0 bin
neigh_modify    every 1 delay 0 check yes

# Output settings
thermo          1000
thermo_style    custom step temp etotal press
dump            1 all atom 1000 traj.lammpstrj

# Dynamics
timestep        0.001
fix             1 all nvt temp 1.0 2500.0 0.1
fix             2 all recenter INIT INIT INIT

# Run simulation
run             100000
