# LAMMPS input script for a 2D periodic system with bonded interactions

# Initialization
units lj
dimension 2
atom_style molecular

# Read the initial configuration from a data file
read_data initial_config.data

# Replicate the system 3 times in both x and y dimensions
replicate 3 3 1

# Define Lennard-Jones potential with a cutoff
pair_style lj/cut 2.5
pair_coeff * * 1.0 1.0 2.5

# Define harmonic bond style
bond_style harmonic
bond_coeff * 50.0 1.0

# Special bonds handling
special_bonds fene

# Set up neighbor list
neighbor 0.3 bin
neigh_modify delay 5 every 1

# Set initial velocities
velocity all create 0.1 12345

# Fix for NVE integration
fix 1 all nve

# Output settings
dump 1 all image 100 image.*.jpg type type &
    bond yes zoom 1.2 diameter 1.5

# Run the simulation
timestep 0.005
run 5000
