units real
atom_style hybrid bond ellipsoid oxDNA

boundary p p p

read_data dna_duplex.data

mass * 1.0

pair_style hybrid/overlay oxDNA_exvol oxDNA_stacking oxDNA_HB oxDNA_xstak oxDNA_coax
pair_coeff * * oxDNA_exvol
pair_coeff * * oxDNA_stacking
pair_coeff * * oxDNA_HB
pair_coeff * * oxDNA_xstak
pair_coeff * * oxDNA_coax

bond_style fene
bond_coeff * 30.0 1.5 1.0 1.0

neighbor 1.0 bin
neigh_modify every 1 delay 0 check yes

timestep 0.01706

fix 1 all nve/asphere
fix 2 all balance 1000 1.0 shift xyz 10

compute ke all ke
compute pe all pe
compute etotal all etotal
compute erotate all erotate/asphere

thermo 1000
thermo_style custom step temp c_ke c_erotate c_pe c_etotal

dump 1 all custom 10000 trajectory.lammpstrj id type x y z ix iy iz
dump_modify 1 sort id

run 1000000
