# LAMMPS Input Script for Lennard-Jones Particles in a Cubic Box

# Initialization
units lj
dimension 3
boundary p p p
atom_style atomic

# Create simulation box and atoms
region box block -30 30 -30 30 -30 30
create_box 2 box

# Create atoms
create_atoms 1 random 5000 12345 box
create_atoms 2 random 500 54321 box

# Define interaction potential
pair_style lj/cut 2.5
pair_coeff 1 1 1.0 1.0 2.5
pair_coeff 1 2 1.0 1.0 2.5
pair_coeff 2 2 1.0 1.0 2.5

# Neighbor list
neighbor 0.3 bin
neigh_modify every 1 delay 0 check yes

# Energy minimization
min_style cg
minimize 1.0e-4 1.0e-6 100 1000

# Define settings for NVE ensemble with Langevin thermostat
fix 1 all nve
fix 2 all langevin 1.0 1.0 0.1 12345

# Run the simulation
timestep 0.005
thermo 1000
thermo_style custom step temp etotal pe ke

# Output settings
dump 1 all atom 1000 lj_particles.lammpstrj

# Run the dynamics
run 20000
