# LAMMPS input script for 2D LJ simulation of crack propagation

units           lj
dimension       2
atom_style      atomic

# Define simulation box
region          box block 0 50 0 50 -0.1 0.1
create_box      5 box

# Create hexagonal lattice
lattice         hex 0.8442
region          lattice_region block 0 50 0 50 -0.1 0.1
create_atoms    1 region lattice_region

# Set masses for atom types
mass            * 1.0

# Define LJ potential
pair_style      lj/cut 2.5
pair_coeff      * * 1.0 1.0 2.5

# Define groups for boundary and crack regions
region          lower block INF INF 0 1.5 INF INF
region          upper block INF INF 48.5 50 INF INF
region          leftupper block 0 1.5 25 50 INF INF
region          leftlower block 0 1.5 0 25 INF INF

group           lower region lower
group           upper region upper
group           leftupper region leftupper
group           leftlower region leftlower

# Assign different types for crack study
set             group lower type 2
set             group upper type 3
set             group leftupper type 4
set             group leftlower type 5

# Assign velocities
velocity        all create 0.01 4928459
velocity        upper set 0.0 0.01

# Fixes
fix             1 all nve
fix             2 lower setforce NULL 0.0 NULL
fix             3 upper setforce NULL 0.0 NULL

# Settings
timestep        0.003
thermo          200

# Run simulation
run             10000
