# LAMMPS input script for deposition of argon on silica glass

units metal
dimension 3
boundary p p f
atom_style charge

# Read initial data
read_data silica_glass.data

# Define potentials
pair_style hybrid tersoff zbl 3.0 coul/cut 10.0
pair_coeff * * tersoff SiO2.tersoff Si O NULL
pair_coeff 1 3 zbl 3.0  # Si-Ar interaction
pair_coeff 2 3 zbl 3.0  # O-Ar interaction
pair_coeff 3 3 coul/cut 10.0  # Ar-Ar interaction

# Define groups
group substrate type 1 2
group mobile subtract all substrate
group argon type 3

# Set substrate atoms to be immobile
fix freeze substrate setforce 0.0 0.0 0.0

# Initialize velocities for time integration
velocity mobile create 300.0 12345 mom yes rot no dist gaussian

# Define NVT ensemble for mobile atoms
fix nvt mobile nvt temp 300.0 300.0 100.0

# Define deposition region
region deposit_region block INF INF INF INF 20.0 50.0 units box
fix deposit argon deposit 1 3 1000 12345 region deposit_region vz -0.1 -0.1

# Run the simulation in a loop
variable i loop 200
label loop

    # Main run
    run 1000

    # Output thermodynamic data
    thermo 100
    thermo_style custom step temp pe press

    # Dump atom positions and velocities
    dump 1 all custom 100 dump.argon id type x y z vx vy vz

next i
jump SELF loop

# End of script
