# LAMMPS Input Script for Sucrose Molecular Dynamics Simulation

# Initialize simulation
units metal
atom_style full
boundary p p p

# Read data file
read_data data.sucrose

# Variables for replication
variable x equal 1
variable y equal 1
variable z equal 1
replicate ${x} ${y} ${z}

# Define pair style (no interactions) and special bonds
pair_style zero 10.0
pair_coeff * *

# Assign initial velocities
velocity all create 100.0 12345

# Define quantum mechanical fix using LATTE model
fix qm all mdi/qm elements O C H

# Timestep and ensemble
timestep 0.00025
fix 1 all nve

# Thermodynamic output
thermo 10
thermo_style custom step temp pe etotal press

# Run the simulation
run 100

# Clean up
unfix 1
unfix qm
