# LAMMPS input script for simulation of elastic wave propagation using AtC

units real
dimension 3
boundary p p p
atom_style atomic

# Create FCC lattice for Argon
lattice fcc 5.26
region simbox block 0 10 0 10 0 10
create_box 1 simbox
create_atoms 1 box

# Define potential
pair_style lj/cut 10.0
pair_coeff 1 1 0.238 3.405

# Define groups for AtC coupling
group internal region simbox
group ghost subtract all internal

# Read material properties from external file
fix atcfix internal atc file Ar_elastic.mat

# Initial velocities and displacements
velocity all create 0.0 12345
displace_atoms all move 0.0 0.0 0.0

# Set thermo and dump settings
thermo 100
thermo_style custom step temp press pe

dump 1 all custom 100 output.dump id type x y z vx vy vz

# Apply boundary conditions at ghost boundaries
fix ghostbc ghost enforce2d
fix momentum internal momentum 1 linear 1 1 1

# Run simulation
timestep 0.001

# Stage 1: Initial run to extension
run 5000

# Stage 2: Run to equilibrium
unfix ghostbc
run 10000

# Compute stress and temperature
compute stress all stress/atom virial
compute temp all temp

# Output stress and temperature
variable stress equal c_stress
variable temp equal c_temp
fix output all print 100 "Time: $t Stress: ${stress} Temperature: ${temp}" file output.txt screen no

# End of script
