# LAMMPS Input Script for 2D SPH Simulation with Two Particle Types

units cgs
dimension 2
boundary s p p
atom_style sphere

# Create a 2D box
region box block 0 20 0 5 -0.1 0.1
create_box 2 box

# Define lattice and create atoms
lattice sq2 1.0
region left block 0 10 0 5 -0.1 0.1
region right block 10 20 0 5 -0.1 0.1

create_atoms 1 region left
create_atoms 2 region right

# Set particle masses and radii
set type 1 mass 1.0
set type 1 diameter 0.5
set type 2 mass 1.5
set type 2 diameter 0.5

# Define smoothed particle hydrodynamics (SPH) settings
pair_style hybrid/overlay sph/rhosum 1.0 sph/idealgas 1.0

# Pair coefficients for SPH interactions
pair_coeff * * sph/rhosum h 1.0
pair_coeff * * sph/idealgas h 1.0

# Set initial internal energy and density for each type
set type 1 property/atom internal_energy 2.0
set type 2 property/atom internal_energy 3.0

set type 1 property/atom density 0.8
set type 2 property/atom density 0.6

# Define integration settings
fix 1 all sph

# Set timestep
timestep 0.05

# Output settings
thermo 100
thermo_style custom step ke pe etotal

# Output particle positions and densities
dump 1 all custom 100 dump.sph id type x y z density

# Run the simulation
run 400
