# LAMMPS Input Script for 2D Overdamped Dynamics of Non-interacting Ellipsoids

units lj
dimension 2
atom_style ellipsoid

# Create simulation box
boundary p p f
region box block -30 30 -30 30 -0.1 0.1
create_box 1 box

# Define particle properties
variable density equal 0.4
variable num_atoms equal floor(${density} * 60 * 60)
create_atoms 1 random ${num_atoms} 12345 box

set type 1 mass 1.0
shape 3.0 1.0 1.0
set type 1 quat/random 12345
set type 1 dipole/random 1.0 12345

# Define pair style (no interactions)
pair_style none

# Define the fix for overdamped dynamics
variable gamma_t equal 1.0
variable gamma_r1 equal 3.0
variable gamma_r2 equal 1.0
variable gamma_r3 equal 1.0

fix 1 all brownian/asphere 1.0 ${gamma_t} ${gamma_r1} ${gamma_r2} ${gamma_r3} 12345

# Thermo and output settings
compute myMSD all msd com yes
thermo_style custom step temp ke pe c_myMSD[4]
thermo 100

# Run the simulation
timestep 0.00001
run 3000
