# LAMMPS Input Script for HNS Crystal using ReaxFF

units real
atom_style charge
boundary p p p

# Read in pre-equilibrated data file and replicate the system
read_data data.hns-equil
replicate 2 2 2

# Define ReaxFF potential for C, H, O, and N
pair_style reax/c lmp_control
pair_coeff * * ffield.reax C H O N

# Charge equilibration using qeq/reax
fix qeq all qeq/reax 1 0.0 10.0 1e-6 reax/c

# Initialize velocities
velocity all create 300.0 12345

# Define integration style
fix 1 all nve

# Thermo settings
thermo 10
thermo_style custom step temp pe press vol

# Run the simulation
timestep 0.1
run 1000
