# LAMMPS input script for a 3D molecular dynamics simulation using LJ units

units lj
atom_style atomic

# Create simulation box and atoms
region box block 0 10 0 10 0 10
create_box 1 box
create_atoms 1 random 100 12345 box

# LJ potential parameters
mass 1 1.0
pair_style lj/cut 2.5
pair_coeff 1 1 1.0 1.0 2.5

# Initial velocities corresponding to temperature of 0.8
velocity all create 0.8 12345

# NPT ensemble to maintain constant temperature and pressure
fix 1 all npt temp 0.8 0.8 0.1 z 1.0 1.0 1.0

# Apply harmonic bias field to investigate density fluctuations
variable q equal 2.0*PI/10.0
fix 2 all rhok 0.1 1.0 v_q NULL NULL

# Integrate equations of motion with a timestep of 0.004
timestep 0.004
thermo 50
thermo_style custom step temp press pe f_2

# Run simulation for 5000 timesteps
run 5000
