# LAMMPS Input Script for Butane System with Drude Polarizability

units real
atom_style full
boundary p p p

# Read initial configuration from a data file
read_data butane_system.data

# Define force field styles
pair_style hybrid/overlay lj/cut/coul/long 12.0 thole 0.2 12.0
bond_style harmonic
angle_style harmonic
dihedral_style opls

# Pair coefficients for Lennard-Jones and Thole damping parameters
pair_coeff * * lj/cut/coul/long 0.0 0.0
pair_coeff * * thole 0.0 0.2

# Bond and angle coefficients
bond_coeff * 340.0 1.53
angle_coeff * 60.0 110.0

# Dihedral coefficients for OPLS
dihedral_coeff * 0.0 0.0 0.0 0.0

# Define groups for core and Drude particles
group cores type 1
group drudes type 2

# Setup Drude oscillator model
fix 1 all drude 1.0e-5 10.0

# Langevin thermostat for Drude and core particles
fix 2 cores langevin/drude 300.0 300.0 100.0 12345
fix 3 drudes langevin/drude 1.0 1.0 100.0 54321

# Constrain bond lengths using SHAKE
fix 4 all shake 0.0001 20 0 b 1 a 1

# Long-range electrostatics with PPPM
kspace_style pppm 1.0e-4

# Integrate equations of motion
fix 5 all nve

# Set initial velocities for cores and drudes
velocity cores create 300.0 12345 mom yes rot yes dist gaussian
velocity drudes create 1.0 54321 mom yes rot yes dist gaussian

# Set timestep
timestep 0.5

# Output settings
thermo 50
thermo_style custom step temp etotal pe ke temp/cores temp/drudes

# Run the simulation
run 2000
