units real
atom_style charge

read_data data.AB

pair_style reaxff
pair_coeff * * ffield.reax.HBN H B N

neighbor 2.0 bin
neigh_modify delay 0 every 10 check yes

fix 1 all nve
fix 2 all qeq/reax 1 0.0 10.0 1.0e-6 reax/c

velocity all create 500.0 12345
fix 3 all temp/berendsen 500.0 500.0 100.0

timestep 0.25

thermo 100

run 2000
