# LAMMPS input script for 3D Lennard-Jones melt simulation

# Initialize simulation in reduced Lennard-Jones units
units lj
atom_style atomic

# Create a cubic simulation box with fcc lattice
lattice fcc 0.8442
region box block 0 10 0 10 0 10
create_box 2 box

# Create atoms of type 1
create_atoms 1 box

# Define region for atoms reassignment to type 2
region type2region block 4 6 4 6 4 6
group type2atoms region type2region
set group type2atoms type 2

# Define interatomic potential
pair_style lj/cut 5.0
pair_coeff 1 1 1.0 1.0 2.5
pair_coeff 1 2 1.0 1.0 5.0
pair_coeff 2 2 1.0 1.0 5.0

# Set neighbor list style
neighbor 0.3 bin
neigh_modify every 1 delay 0 check yes

# Initialize velocities
velocity all create 1.0 12345

# Fix for integration of equations of motion
fix 1 all nve

# Balance command for optimizing processor load
balance 1.0 shift xyz 20 1.1

# Run the simulation
thermo 50
thermo_style custom step temp pe ke etotal
run 750

# Optional: Uncomment the following lines to output atom positions for visualization
# dump 1 all atom 50 dump.lj
# dump_modify 1 scale no
