# LAMMPS Input Script for Lennard-Jones Translation Simulation

units real
atom_style atomic

# Define lattice and create simulation box
lattice fcc 5.256
region box block 0 10 0 10 0 10
create_box 1 box
create_atoms 1 box

# Assign mass to atoms
mass 1 39.95

# Define Lennard-Jones potential with cutoff
pair_style lj/cut 13.5
pair_coeff 1 1 0.0103 3.4

# Set up initial velocities
velocity all create 300.0 12345
velocity all set 1.0 0.0 0.0

# Define neighbor list
neighbor 2.0 bin
neigh_modify every 1 delay 0 check yes

# Minimize energy
minimize 1.0e-4 1.0e-6 100 1000

# Define the integration method
timestep 0.1
fix 1 all nve

# Compute Hardy fields using ATC
fix atc all atc Hardy 1 0.1
fix_modify atc output text binary
fix_modify atc file_prefix atc_output
fix_modify atc fields stress velocity displacement temperature internal_energy

# Customize thermodynamic output
thermo 100
thermo_style custom step temp press pxx pyy pzz pe ke etotal lx ly lz

# Run the simulation
run 3500
