# LAMMPS Input Script for BCC Tantalum with MLIAP using PyTorch

units           metal
atom_style      atomic
boundary        p p p

# Define the BCC lattice structure for tantalum
lattice         bcc 3.316
region          box block 0 4 0 4 0 4
create_box      1 box
create_atoms    1 box

# Specify the machine learning interatomic potential (MLIAP)
pair_style      mlip mliap
pair_coeff      * * Ta.mlip Ta

# Initialize velocities for equilibration at 300 K
velocity        all create 300.0 12345

# Define thermodynamic output
thermo_style    custom step temp pe etotal press
thermo_modify   norm yes
thermo          10

# Set up the integration method
timestep        0.0005
fix             1 all nve

# Run the simulation
run             100

This script sets up and runs a molecular dynamics simulation of a BCC tantalum lattice using a machine learning interatomic potential interfaced with PyTorch. The simulation uses a linear SNAP potential suitable for tantalum, initializes the system at 300 K, and outputs key thermodynamic properties every 10 timesteps.
