# LAMMPS input script for AuO system using ReaxFF potential

units real
atom_style charge

# Read data file
read_data data.AuO

# Pair style and coefficients
pair_style reax/c NULL
pair_coeff * * ffield.reax.AuO Au O

# Neighbor list settings
neighbor 2.0 bin
neigh_modify every 1 delay 0 check yes

# Charge equilibration
fix qeq all qeq/reax 1 0.0 10.0 1e-6 reax/c

# Define simulation settings
timestep 0.25
thermo 5

# Thermostat
fix 1 all nve
fix 2 all temp/berendsen 500.0 500.0 100.0

# Run the simulation
run 100
